# [area: Page 0_Problem 10.1 Level 1]
# 10.1 Example Problem 1
# A liquid knock-out vessel that is part of a pressure relief system typically operates at temperatures below the
# creep range. During a recent upset condition, high temperature liquid was relieved in the vessel for a period of
# time, subjecting the vessel to temperatures in the creep range. Details regarding the vessel and the upset
# condition are given below. The shell contains a weld seam which was exposed to the excursion conditions.
# The vessel was constructed to the ASME B&PV Code, Section VIII, Division 1. Estimate the level of creep
# damage sustained by the vessel shell during the upset condition.
# Vessel Data
# • Material = SA−516Grade60 Year 1998
# • Design Conditions = 50 psig@45@oF
# • Inside Diameter = 60 in
# • Fabricated Thickness = 0.375 in
# • Future Corrosion Allowance (FCA) = 0.10 in
# • Weld Joint Efficiency = 1.0
# • Unsupported Length = 144in
# • Cylindrical Shell with 2:1 Elliptical Heads (Rell = 2)
# • PWHT = Yes, Original Fabrication Requirement
# Temperature Excursion Data
# • Excursion Pressure: = 82.6 psig
# • Excursion Temperature: = 950 oF
# • Excursion Duration: = 20 hours
# [area: Page1_Home]
# -----------------------------------------------------------------------------------------------------------------------------------------------------------------------------------
# File | Edit | Tool | View | Help
# -----------------------------------------------------------------------------------------------------------------------------------------------------------------------------------
# Failure Mode
# Which assessment do you choose?
# Brittle Fracture | General Metal Loss | Local Metal Loss
# Pitting Corrosion | Crack-like Flaw | Creep Rupture
# [component: outputs Next]
# -----------------------------------------------------------------------------------------------------------------------------------------------------------------------------------
# Code
Failure_Mode := "Creep Damage"
# [area: Page2_Equipment]
# -----------------------------------------------------------------------------------------------------------------------------------------------------------------------------------
# File | Edit | Tool | View | Help
# -----------------------------------------------------------------------------------------------------------------------------------------------------------------------------------
# Equipment | Design | Material | Dimention | Load | Result | Save | Report | Close
# Equipment Data
# [component: outputs Equipment_Type]
# [component: outputs Faillure_Mode]
# [component: outputs Methodology]
# [component: outputs Unit]
# {in-psi-oF}
# [component: outputs Assessment_Level]
# {Level 1}
# [component: outputs Analysis_By]
# [component: outputs Analysis_Date]
# [component: outputs Attach_Picture]
# [component: outputs Analysis_Detail]
# [component: outputs Next]
# -----------------------------------------------------------------------------------------------------------------------------------------------------------------------------------
# Code
# //Unit
Unit_Length :=
    "mm" if Unit == 1
    "in" if Unit == 2
Unit_Length = "in"
Unit_Stress :=
    "MPa" if Unit == 1
    "psi" if Unit == 2
Unit_Stress = "psi"
Unit_Temp :=
    "oC" if Unit == 1
    "oF" if Unit == 2
Unit_Temp = "oF"
Unit_Time := "Hrs"
Unit_Time = "Hrs"
# //Equipment Type
EquipmentType :=
    "Pipe Component" if Equipment_Type == 1
    "Pressure Vessel" if Equipment_Type == 2
    "Atmospheric Storage Tank" otherwise
EquipmentType = "Pipe Component"
# // Failure Mode
FaillureMode :=
    "Brittle Fracture" if Faillure_Mode == 1
    "General Metal Loss " if Faillure_Mode == 2
    "Local Metal Loss" if Faillure_Mode == 3
    "Pitting Corrosion " if Faillure_Mode == 4
    "Crack-like Flaw" if Faillure_Mode == 5
    "Creep Rupture" otherwise
FaillureMode = "Brittle Fracture"
# //Methodology
Methodology :=
    "API 579-1/ASME FFS-1 2007 Fitness-For-Service" if Methodology == 1
    "Other" otherwise
Methodology = "API 579-1/ASME FFS-1 2007 Fitness-For-Service"
# //Assessment Level
AssessmentLevel :=
    "Level 1" if Assessment_Level == 1
    "Level 2" if Assessment_Level == 2
    "Level 3" otherwise
AssessmentLevel = "Level 1"
# //Analysis By
AnalysisBy := Analysis_By
AnalysisBy = "TEST NAME"
# //Analysis Date
AnalysisDate := Analysis_Date
AnalysisDate = "1/1/14"
# //Attach Picture
AttachPicture := Attach_Picture
AttachPicture = "TEST PICTURE"
# //Analysis Detail
AnalysisDetail := Analysis_Detail
AnalysisDetail = "FAILURE"
# [area: Page3_Design]
# -----------------------------------------------------------------------------------------------------------------------------------------------------------------------------------
# File | Edit | Tool | View | Help
# -----------------------------------------------------------------------------------------------------------------------------------------------------------------------------------
# Equipment | Design | Material | Dimention | Load | Result | Save | Report | Close
# Design Data
# [component: outputs Component_Type]
# {Cylinder}
# [component: outputs Component_Shape]
# {Cylinder}
# [component: outputs Design_Code]
# {ASME Section VIII Div 1}
# [component: outputs Pressure_Design]
Unit_Stress = "psi"
# [component: outputs Temperature_Design]
Unit_Temp = "oF"
# [component: outputs Inside_Diameter]
Unit_Length = "in"
# [component: outputs Nominal_Thickness]
Unit_Length = "in"
# [component: outputs Future_Corrosion_Allowance]
Unit_Length = "in"
# [component: outputs Uniform_Metal_Loss]
Unit_Length = "in"
# [component: outputs Weld_Efficiency]
# [component: outputs Next]
# ----------------------------------------------------------------------------------------------------------------------------------------------------------------------------
# Code
ComponentShape :=
    "Cylindical" if Component_Shape == 1
    "Sphericall" otherwise
ComponentShape = "Cylindical"
DesignCode :=
    "ASME Section VIII Div.1" if Design_Code == 1
    "ASME Section VIII Div.2" if Design_Code == 2
    "ASME B31.3" if Design_Code == 3
    "API 620" if Design_Code == 3
    "Other" otherwise
DesignCode = "ASME Section VIII Div.1"
P_design := str2num(Pressure_Design)
P_design = 82.6
T_design := str2num(Temperature_Design)
T_design = 450
D := str2num(Inside_Diameter)
D = 60
R := D/2
R = 30
t_nom := str2num(Nominal_Thickness)
t_nom = 0.375
FCA := str2num(Future_Corrosion_Allowance)
FCA = 0.1
LOSS := str2num(Uniform_Metal_Loss)
LOSS = 0
E := str2num(Weld_Efficiency)
E = 1
# [area: Page4_Material]
# -----------------------------------------------------------------------------------------------------------------------------------------------------------------------------------
# File | Edit | Tool | View | Help
# -----------------------------------------------------------------------------------------------------------------------------------------------------------------------------------
# Equipment | Design | Material | Dimention | Load | Result | Save | Report | Close
# Material Data
# [component: outputs Material_Specification]
# [component: outputs Material_Name]
# //active when Material_Specification = Other
# [component: outputs Next]
# -----------------------------------------------------------------------------------------------------------------------------------------------------------------------------------
# Code
Material :=
    Material_Name if Material_Specification == 3
    "test material" otherwise
# [area: Page5_Dimension]
# -----------------------------------------------------------------------------------------------------------------------------------------------------------------------------------
# File | Edit | Tool | View | Help
# -----------------------------------------------------------------------------------------------------------------------------------------------------------------------------------
# Equipment | Design | Material | Dimention | Load | Result | Save | Report | Close
# Dimension Data
# [component: outputs Assessment_Material]
# {carbon steel}
# [component: outputs Automatically_Calculation_The_Maximum_Permissible_Time]
# {tick}
# [component: outputs The_Maximum_Permissible_Time]
# //active when not tick Automatically_Calculation_The_Maximum_Permissible_Time
Unit_Time = "Hrs"
# [component: outputs Automatically_Calculation_The_Creep_Damage_Rate]
# {tick}
# [component: outputs The_Creep_Damage_Rate]
# Unit = 1/mm or 1/in.
# //active when not tick Automatically_Calculation_The_Creep_Damage_Rate
# [component: outputs The_Component_Contains_a_Weld_Joint]
# {tick}
# [component: outputs The_Weld_Joint_is_PWHT]
# {tick}
# [component: outputs Excursion_Duration]
Unit_Time = "Hrs"
# [component: outputs Next]
# -----------------------------------------------------------------------------------------------------------------------------------------------------------------------------------
# Code
t_oper := str2num(Excursion_Duration)
T_p :=
    str2num(The_Maximum_Permissible_Time) if Automatically_Calculation_The_Maximum_Permissible_Time == 0
    0 otherwise
R_c :=
    str2num(The_Creep_Damage_Rate) if Automatically_Calculation_The_Creep_Damage_Rate == 0
    0 otherwise
# [area: Page6_Load]
# -----------------------------------------------------------------------------------------------------------------------------------------------------------------------------------
# File | Edit | Tool | View | Help
# -----------------------------------------------------------------------------------------------------------------------------------------------------------------------------------
# Equipment | Design | Material | Dimention | Load | Result | Save | Report | Close
# Load Data
Excursion_Duration
# [component: outputs Excursion_Pressure]
Unit_Stress = "psi"
# [component: outputs Ecxternal_Pressure]
# //not active now
# [component: outputs Excursion_Temperature:]
Unit_Temp = "oF"
# [component: outputs Automatically_Calculation_The_Nominal_Stress_of_The_Component]
# {tick}
# [component: outputs The_Nominal_Stress_of_The_Component]
Unit_Stress = "psi"  # //active when tick Automatically_Calculation_The_Nominal_Stress_of_The_Component
# [component: outputs Next]
# -----------------------------------------------------------------------------------------------------------------------------------------------------------------------------------
# Code
S_nom :=
    str2num(The_Nominal_Stress_of_The_Component) if Automatically_Calculation_The_Nominal_Stress_of_The_Component == 0
    0 otherwise
P_oper := str2num(Excursion_Pressure)
P_oper = 82.6
Unit_Stress = "psi"
T_oper := str2num(Excursion_Temperature:)
T_oper = 950
# [area: Calculation_Level1]
# -----------------------------------------------------------------------------------------------------------------------------------------------------------------------------------
# STEP 1 – Determine the maximum operating temperature, pressure, and service time the component is
# exposed to.
T_max :=
    T_oper + 14 if The_Component_Contains_a_Weld_Joint == 1 and Unit_Temp == "oC"
    T_oper + 25 if The_Component_Contains_a_Weld_Joint == 1 and Unit_Temp == "oF"
    T_oper otherwise
T_max = 975
Unit_Temp = "oF"
P_max := P_oper
P_max = 82.6
Unit_Stress = "psi"
t_oper := t_oper
t_oper = 20
Unit_Time = "Hrs"
# STEP 2 – Determine the nominal stress of the component.
t_c := t_nom - FCA - LOSS
t_c = 0.275
Unit_Length = "in"
# Cylindrical shell circumferential membrane stress (A.11)
σ_m.c := P_max/E*(R/t_c + 0.6)
σ_m.c = 9060.47
Unit_Stress = "psi"
# Cylindrical shell longitudinal membrane stress (A.17)
σ_m.l := P_max/(2*E)*(R/t_c - 0.4)
σ_m.l = 4488.93
Unit_Stress = "psi"
σ_max :=
    S_nom if Automatically_Calculation_The_Nominal_Stress_of_The_Component == 0
    max(σ_m.c, σ_m.l) otherwise
Automatically_Calculation_The_Nominal_Stress_of_The_Component = 1
σ_max = 9060.47
Unit_Stress = "psi"
# STEP 3 –Determine the material of construction for the component and find the figure with the screening
# and damage curves to be used for the Level 1 assessment from Figures 10.3 through 10.25.
Figture :=
    "Figure 10.3" if Assessment_Material == 1
    "Figure 10.4" if Assessment_Material == 2
    "Figure 10.5" if Assessment_Material == 3
    "Figure 10.6" if Assessment_Material == 4
    "Figure 10.7" if Assessment_Material == 5
    "Figure 10.8" if Assessment_Material == 6
    "Figure 10.9" if Assessment_Material == 7
    "Figure 10.10" if Assessment_Material == 8
    "Figure 10.11" if Assessment_Material == 9
    "Figure 10.12" if Assessment_Material == 10
    "Figure 10.13" if Assessment_Material == 11
    "Figure 10.14" if Assessment_Material == 12
    "Figure 10.15" if Assessment_Material == 13
    "Figure 10.16" if Assessment_Material == 14
    "Figure 10.17" if Assessment_Material == 15
    "Figure 10.18" if Assessment_Material == 16
    "Figure 10.19" if Assessment_Material == 17
    "Figure 10.20" if Assessment_Material == 18
    "Figure 10.21" if Assessment_Material == 19
    "Figure 10.22" if Assessment_Material == 20
    "Figure 10.23" if Assessment_Material == 21
    "Figure 10.24" if Assessment_Material == 22
    "Figure 10.25" if Assessment_Material == 23
    "Other" otherwise
Figture = "Figure 10.3"
# STEP 4 –Determine the maximum permissible time for operation.
# Interporation  the maximum permissible time.
# [component: outputs sc]
# [component: outputs da]
i_fig :=
    0 if Assessment_Material == 1
    1 if Assessment_Material == 2
    2 if Assessment_Material == 3
    3 if Assessment_Material == 4
    4 if Assessment_Material == 5
    5 if Assessment_Material == 6
    6 if Assessment_Material == 7
    7 if Assessment_Material == 8
    8 if Assessment_Material == 9
    9 if Assessment_Material == 10
    10 if Assessment_Material == 11
    11 if Assessment_Material == 12
    12 if Assessment_Material == 13
    13 if Assessment_Material == 14
    14 if Assessment_Material == 15
    15 if Assessment_Material == 16
    16 if Assessment_Material == 17
    17 if Assessment_Material == 18
    18 if Assessment_Material == 19
    19 if Assessment_Material == 20
    20 if Assessment_Material == 21
    21 if Assessment_Material == 22
    22 if Assessment_Material == 23
    "Other" otherwise
sc = [
    1873.35, 1793.79, 1556.66, 1469.24, 1160.81;
    1293.7, 1379.58, 1421.62, 1357.28, 1276.99;
    187125, 81434.5, 33658.5, 7353.95, 1980.13;
    18303.3, 45825.9, 43314, 76565, 75697.9;
    1965.99, 3552.73, 3051.31, 3991.18, 3946.79;
    499.911, 547.488, 594.707, 639.993, 628.803;
    1335.65, 1588.32, 2323.68, 7612.68, 24308;
    622.213, 603.563, 598.968, 649.088, 643.543;
    728.21, 1299.37, 1572.95, 1478.5, 2078.51;
    5193, 5599.78, 6367.86, 11881.2, 18904.7;
    435.276, 528.543, 598.239, 1071.64, 1712.8;
    24779.7, 22821.5, 30683.9, 70193.1, 315409;
    133061, 242535, 279689, 321744, 229269;
    108464, 124988, 135395, 215454, 353356;
    129517, 137249, 181379, 258539, 279992;
    38082.5, 50612.1, 57881.4, 86276.7, 216138;
    41781.2, 68325, 112174, 212150, 748462;
    55559.4, 118048, 210239, 607072, 2200220;
    20644.8, 44140.4, 77651.7, 172795, 699774;
    2609.52, 2323.59, 2537.61, 2619.81, 2152.61;
    1902.05, 1702.87, 1764.74, 2338.74, 1704.42;
    1384.62, 1474.22, 1406.44, 1649.33, 2400.26;
    2097.03, 2615.49, 3223.7, 3336.79, 10336.9
]
da = [
    -0.005348, -0.005508, -0.005633, -0.005976, -0.006158;
    -0.005313, -0.005595, -0.005888, -0.00627, -0.006659;
    -0.009076, -0.008519, -0.007957, -0.006847, -0.00585;
    -0.006649, -0.007818, -0.008082, -0.009217, -0.009764;
    -0.004781, -0.005479, -0.005553, -0.006134, -0.006475;
    -0.003111, -0.00332, -0.003557, -0.003856, -0.004058;
    -0.003968, -0.004272, -0.004834, -0.006376, -0.007975;
    -0.003379, -0.00346, -0.003583, -0.003887, -0.0041;
    -0.003176, -0.003914, -0.004261, -0.004431, -0.005075;
    -0.005376, -0.005614, -0.005947, -0.005947, -0.007732;
    -0.003649, -0.003954, -0.004245, -0.005067, -0.005837;
    -0.006018, -0.006082, -0.006526, -0.007568, -0.00932;
    -0.008052, -0.008817, -0.009228, -0.009763, -0.009843;
    -0.006645, -0.006972, -0.007321, -0.008142, -0.009018;
    -0.006166, -0.006446, -0.006973, -0.007709, -0.008298;
    -0.00647, -0.006952, -0.007357, -0.008136, -0.009453;
    -0.006443, -0.007062, -0.00778, -0.008781, -0.010364;
    -0.006992, -0.007872, -0.008674, -0.010101, -0.011789;
    -0.005831, -0.006673, -0.007432, -0.008595, -0.01032;
    -0.004301, -0.004368, -0.004622, -0.004937, -0.005104;
    -0.003831, -0.003907, -0.004124, -0.004594, -0.004671;
    -0.003566, -0.003744, -0.003889, -0.004253, -0.004802;
    -0.003817, -0.004125, -0.004479, -0.004839, -0.005975
]
T :=
    T_oper*1.8 + 32 if Unit_Temp == "oC"
    T_oper otherwise
s :=
    σ_max*145.038/1000 if Unit_Stress == "MPa"
    σ_max/1000 otherwise
sc[0, 3] = 1469.24
T_time := [
    ln(s/sc[i_fig, 0])/da[i_fig, 0];
    ln(s/sc[i_fig, 1])/da[i_fig, 1];
    ln(s/sc[i_fig, 2])/da[i_fig, 2];
    ln(s/sc[i_fig, 3])/da[i_fig, 3];
    ln(s/sc[i_fig, 4])/da[i_fig, 4]
]
T_time = [996.927; 960.088; 913.612; 851.503; 788.073]
T_oper = 950
UpperIndex :=
    UpperIndex ← 1
    for i ∈ 0 .. 3
        break if T > T_time[i] and T ≤ T_time[i + 1]
        otherwise
            {
                continue
            }
    UpperIndex ← i - 1
UpperIndex = 2
T_time = [996.927; 960.088; 913.612; 851.503; 788.073]
UpperIndex = 2
LowerIndex := UpperIndex - 1
LowerIndex = 1
T_low := T_time[LowerIndex]
t_low :=
    25 if LowerIndex == 0
    250 if LowerIndex == 1
    2500 if LowerIndex == 2
    25000 if LowerIndex == 3
    250000 otherwise
T_low = 960.088
t_low = 250
T_up := T_time[UpperIndex]
T_up = 913.612
t_up :=
    25 if UpperIndex == 0
    250 if UpperIndex == 1
    2500 if UpperIndex == 2
    25000 if UpperIndex == 3
    250000 otherwise
T = 950
t_up = 2500
T = 950
T_low = 960.088
t_permit :=
    T_p if Automatically_Calculation_The_Maximum_Permissible_Time == 0
    t_low + (t_up - t_low)/(T_up - T_low)*(T - T_low) otherwise
T_up = 913.612
t_permit = 738.393
Unit_Time = "Hrs"
Check_t_permit :=
    "Pass" if t_permit ≥ t_oper
    "Fail" otherwise
Check_t_permit = "Pass"
# STEP 5 –Determine the creep damage rate and associated creep damage.
# Interporation  the creep damage rate.
j_fig :=
    0 if Assessment_Material == 1
    2 if Assessment_Material == 2
    4 if Assessment_Material == 3
    6 if Assessment_Material == 4
    8 if Assessment_Material == 5
    10 if Assessment_Material == 6
    12 if Assessment_Material == 7
    14 if Assessment_Material == 8
    16 if Assessment_Material == 9
    18 if Assessment_Material == 10
    20 if Assessment_Material == 11
    22 if Assessment_Material == 12
    24 if Assessment_Material == 13
    26 if Assessment_Material == 14
    28 if Assessment_Material == 15
    30 if Assessment_Material == 16
    32 if Assessment_Material == 17
    34 if Assessment_Material == 18
    36 if Assessment_Material == 19
    38 if Assessment_Material == 20
    40 if Assessment_Material == 21
    42 if Assessment_Material == 22
    44 if Assessment_Material == 23
    "Other" otherwise
j_fig = 0
# [component: outputs d_a]
# [component: outputs d_b]
d_a =  # no stored result
d_b =  # no stored result
i := 0, 1 .. cols(d_a) - 1
T_D[i] := d_a[j_fig, i]
a[i] := d_a[j_fig + 1, i]
b[i] := d_b[j_fig + 1, i]
b = [51.0117; 47.2799; 43.0044; 34.6107; 34.6107; 29.2333; 24.5312; 20.8652; 17.278; 14.2819; 10.8419; 9.0136; 8.04292; 6.96562]
T_D = [700; 735; 770; 805; 840; 875; 910; 945; 980; 1015; 1050; 1085; 1120; 1055]
a = [2.32209; 2.26585; 2.18819; 2.08498; 1.8966; 1.62985; 1.37557; 1.20913; 0.995358; 0.843625; 0.59493; 0.509873; 0.47321; 0.425092]
T_D.c == [980; 1015; 1050; 1085; 1120; 1155]
R_temp == [
    exp(ln(σ_max/39.81477)/0.18050);
    exp(ln(σ_max/33.20035)/0.18250);
    exp(ln(σ_max/28.01903)/0.18514);
    exp(ln(σ_max/24.08736)/0.19068);
    exp(ln(σ_max/19.71634)/0.19043);
    exp(ln(σ_max/16.50019)/0.19265)
]
T :=
    T_oper*1.8 + 32 if Unit_Temp == "oC"
    T_oper otherwise
s :=
    σ_max*145.038/1000 if Unit_Stress == "MPa"
    σ_max/1000 otherwise
T = 950
UpperIndex :=
    UpperIndex ← 0
    for i ∈ 0 .. rows(T_D) - 1
        break if T > T_D[i] and T ≤ T_D[i + 1]
        otherwise
            {
                continue
            }
    UpperIndex ← i + 1
UpperIndex = 8
LowerIndex := UpperIndex - 1
LowerIndex = 7
T_D.c.low := T_D[LowerIndex]
T_D.c.low = 945
T_D.c.up := T_D[UpperIndex]
T_D.c.up = 980
R_temp.low := exp((s - b[LowerIndex])/a[LowerIndex])
R_temp.up := exp((s - b[UpperIndex])/a[UpperIndex])
R_temp.low = 5.75401e-5
R_temp.up = 0.000259743
R_c :=
    R_c if Automatically_Calculation_The_Creep_Damage_Rate == 0
    R_temp.low + (R_temp.up - R_temp.low)/(T_D.c.up - T_D.c.low)*(T - T_D.c.low) otherwise
R_c = 8.64262e-5
T_D.c.up - T_D.c.low = 35
T - T_D.c.low = 5
D_c := R_c*t_oper
D_c = 0.00172852
# STEP 6 – Evaluate the total creep damage
Check_D_c :=
    "Pass" if D_c ≤ 0.25
    "Fail" otherwise
Check_D_c = "Pass"
Result_Level1 :=
    "The Level 1 assessment criteria are satisfied." if Check_t_permit == "Pass" and Check_D_c == "Pass"
    "The Level 1 assessment criteria are not satisfied." otherwise
Result_Level1 = "The Level 1 assessment criteria are satisfied."
# -----------------------------------------------------------------------------------------------------------------------------------------------------------------------------------
# [area: Page7_Short Report_Level1]
# -----------------------------------------------------------------------------------------------------------------------------------------------------------------------------------
# File | Edit | Tool | View | Help
# -----------------------------------------------------------------------------------------------------------------------------------------------------------------------------------
# Equipment | Design | Material | Dimention | Load | Result | Save | Report | Close
Result := Result_Level1
Result = "The Level 1 assessment criteria are satisfied."
# [component: outputs Next]
# -----------------------------------------------------------------------------------------------------------------------------------------------------------------------------------
# [area: Page8_Long Report_Level1]
# ----------------------------------------------For Level 1---------------------------------------------------------------
EquipmentType = "Pipe Component"
Component_Type = 1
DesignCode = "ASME Section VIII Div.1"
Failure_Mode = "Creep Damage"
Methodology = "API 579-1/ASME FFS-1 2007 Fitness-For-Service"
# o ------------------------------------------------------------- o
# -
# -
# -
# -
# -
# -
# -
# -
# -
# -
# -
# -
# -
# -
# -
# -
# -
# -
# -
# -
# -
# -
# -
# -
# -
# -
# Picture
# Picture
# Picture
# o ------------------------------------------------------------- o
AssessmentLevel = "Level 1"
AnalysisBy = "TEST NAME"
AnalysisDate = "1/1/14"
AttachPicture = "TEST PICTURE"
AnalysisDetail = "FAILURE"
# -----------------------------------------------------------------------------------------------------------------------------------------------------------------------------------
# STEP 1 – Determine the maximum operating temperature, pressure, and service time the component is
# exposed to.
T_max = 975
Unit_Temp = "oF"
P_max = 82.6
Unit_Stress = "psi"
# STEP 2 – Determine the nominal stress of the component.
t_c = 0.275
Unit_Length = "in"
# Cylindrical shell circumferential membrane stress (A.11)
σ_m.c = 9060.47
Unit_Stress = "psi"
# Cylindrical shell longitudinal membrane stress (A.17)
σ_m.l = 4488.93
Unit_Stress = "psi"
σ_max = 9060.47
Unit_Stress = "psi"
# STEP 3 –Determine the material of construction for the component and find the figure with the screening
# and damage curves to be used for the Level 1 assessment from Figures 10.3 through 10.25.
Figture = "Figure 10.3"
# STEP 4 –Determine the maximum permissible time for operation.
# Interporation  the maximum permissible time.
t_permit = 738.393
Unit_Time = "Hrs"
Check_t_permit = "Pass"
# STEP 5 –Determine the creep damage rate and associated creep damage.
# Interporation  he creep damage rate.
R_c = 8.64262e-5
D_c = 0.00172852
# STEP 6 – Evaluate the total creep damage
Check_D_c = "Pass"
Result_Level1 = "The Level 1 assessment criteria are satisfied."
# [area: Calculation_Level2]
# -----------------------------------------------------------------------------------------------------------------------------------------------------------------------------------
# STEP 1 – Determine the CTP
CTP =  # error: This variable is undefined.
t_mm =  # error
Unit_Length = "in"
# Longitudinal CTP
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# Curcumferential CTP
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# STEP 2 – Determine the wall thickness to be used in the assessment
t_c = 0.275
Unit_Length = "in"
# STEP 3 – Determine the minimum measured thickness and the dimension s for CTP
t_mm =  # error
Unit_Length = "in"
s = 9.06047
Unit_Length = "in"
# STEP 4 –Determine the remaining thickness ratio
R_t =  # error
λ =  # error
# STEP 5 – Check the limiting flaw size criteria
Check_R_t =  # error
Check_L_msd =  # error
Check_t_mm =  # error
Check_flaw_long =  # error
# STEP 6  – Check the limiting groove size criteria
# This assessment only for Local Thin Area, LTA, not for Groove-Like Flaw
# STEP 7 – Determine the MAWP for the component
# Circumferential direction
MAWP_C =  # error
Unit_Stress = "psi"
# Longitudinal direction
MAWP_L =  # error
Unit_Stress = "psi"
MAWP =  # error
Unit_Stress = "psi"
# STEP 8 – Evaluate the result
Level1_ScreenCriteria =  # error
# Define the allowable remaining strength factor
# No. of data point
Num_L := cols(CTP)
Num_L =  # error
i := 0 .. cols(CTP) - 1
j := 0 .. rows(CTP) - 1
CTP =  # error
# Grid size (Longitudinal)
g_L =  # error
# Reading position
j := 1 .. Num_L
x[j] := g_L*(j - 1)
# Set minimum of longitudinal direction
CTP_L[i] := min(CTP[:, i])
CTP[:, 6] =  # error
CTP_L =  # error
t_mmL := min(CTP_L)
CTP_L := rank(CTP_L)
CTP_L =  # error
RSF_L :=
    for i ∈ 1 .. Num_L
        s_s[i] ← 2*g_L*i
        s_e[i] ← Num_L*g_L*(i - 1)
        s_i[i] ← s_e[i] - s_s[i]
        λ[i] ← 1.285*s_i[i]/sqrt(D*t_c)
        M_t[i] ←
            (1.0010 - 0.014195*λ[i] + 0.29090*λ[i]^2 - 0.096420*λ[i]^3 + 0.020890*λ[i]^4 - 0.0030540*λ[i]^5 + 2.9570*10^-4*λ[i]^6 - 1.8462*10^-5*λ[i]^7 + 7.1553*10^-7*λ[i]^8 - 1.5631*10^-8*λ[i]^9 + 1.4656*10^-10*λ[i]^10) if Component_Shape == 1
            (1.0005 + 0.49001*λ[i] + 0.32409*λ[i]^2)/(1.0 + 0.50144*λ[i] - 0.011067*λ[i]^2) if Component_Shape == 2
        A_i[i] ← s_i[i]*(t_c - t_mmL)
        A_0[i] ← s_i[i]*t_c
        rsf[i] ← (1 - A_i[i]/A_0[i])/(1 - 1/M_t[i]*A_i[i]/A_0[i])
    rsf
RSF_min := min(RSF_L)
RSF_min =  # error
MAWP_r =  # error
Unit_Stress = "psi"
Check_longitudinalflaw :=
    "Acceptable" if (Check_flaw_long == "Pass") and R_t ≥ R_t_Limit
    "Acceptable" if (Check_flaw_long == "Pass") and R_t < R_t_Limit and RSF ≥ RSF_a
    "Unacceptable, Rerate to MAWPr is necessary" otherwise
# ///////////////////////////////////////////////Do step 9 when Component_Shape is Cylindrical only///////////////////////////////////////////////
# STEP 9 – Evaluate the circumferential extent of the flaw
# STEP 9.1 – Determine the circumferential flaw length parameter
c = 299792458 m/s
Unit_Length = "in"
λ_c =  # error
# STEP 9.2 – Check the limiting circumferential flaw size criteria
Check_λ_c =  # error
Check_D_t_c =  # error
Check_RSF =  # error
# STEP 9.3 – Determine the tensile stress factor
TSF =  # error
Check_TSF =  # error
Check_flaw_cir =  # error
# Interpolate R.t from Table5_4
Table5_4 =  # error
UpperIndex = 8
LowerIndex := UpperIndex - 1
UpperIndex = 8
LowerIndex = 7
i := 2 .. 7
C_up[i] := Table5_4[i, UpperIndex]
C_lo[i] := Table5_4[i, LowerIndex]
R_t_up :=
    0.2 if λ_c ≤ Table5_4[2, UpperIndex]
    sum(C_up[i]/λ_c^(i - 1), i = 1 .. 6) otherwise
R_t_up =  # error
R_t_lo :=
    0.2 if λ_c ≤ Table5_4[2, LowerIndex]
    sum(C_lo[i]/λ_c^(i - 1), i = 1 .. 6) otherwise
R_t_lo =  # error
# Interpolate to determine minimum value of Rt
TSF_lo := Table5_4[0, LowerIndex]
TSF_up := Table5_4[0, UpperIndex]
R_t_cir := R_t_lo + (TSF - TSF_lo)/(TSF_up - TSF_lo)*(R_t_up - R_t_lo)
R_t_cir =  # error
Check_circumferentialflaw :=
    "Acceptable" if Check_flaw_cir == 1 and R_t ≥ R_t_cir
    "Unacceptable, Rerate to MAWPr is necessary" otherwise
Result_Level2 :=
    "The Level 2 assessment criteria are satisfied. The component is acceptable for continuation to operating." if Component_Shape == 1 and Check_longitudinalflaw == "Acceptable" and Check_circumferentialflaw == "Acceptable"
    "The Level 2 assessment criteria are  not satisfied. The longitudinal flaw is not acceptable for continuation to operating, then the component should rerate to MAWPr.   " if Component_Shape == 1 and Check_longitudinalflaw == "Unacceptable, Rerate to MAWPr is necessary" and Check_circumferentialflaw == "Acceptable"
    "The Level 2 assessment criteria are  not satisfied. The circumferential flaw is not acceptable for continuation to operating, then the component should rerate to MAWPr. " if Component_Shape == 1 and Check_longitudinalflaw == "Acceptable" and Check_circumferentialflaw == "Unacceptable, Rerate to MAWPr is necessary"
    "The Level 2 assessment criteria are satisfied. The component is acceptable for continuation to operating." if Component_Shape == 2 and Check_longitudinalflaw == "Acceptable"
    "The Level 2 assessment criteria are satisfied. The component is acceptable for continuation to operating, then the component should rerate to MAWPr." otherwise
Result_Level2 =  # error
# -----------------------------------------------------------------------------------------------------------------------------------------------------------------------------------
# [area: Page7_Short Report_Level2]
# -----------------------------------------------------------------------------------------------------------------------------------------------------------------------------------
# File | Edit | Tool | View | Help
# -----------------------------------------------------------------------------------------------------------------------------------------------------------------------------------
# Equipment | Design | Material | Dimention | Load | Result | Save | Report | Close
Result := Result_Level2
Result =  # error
# [component: outputs Next]
# -----------------------------------------------------------------------------------------------------------------------------------------------------------------------------------
# [area: Page8_Long Report_Level2]
# ----------------------------------------------For Level 1---------------------------------------------------------------
EquipmentType = "Pipe Component"
Component_Type = 1
DesignCode = "ASME Section VIII Div.1"
Failure_Mode = "Creep Damage"
Methodology = "API 579-1/ASME FFS-1 2007 Fitness-For-Service"
# o ------------------------------------------------------------- o
# -
# -
# -
# -
# -
# -
# -
# -
# -
# -
# -
# -
# -
# -
# -
# -
# -
# -
# -
# -
# -
# -
# -
# -
# -
# -
# Picture
# Picture
# Picture
# o ------------------------------------------------------------- o
AssessmentLevel = "Level 1"
AnalysisBy = "TEST NAME"
AnalysisDate = "1/1/14"
AttachPicture = "TEST PICTURE"
AnalysisDetail = "FAILURE"
# -----------------------------------------------------------------------------------------------------------------------------------------------------------------------------------
# STEP 1 – Determine the CTP
CTP =  # error
t_mm =  # error
Unit_Length = "in"
# Longitudinal CTP
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# Curcumferential CTP
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# STEP 2 – Determine the wall thickness to be used in the assessment
t_c = 0.275
Unit_Length = "in"
# STEP 3 – Determine the minimum measured thickness and the dimension s for CTP
t_mm =  # error
Unit_Length = "in"
s = 9.06047
Unit_Length = "in"
# STEP 4 –Determine the remaining thickness ratio
R_t =  # error
λ =  # error
# STEP 5 – Check the limiting flaw size criteria
Check_R_t =  # error
Check_L_msd =  # error
Check_t_mm =  # error
Check_flaw_long =  # error
# STEP 6  – Check the limiting groove size criteria
# This assessment only for Local Thin Area, LTA, not for Groove-Like Flaw
# STEP 7 – Determine the MAWP for the component
# Circumferential direction
MAWP_C =  # error
Unit_Stress = "psi"
# Longitudinal direction
MAWP_L =  # error
Unit_Stress = "psi"
MAWP =  # error
Unit_Stress = "psi"
# STEP 8 – Evaluate the result
# Define the allowable remaining strength factor
CTP_L =  # error
t_mmL =  # error
RSF_min =  # error
MAWP_r =  # error
Unit_Stress = "psi"
Check_longitudinalflaw =  # error
# ///////////////////////////////////////////////Do step 9 when Component_Shape is Cylindrical only///////////////////////////////////////////////
# STEP 9 – Evaluate the circumferential extent of the flaw
# STEP 9.1 – Determine the circumferential flaw length parameter
c = 299792458 m/s
Unit_Length = "in"
λ_c =  # error
# STEP 9.2 – Check the limiting circumferential flaw size criteria
Check_λ_c =  # error
Check_D_t_c =  # error
Check_RSF =  # error
# STEP 9.3 – Determine the tensile stress factor
TSF =  # error
Check_TSF =  # error
Check_flaw_cir =  # error
# Interpolate R.t from Table5_4
Table5_4 =  # error
# Interpolate to determine minimum value of Rt
R_t_cir =  # error
Check_circumferentialflaw =  # error
Result_Level2 =  # error
# -----------------------------------------------------------------------------------------------------------------------------------------------------------------------------------
