# [area: Page1_Home]
# -----------------------------------------------------------------------------------------------------------------------------------------------------------------------------------
# File | Edit | Tool | View | Help
# -----------------------------------------------------------------------------------------------------------------------------------------------------------------------------------
# Failure Mode
# Which assessment do you choose?
# Brittle Fracture | General Metal Loss | Local Metal Loss
# Pitting Corrosion | Crack-like Flaw | Creep Rupture
# [component: outputs Next]
# -----------------------------------------------------------------------------------------------------------------------------------------------------------------------------------
# Code
Failure_Mode := "General Metal Loss "
# [area: Page2_Equipment]
# -----------------------------------------------------------------------------------------------------------------------------------------------------------------------------------
# File | Edit | Tool | View | Help
# -----------------------------------------------------------------------------------------------------------------------------------------------------------------------------------
# Equipment | Design | Material | Dimention | Load | Result | Save | Report | Close
# Equipment Data
# [component: outputs Equipment_Type]
# [component: outputs Faillure_Mode]
# [component: outputs Methodology]
# [component: outputs Unit]
# [component: outputs Assessment_Level]
# //Level 3 not active now
# [component: outputs Analysis_By]
# [component: outputs Analysis_Date]
# [component: outputs Attach_Picture]
# [component: outputs Analysis_Detail]
# [component: outputs Next]
# -----------------------------------------------------------------------------------------------------------------------------------------------------------------------------------
# Code
# //Unit
Unit_Length :=
    "mm" if Unit == 1
    "in" if Unit == 2
Unit_Length = "in"
Unit_Stress :=
    "MPa" if Unit == 1
    "psi" if Unit == 2
Unit_Stress = "psi"
Unit_Temp :=
    "oC" if Unit == 1
    "oF" if Unit == 2
Unit_Temp = "oF"
Unit_Time := "Hrs"
Unit_Time = "Hrs"
# //Equipment Type
EquipmentType :=
    "Pipe Component" if Equipment_Type == 1
    "Pressure Vessel" if Equipment_Type == 2
    "Atmospheric Storage Tank" otherwise
EquipmentType = "Pressure Vessel"
# // Failure Mode
FaillureMode :=
    "Brittle Fracture" if Faillure_Mode == 1
    "General Metal Loss " if Faillure_Mode == 2
    "Local Metal Loss" if Faillure_Mode == 3
    "Pitting Corrosion " if Faillure_Mode == 4
    "Crack-like Flaw" if Faillure_Mode == 5
    "Creep Rupture" otherwise
FaillureMode = "Brittle Fracture"
# //Methodology
Methodology :=
    "API 579-1/ASME FFS-1 2007 Fitness-For-Service" if Methodology == 1
    "Other" otherwise
Methodology = "API 579-1/ASME FFS-1 2007 Fitness-For-Service"
# //Assessment Level
AssessmentLevel :=
    "Level 1" if Assessment_Level == 1
    "Level 2" if Assessment_Level == 2
    "Level 3" otherwise
AssessmentLevel = "Level 2"
# //Analysis By
AnalysisBy := Analysis_By
AnalysisBy = "TEST NAME"
# //Analysis Date
AnalysisDate := Analysis_Date
AnalysisDate = "1/1/14"
# //Attach Picture
AttachPicture := Attach_Picture
AttachPicture = "TEST PICTURE"
# //Analysis Detail
AnalysisDetail := Analysis_Detail
AnalysisDetail = "FAILURE"
# [area: Page3_Design]
# -----------------------------------------------------------------------------------------------------------------------------------------------------------------------------------
# File | Edit | Tool | View | Help
# -----------------------------------------------------------------------------------------------------------------------------------------------------------------------------------
# Equipment | Design | Material | Dimention | Load | Result | Save | Report | Close
# Design Data
# [component: outputs Component_Type]
# // if Equipment_Type = Pipe Component
# Component_Type = - Straight Pipe
# //if Equipment_Type = Pressure Vessel
# Component_Type = - Cylindical Shell
# - Spherical Shell
# - Hemispherical Head
# //if Equipment_Type = Atmospheric Storage Tank
# Component_Type = - Storage Tank
# [component: outputs Component_Shape]
# [component: outputs Design_Code]
# // if Equipment_Type = Pipe Component
# Design_Code =
# - ASME B31.3
# -Other
# //if Equipment_Type = Pressure Vessel
# Design_Code =
# - ASME Section VIII Div.1
# - ASME Section VIII Div.2
# -Other
# //if Equipment_Type = Atmospheric Storage Tank
# Design_Code =
# - API 620
# -Other
# [component: outputs Pressure_Design]
Unit_Stress = "psi"
# [component: outputs Temperature_Design]
Unit_Temp = "oF"
# [component: outputs Inside_Diameter]
Unit_Length = "in"
# [component: outputs Nominal_Thickness]
Unit_Length = "in"
# [component: outputs Future_Corrosion_Allowance]
Unit_Length = "in"
# [component: outputs Uniform_Metal_Loss]
Unit_Length = "in"
# [component: outputs Weld_Efficiency]
# [component: outputs Automaticcally_Allowable_RSF]
# {for Level 2 only }
# [component: outputs Allowable_RSF]
# {for Level 2 only }
# [component: outputs Next]
# ----------------------------------------------------------------------------------------------------------------------------------------------------------------------------
# Code
ComponentShape :=
    "Cylindical" if Component_Shape == 1
    "Sphericall" otherwise
ComponentShape = "Cylindical"
DesignCode :=
    "ASME Section VIII Div.1" if Design_Code == 1
    "ASME Section VIII Div.2" if Design_Code == 2
    "ASME B31.3" if Design_Code == 3
    "API 620" if Design_Code == 3
    "Other" otherwise
DesignCode = "ASME Section VIII Div.1"
P_design := str2num(Pressure_Design)
P_design = 315
T_design := str2num(Temperature_Design)
T_design = 800
D := str2num(Inside_Diameter)
D = 150
t_nom := str2num(Nominal_Thickness)
t_nom = 0.5625
FCA := str2num(Future_Corrosion_Allowance)
FCA = 0.0625
LOSS := str2num(Uniform_Metal_Loss)
LOSS = 0.3
R := D/2 + FCA + LOSS
R = 75.3625
E := str2num(Weld_Efficiency)
E = 0.85
RSF_a :=
    str2num(Allowable_RSF) if Automaticcally_Allowable_RSF == 1
    0.9 otherwise
RSF_a = 0.9
# [area: Page4_Material]
# -----------------------------------------------------------------------------------------------------------------------------------------------------------------------------------
# File | Edit | Tool | View | Help
# -----------------------------------------------------------------------------------------------------------------------------------------------------------------------------------
# Equipment | Design | Material | Dimention | Load | Result | Save | Report | Close
# Material Data
# [component: outputs Material_Specification]
# [component: outputs Material_Name]
# {active when Material_Specification = Other}
# [component: outputs Automatically_Calculation_Allowable_Stress]
# [component: outputs Allowable_Stress]
Unit_Stress = "psi"  # {not active if tick "Automatically_Calculation_Allowable_Stress"}
# [component: outputs Ultimated_Tensile_Strength]
Unit_Stress = "psi"  # {active when tick "Automatically_Calculation_Allowable_Stress"}
# [component: outputs Yield_Stresngth]
Unit_Stress = "psi"  # {active when tick "Automatically_Calculation_Allowable_Stress"}
# [component: outputs Next]
# -----------------------------------------------------------------------------------------------------------------------------------------------------------------------------------
# Code
Material :=
    Material_Name if Material_Specification == 3
    "test material" otherwise
S_utm := str2num(Ultimated_Tensile_Strength)
S_utm = 1
S_y := str2num(Yield_Stresngth)
S_y = 1
S_allow :=
    str2num(Allowable_Stress) if Automatically_Calculation_Allowable_Stress == 0
    min(0.85/3.5*S_utm, 2/3*0.85*S_y) otherwise  # //reference: TABLE 1-100 ASME SEC II-D-2010
S_allow = 16250
# [area: Page5_Flaw]
# -----------------------------------------------------------------------------------------------------------------------------------------------------------------------------------
# File | Edit | Tool | View | Help
# -----------------------------------------------------------------------------------------------------------------------------------------------------------------------------------
# Equipment | Design | Material | Dimention | Load | Result | Save | Report | Close
# Flaw Data
# [component: outputs Material_Group]
# {Select Material_Group}
# [component: outputs Heat_Exposure_Zone]
# Field Observation
# {for Level 1 assessent only}
# [component: outputs Leak]
# {description:Inspection gasket and leak checking of flange joint before start up}
# [component: outputs Coat]
# {description:Protecting coating for external and internal corrosion resistance}
# [component: outputs Damage]
# {description:There is no mechanical damage or dimensional deviation}
# {for Level 2 assessent only}
# [component: outputs Vickers Hardness No]
# [component: outputs Allowable Stress]
# [component: outputs Next]
# -----------------------------------------------------------------------------------------------------------------------------------------------------------------------------------
# Code
HEZ :=
    "Zone I Ambient Temperaute" if Heat_Exposure_Zone == 1
    "Zone II Ambient to 65 oC (150oF)" if Heat_Exposure_Zone == 2
    "Zone III Over 65 oC (150oF) to 205 oC (400 oF)" if Heat_Exposure_Zone == 3
    "Zone IV Over 205 oC (400oF) to 425 oC (800 oF)" if Heat_Exposure_Zone == 4
    "Zone V Over 425 oC (800oF) to 730 oC (1350 oF)" if Heat_Exposure_Zone == 2
    "Zone VI Over 730 oC (1350 oF)" otherwise
HEZ = "Zone I Ambient Temperaute"
Mat :=
    "Carbon Steels" if Material_Group == 1
    "Low Alloy Steels" if Material_Group == 2
    "Austenitic Stainless Steels" if Material_Group == 3
    "Duplex Stainless Steels" if Material_Group == 4
    "Precipitation Hardened Alloy Steels" if Material_Group == 5
    "Alloy C-276" if Material_Group == 6
    "Alloy 20" if Material_Group == 7
    "Alloy 400" if Material_Group == 8
    "Alloy 600" if Material_Group == 9
    "Alloy 625" if Material_Group == 10
    "Alloy 800" if Material_Group == 11
    "Alloy 800H" if Material_Group == 12
    "Alloy 825" if Material_Group == 13
    "Alloy 2205" if Material_Group == 14
    "Alloy 2207" if Material_Group == 15
    "Copper Alloys" if Material_Group == 16
    "Aluminum Alloys" otherwise
Mat = "Carbon Steels"
VH := str2num(Vickers Hardness No)
VH = 132
S_aA := str2num(Allowable Stress)
S_aA = 17500
Unit_Stress = "psi"
# [area: Page6_Load]
# -----------------------------------------------------------------------------------------------------------------------------------------------------------------------------------
# File | Edit | Tool | View | Help
# -----------------------------------------------------------------------------------------------------------------------------------------------------------------------------------
# Equipment | Design | Material | Dimention | Load | Result | Save | Report | Close
# Load Data
# [component: outputs Operating_Pressure]
Unit_Stress = "psi"
# [component: outputs Ecxternal_Pressure]
# //not active now
# [component: outputs Operating_Temperature]
Unit_Temp = "oF"
# [component: outputs Next]
# -----------------------------------------------------------------------------------------------------------------------------------------------------------------------------------
# Code
P_oper := str2num(Operating_Pressure)
P_oper = 1
Unit_Stress = "psi"
T_oper := str2num(Operating_Temperature)
T_oper = 1
Unit_Stress = "psi"
# [area: Calculation Level1]
# STEP 1 – Assign the component to the Heat Exposure Zone
Material_Group = 1
HEZ = "Zone I Ambient Temperaute"
HEZ_value :=
    1 if HEZ == "Zone I Ambient Temperaute"
    2 if HEZ == "Zone II Ambient to 65 oC (150oF)"
    3 if HEZ == "Zone III Over 65 oC (150oF) to 205 oC (400 oF)"
    4 if HEZ == "Zone IV Over 205 oC (400oF) to 425 oC (800 oF)"
    5 if HEZ == "Zone V Over 425 oC (800oF) to 730 oC (1350 oF)"
    6 otherwise
HEZ_value = 1
Allowable_HEZ :=
    "Zone IV Over 205 oC (400oF) to 425 oC (800 oF)" if Material_Group == 1
    "Zone IV Over 205 oC (400oF) to 425 oC (800 oF)" if Material_Group == 2
    "Zone IV Over 205 oC (400oF) to 425 oC (800 oF)" if Material_Group == 3
    "Zone II Ambient to 65 oC (150oF)" if Material_Group == 4
    "Zone III Over 65 oC (150oF) to 205 oC (400 oF)" if Material_Group == 5
    "Zone IV Over 205 oC (400oF) to 425 oC (800 oF)" if Material_Group == 6
    "Zone IV Over 205 oC (400oF) to 425 oC (800 oF)" if Material_Group == 7
    "Zone III Over 65 oC (150oF) to 205 oC (400 oF)" if Material_Group == 8
    "Zone IV Over 205 oC (400oF) to 425 oC (800 oF)" if Material_Group == 9
    "Zone IV Over 205 oC (400oF) to 425 oC (800 oF)" if Material_Group == 10
    "Zone IV Over 205 oC (400oF) to 425 oC (800 oF)" if Material_Group == 11
    "Zone IV Over 205 oC (400oF) to 425 oC (800 oF)" if Material_Group == 12
    "Zone IV Over 205 oC (400oF) to 425 oC (800 oF)" if Material_Group == 13
    "Zone II Ambient to 65 oC (150oF)" if Material_Group == 14
    "Zone II Ambient to 65 oC (150oF)" if Material_Group == 15
    "Zone II Ambient to 65 oC (150oF)" if Material_Group == 16
    "Zone II Ambient to 65 oC (150oF)" otherwise
Allowable_HEZ_value :=
    1 if Allowable_HEZ == "Zone I Ambient Temperaute"
    2 if Allowable_HEZ == "Zone II Ambient to 65 oC (150oF)"
    3 if Allowable_HEZ == "Zone III Over 65 oC (150oF) to 205 oC (400 oF)"
    4 if Allowable_HEZ == "Zone IV Over 205 oC (400oF) to 425 oC (800 oF)"
    5 if Allowable_HEZ == "Zone V Over 425 oC (800oF) to 730 oC (1350 oF)"
    6 otherwise
Allowable_HEZ_value = 4
# STEP 2 – Observation information.
Check_Leak :=
    "Pass" if Leak == 1
    "Fail" otherwise
Allowable_HEZ_value = 4
Check_Leak = "Pass"
Check_Coat :=
    "Pass" if Coat == 1
    "Fail" otherwise
HEZ_value = 1
Check_Coat = "Pass"
Check_Damage :=
    "Pass" if Damage == 1
    "Fail" otherwise
Check_Damage = "Pass"
# STEP 3 – Evaluate damage.
Result_Level1 :=
    "The Level 1 assessment criteria are not satisfied." if Check_Leak == "Fail" or Check_Coat == "Fail" or Check_Damage == "Fail" or HEZ_value ≥ Allowable_HEZ_value
    "The Level 1 assessment criteria are satisfied." otherwise
Result_Level1 == {
    "The Level 1 assessment criteria are not satisfied." if □ □ □ or □ or Allowable_HEZ_value ≥ Allowable_HEZ_value
    "The Level 1 assessment criteria are satisfied." otherwise
}
Result_Level1 = "The Level 1 assessment criteria are satisfied."
# [area: Short Report Level1]
Result_Level1 = "The Level 1 assessment criteria are satisfied."
# [area: Long Report Level1]
EquipmentType = "Pressure Vessel"
Component_Type = 1
DesignCode = "ASME Section VIII Div.1"
Failure_Mode = "General Metal Loss "
Methodology = "API 579-1/ASME FFS-1 2007 Fitness-For-Service"
# o ------------------------------------------------------------- o
# -
# -
# -
# -
# -
# -
# -
# -
# -
# -
# -
# -
# -
# -
# -
# -
# -
# -
# -
# -
# -
# -
# -
# -
# -
# -
# Picture
# Picture
# Picture
# o ------------------------------------------------------------- o
AssessmentLevel = "Level 2"
AnalysisBy = "TEST NAME"
AnalysisDate = "1/1/14"
AttachPicture = "TEST PICTURE"
AnalysisDetail = "FAILURE"
# STEP 1 – Assign the component to the Heat Exposure Zone
Mat = "Carbon Steels"
HEZ = "Zone I Ambient Temperaute"
Allowable_HEZ = "Zone IV Over 205 oC (400oF) to 425 oC (800 oF)"
# STEP 2 – Observation information.
Check_Leak = "Pass"
Check_Coat = "Pass"
Check_Damage = "Pass"
# STEP 3 – Evaluate damage.
Result_Level1 = "The Level 1 assessment criteria are satisfied."
# [area: Calculation Level 2]
# STEP 1 – Hardness Test Results.
VH = 132
# STEP 2 – Determine an allowable stress based on the material strength.
S_uts_ht(x) :=
    3.3056123079*x - 27.633825863 if Unit_Stress == "MPa"
    (3.3056123079*x - 27.633825863)*145.038 otherwise
S_uts_ht(VH) = 59278
S_uts_ht := S_uts_ht(VH)
S_uts_ht = 59278
Unit_Stress = "psi"
C_ism := 4.0
S_aA = 17500
Unit_Stress = "psi"
S_aT := S_allow
S_aT = 16250
Unit_Stress = "psi"
S_afd := min((S_uts_ht/C_ism)*(S_aT/S_aA), S_aT)
S_afd = 13761
Unit_Stress = "psi"
# STEP 3 – Determine the wall thickness to be used in the assessment.
D = 150
Unit_Length = "in"
FCA = 0.0625
Unit_Length = "in"
LOSS = 0.3
Unit_Length = "in"
t_nom = 0.5625
Unit_Length = "in"
t_c := t_nom - FCA - LOSS
t_c = 0.2
Unit_Length = "in"
# STEP 4 – Determine the MAWP for the component.
P_design = 315
Unit_Stress = "psi"
MAWP_C := S_afd*E*t_c/(R + 0.6*t_c)
MAWP_C = 30.9922
Unit_Stress = "psi"
MAWP_L := 2*S_afd*E*t_c/(R - 0.4*t_c)
MAWP_L = 62.149
Unit_Stress = "psi"
MAWP := min(MAWP_C, MAWP_L)
MAWP = 30.9922
Unit_Stress = "psi"
# STEP 6 – Evaluation Result.
Damage = 1
Result_Level2 :=
    "The Level 2 assessment criteria are not satisfied." if P_design ≤ MAWP
    "The Level 2 assessment criteria are satisfied." otherwise
P_design = 315
Result_Level2 = "The Level 2 assessment criteria are satisfied."
# [area: Short Report Level 2]
Result_Level2 = "The Level 2 assessment criteria are satisfied."
# [area: Long Report Level 2]
# -----------------------------------------------------------------------------------------------------------------------------------------------------------------------------------
# HIC Assessment Procedure
# -----------------------------------------------------------------------------------------------------------------------------------------------------------------------------------
EquipmentType = "Pressure Vessel"
Component_Type = 1
DesignCode = "ASME Section VIII Div.1"
Failure_Mode = "General Metal Loss "
Methodology = "API 579-1/ASME FFS-1 2007 Fitness-For-Service"
# o ------------------------------------------------------------- o
# -
# -
# -
# -
# -
# -
# -
# -
# -
# -
# -
# -
# -
# -
# -
# -
# -
# -
# -
# -
# -
# -
# -
# -
# -
# -
# Picture
# Picture
# Picture
# o ------------------------------------------------------------- o
AssessmentLevel = "Level 2"
AnalysisBy = "TEST NAME"
AnalysisDate = "1/1/14"
AttachPicture = "TEST PICTURE"
AnalysisDetail = "FAILURE"
# STEP 1 – Hardness Test Results.
VH = 132
# STEP 2 – Determine an allowable stress based on the material strength.
S_afd = 13761
Unit_Stress = "psi"
# STEP 3 – Determine the wall thickness to be used in the assessment.
t_c = 0.2
Unit_Length = "in"
# STEP 4 – Determine the MAWP for the component.
P_design = 315
Unit_Stress = "psi"
Unit_Stress = "psi"
MAWP = 30.9922
# STEP 6 – Evaluation Result.
Result_Level2 = "The Level 2 assessment criteria are satisfied."
