# [area: Page1_Home]
# -----------------------------------------------------------------------------------------------------------------------------------------------------------------------------------
# File | Edit | Tool | View | Help
# -----------------------------------------------------------------------------------------------------------------------------------------------------------------------------------
# Failure Mode
# Which assessment do you choose?
# Brittle Fracture | General Metal Loss | Local Metal Loss
# Pitting Corrosion | Crack-like Flaw | Creep Rupture
# [component: outputs Next]
# -----------------------------------------------------------------------------------------------------------------------------------------------------------------------------------
# Code
Failure_Mode := "General Metal Loss "
# [area: Page2_Equipment]
# -----------------------------------------------------------------------------------------------------------------------------------------------------------------------------------
# File | Edit | Tool | View | Help
# -----------------------------------------------------------------------------------------------------------------------------------------------------------------------------------
# Equipment | Design | Material | Dimention | Load | Result | Save | Report | Close
# Equipment Data
# [component: outputs Equipment_Type]
# [component: outputs Faillure_Mode]
# [component: outputs Methodology]
# [component: outputs Unit]
# [component: outputs Assessment_Level]
# //Level 3 not active now
# [component: outputs Analysis_By]
# [component: outputs Analysis_Date]
# [component: outputs Attach_Picture]
# [component: outputs Analysis_Detail]
# [component: outputs Next]
# -----------------------------------------------------------------------------------------------------------------------------------------------------------------------------------
# Code
# //Unit
Unit_Length :=
    "mm" if Unit == 1
    "in" if Unit == 2
Unit_Length = "mm"
Unit_Stress :=
    "MPa" if Unit == 1
    "psi" if Unit == 2
Unit_Stress = "MPa"
Unit_Temp :=
    "oC" if Unit == 1
    "oF" if Unit == 2
Unit_Temp = "oC"
Unit_Time := "Hrs"
Unit_Time = "Hrs"
# //Equipment Type
EquipmentType :=
    "Pipe Component" if Equipment_Type == 1
    "Pressure Vessel" if Equipment_Type == 2
    "Atmospheric Storage Tank" otherwise
EquipmentType = "Pressure Vessel"
# // Failure Mode
FaillureMode :=
    "Brittle Fracture" if Faillure_Mode == 1
    "General Metal Loss " if Faillure_Mode == 2
    "Local Metal Loss" if Faillure_Mode == 3
    "Pitting Corrosion " if Faillure_Mode == 4
    "Crack-like Flaw" if Faillure_Mode == 5
    "Creep Rupture" otherwise
FaillureMode = "Brittle Fracture"
# //Methodology
Methodology :=
    "API 579-1/ASME FFS-1 2007 Fitness-For-Service" if Methodology == 1
    "Other" otherwise
Methodology = "API 579-1/ASME FFS-1 2007 Fitness-For-Service"
# //Assessment Level
AssessmentLevel :=
    "Level 1" if Assessment_Level == 1
    "Level 2" if Assessment_Level == 2
    "Level 3" otherwise
AssessmentLevel = "Level 1"
# //Analysis By
AnalysisBy := Analysis_By
AnalysisBy = "TEST NAME"
# //Analysis Date
AnalysisDate := Analysis_Date
AnalysisDate = "1/1/14"
# //Attach Picture
AttachPicture := Attach_Picture
AttachPicture = "TEST PICTURE"
# //Analysis Detail
AnalysisDetail := Analysis_Detail
AnalysisDetail = "FAILURE"
# [area: Page3_Design]
# -----------------------------------------------------------------------------------------------------------------------------------------------------------------------------------
# File | Edit | Tool | View | Help
# -----------------------------------------------------------------------------------------------------------------------------------------------------------------------------------
# Equipment | Design | Material | Dimention | Load | Result | Save | Report | Close
# Design Data
# [component: outputs Component_Type]
# // if Equipment_Type = Pipe Component
# Component_Type = - Straight Pipe
# //if Equipment_Type = Pressure Vessel
# Component_Type = - Cylindical Shell
# - Spherical Shell
# - Hemispherical Head
# //if Equipment_Type = Atmospheric Storage Tank
# Component_Type = - Storage Tank
# [component: outputs Component_Shape]
# [component: outputs Design_Code]
# // if Equipment_Type = Pipe Component
# Design_Code =
# - ASME B31.3
# -Other
# //if Equipment_Type = Pressure Vessel
# Design_Code =
# - ASME Section VIII Div.1
# - ASME Section VIII Div.2
# -Other
# //if Equipment_Type = Atmospheric Storage Tank
# Design_Code =
# - API 620
# -Other
# [component: outputs Pressure_Design]
Unit_Stress = "MPa"
# [component: outputs Temperature_Design]
Unit_Temp = "oC"
# [component: outputs Inside_Diameter]
Unit_Length = "mm"
# [component: outputs Nominal_Thickness]
Unit_Length = "mm"
# [component: outputs Future_Corrosion_Allowance]
Unit_Length = "mm"
# [component: outputs Uniform_Metal_Loss]
Unit_Length = "mm"
# [component: outputs Weld_Efficiency]
# [component: outputs Automaticcally_Allowable_RSF]
# {for Level 2 only }
# [component: outputs Allowable_RSF]
# {for Level 2 only }
# [component: outputs Next]
# ----------------------------------------------------------------------------------------------------------------------------------------------------------------------------
# Code
ComponentShape :=
    "Cylindical" if Component_Shape == 1
    "Sphericall" otherwise
ComponentShape = "Cylindical"
DesignCode :=
    "ASME Section VIII Div.1" if Design_Code == 1
    "ASME Section VIII Div.2" if Design_Code == 2
    "ASME B31.3" if Design_Code == 3
    "API 620" if Design_Code == 3
    "Other" otherwise
DesignCode = "ASME Section VIII Div.1"
P_design := str2num(Pressure_Design)
P_design = 5
T_design := str2num(Temperature_Design)
T_design = 0
D := str2num(Inside_Diameter)
D = 483
t_nom := str2num(Nominal_Thickness)
t_nom = 12.7
FCA := str2num(Future_Corrosion_Allowance)
FCA = 0.5
LOSS := str2num(Uniform_Metal_Loss)
LOSS = 0.03
R := D/2 + FCA + LOSS
R = 242.03
E := str2num(Weld_Efficiency)
E = 1
RSF_a :=
    str2num(Allowable_RSF) if Automaticcally_Allowable_RSF == 1
    0.9 otherwise
RSF_a = 0.9
# [area: Page4_Material]
# -----------------------------------------------------------------------------------------------------------------------------------------------------------------------------------
# File | Edit | Tool | View | Help
# -----------------------------------------------------------------------------------------------------------------------------------------------------------------------------------
# Equipment | Design | Material | Dimention | Load | Result | Save | Report | Close
# Material Data
# [component: outputs Material_Specification]
# [component: outputs Material_Name]
# {active when Material_Specification = Other}
# [component: outputs Automatically_Calculation_Allowable_Stress]
# [component: outputs Allowable_Stress]
Unit_Stress = "MPa"  # {not active if tick "Automatically_Calculation_Allowable_Stress"}
# [component: outputs Ultimated_Tensile_Strength]
Unit_Stress = "MPa"  # {active when tick "Automatically_Calculation_Allowable_Stress" and Level 2}
# [component: outputs Yield_Stresngth]
Unit_Stress = "MPa"  # {active when tick "Automatically_Calculation_Allowable_Stress"}
# [component: outputs Next]
# -----------------------------------------------------------------------------------------------------------------------------------------------------------------------------------
# Code
Material :=
    Material_Name if Material_Specification == 3
    "test material" otherwise
S_utm := str2num(Ultimated_Tensile_Strength)
S_utm = 414
S_y := str2num(Yield_Stresngth)
S_y = 1
S_allow :=
    str2num(Allowable_Stress) if Automatically_Calculation_Allowable_Stress == 0
    min(0.85/3.5*S_utm, 2/3*0.85*S_y) otherwise  # //reference: TABLE 1-100 ASME SEC II-D-2010
S_allow = 137.9
# [area: Page5_Flaw]
# -----------------------------------------------------------------------------------------------------------------------------------------------------------------------------------
# File | Edit | Tool | View | Help
# -----------------------------------------------------------------------------------------------------------------------------------------------------------------------------------
# Equipment | Design | Material | Dimention | Load | Result | Save | Report | Close
# Flaw Data
# {for Level 1 and 2}
# Flaw Dimension
# [component: outputs Dent Depth]
Unit_Length = "mm"
# Flaw to Facility
# [component: outputs Weld Joint]
Unit_Length = "mm"
# [component: outputs Major Structural Discontinuity]
Unit_Length = "mm"
# {for Level 2 only}
# [component: outputs Number of Cycle]
# [component: outputs Max Operating Pressure]
Unit_Stress = "MPa"
# [component: outputs Min Operating Pressure]
Unit_Stress = "MPa"
# [component: outputs Next]
# -----------------------------------------------------------------------------------------------------------------------------------------------------------------------------------
# Code
d_dp := str2num(Dent Depth)
d_dp = 25.4
Unit_Length = "mm"
L_w := str2num(Weld Joint)
L_w = 300
Unit_Length = "mm"
L_msd := str2num(Major Structural Discontinuity)
L_msd = 1000
Unit_Length = "mm"
N_oper := str2num(Number of Cycle)
N_oper = 500000
P_max := str2num(Max Operating Pressure)
P_max = 5
Unit_Stress = "MPa"
P_min := str2num(Min Operating Pressure)
P_min = 0
Unit_Stress = "MPa"
# [area: Page6_Load]
# -----------------------------------------------------------------------------------------------------------------------------------------------------------------------------------
# File | Edit | Tool | View | Help
# -----------------------------------------------------------------------------------------------------------------------------------------------------------------------------------
# Equipment | Design | Material | Dimention | Load | Result | Save | Report | Close
# Load Data
# [component: outputs Operating_Pressure]
Unit_Stress = "MPa"
# [component: outputs Ecxternal_Pressure]
# //not active now
# [component: outputs Operating_Temperature]
Unit_Temp = "oC"
# [component: outputs Next]
# -----------------------------------------------------------------------------------------------------------------------------------------------------------------------------------
# Code
P_oper := str2num(Operating_Pressure)
P_oper = 5
Unit_Stress = "MPa"
T_oper := str2num(Operating_Temperature)
T_oper = 0
Unit_Stress = "MPa"
# [area: Calculation Level1]
# STEP 1 – Determine the assessment parameters.
Unit_Length = "mm"
D = 483
Unit_Length = "mm"
FCA = 0.5
t_nom = 12.7
Unit_Length = "mm"
LOSS = 0.03
Unit_Length = "mm"
# STEP 2 – Determine the wall thickness to be used in the assessment.
t_c := t_nom - FCA - LOSS
t_c = 12.17
Unit_Length = "mm"
# STEP 3 –  Evaluation the dimension of Dent.
# Clasify the Dent damage
Flaw :=
    "Pass" if d_dp ≤ 1.8*sqrt(D*t_c)
    "Fail" otherwise
Flaw = "Pass"
# Check the distance between the edge of the HIC damage and the nearest weld seam.
Facility :=
    "Pass" if (L_w > max(2*t_c, 25)) and (L_msd ≥ 1.8*sqrt(D*t_c)) and Unit_Length == "mm"
    "Pass" if (L_w > max(2*t_c, 1.0)) and (L_msd ≥ 1.8*sqrt(D*t_c)) and Unit_Length == "in"
    "Fail" otherwise
Facility = "Pass"
# STEP 4 – Determine the MAWP for the component.
P_design = 5
Unit_Stress = "MPa"
MAWP_C := S_allow*E*t_c/(R + 0.6*t_c)
MAWP_C = 6.73096
Unit_Stress = "MPa"
MAWP_L := 2*S_allow*E*t_c/(R - 0.4*t_c)
MAWP_L = 14.1527
Unit_Stress = "MPa"
MAWP := min(MAWP_C, MAWP_L)
MAWP = 6.73096
Unit_Stress = "MPa"
# STEP 5 – Evaluate damage.
Result_Level1 :=
    "The Level 1 assessment criteria are not satisfied." if Facility == "Fail" or Flaw == "Fail" or P_design > MAWP
    "The Level 1 assessment criteria are satisfied." otherwise
Result_Level1 = "The Level 1 assessment criteria are satisfied."
# [area: Short Report Level1]
Result_Level1 = "The Level 1 assessment criteria are satisfied."
# [area: Long Report Level1]
EquipmentType = "Pressure Vessel"
Component_Type = 1
DesignCode = "ASME Section VIII Div.1"
Failure_Mode = "General Metal Loss "
Methodology = "API 579-1/ASME FFS-1 2007 Fitness-For-Service"
# o ------------------------------------------------------------- o
# -
# -
# -
# -
# -
# -
# -
# -
# -
# -
# -
# -
# -
# -
# -
# -
# -
# -
# -
# -
# -
# -
# -
# -
# -
# -
# Picture
# Picture
# Picture
# o ------------------------------------------------------------- o
AssessmentLevel = "Level 1"
AnalysisBy = "TEST NAME"
AnalysisDate = "1/1/14"
AttachPicture = "TEST PICTURE"
AnalysisDetail = "FAILURE"
# STEP 1 – Assign the component to the Heat Exposure Zone
Mat =  # error: This variable is undefined.
HEZ =  # error
Allowable_HEZ =  # error
# STEP 2 – Observation information.
Check_Leak =  # error
Check_Coat =  # error
Check_Damage =  # error
# STEP 3 – Evaluate damage.
Result_Level1 = "The Level 1 assessment criteria are satisfied."
# [area: Calculation Level 2]
# STEP 1 – Determine the assessment parameters.
Unit_Length = "mm"
D = 483
Unit_Length = "mm"
FCA = 0.5
t_nom = 12.7
Unit_Length = "mm"
LOSS = 0.03
Unit_Length = "mm"
# STEP 2 – Determine the wall thickness to be used in the assessment.
t_c := t_nom - FCA - LOSS
t_c = 12.17
Unit_Length = "mm"
# STEP 3 –  Evaluation the dimension of Dent.
# Clasify the Dent damage
Flaw :=
    "Pass" if d_dp ≤ 1.8*sqrt(D*t_c)
    "Fail" otherwise
Flaw = "Pass"
# Check the distance between the edge of the HIC damage and the nearest weld seam.
Facility :=
    "Pass" if (L_w > max(2*t_c, 25)) and (L_msd ≥ 1.8*sqrt(D*t_c)) and Unit_Length == "mm"
    "Pass" if (L_w > max(2*t_c, 1.0)) and (L_msd ≥ 1.8*sqrt(D*t_c)) and Unit_Length == "in"
    "Fail" otherwise
Facility = "Pass"
# STEP 4 – Determine the MAWP for the component.
P_design = 5
Unit_Stress = "MPa"
MAWP_C := S_allow*E*t_c/(R + 0.6*t_c)
MAWP_C = 6.73096
Unit_Stress = "MPa"
MAWP_L := 2*S_allow*E*t_c/(R - 0.4*t_c)
MAWP_L = 14.1527
Unit_Stress = "MPa"
MAWP := min(MAWP_C, MAWP_L)
MAWP = 6.73096
Unit_Stress = "MPa"
# STEP 4 – Determine the acceptable number of cycles.
# Determine the circumferential stress
σ_C(P) := P/E*(R/t_c + 0.6)
σ_max := σ_C(P_max)
σ_max = 102.437
Unit_Stress = "MPa"
σ_min := σ_C(P_min)
σ_min = 0
Unit_Stress = "MPa"
# Determine the cyclic circumferential membrane stress amplitude.
σ_a := (σ_max - σ_min)/2
σ_a == (σ_min - σ_max)/2
σ_a = 51.2186
Unit_Stress = "MPa"
# Determine the stress concentration factor.
C_s :=
    2.0 if d_dp/2 ≥ 5*t_c
    1.0 otherwise
C_ul :=
    25.4 if Unit_Length == "in"
    1.0 otherwise
d_d0 := d_dp
K_g := 1
K_d := 1 + C_s*sqrt(t_c/D*(d_d0*C_ul)^1.5)
K_d = 2.79596
# Determine the acceptable number of cycles
(σ_max - σ_a)/S_utm = 0.123716
σ_max = 102.437
σ_A := σ_a*(1 - ((σ_max - σ_a)/S_utm)^2)
((σ_max - σ_a)/S_utm)^2 = 0.0153057
S_utm = 414
N_c := 562.2*(S_utm/(2*σ_A*K_d*K_g))
σ_A = 50.4346
N_c = 825.28
# STEP 5 – Evaluate damage.
σ_a = 51.2186
1 - ((σ_max - σ_a)/S_utm)^2 = 0.984694
Result_Level2 :=
    "The Level 2 assessment criteria are not satisfied." if Facility == "Fail" or Flaw == "Fail" or P_design > MAWP or N_c < N_oper
    "The Level 2 assessment criteria are satisfied." otherwise
Result_Level2 = "The Level 2 assessment criteria are not satisfied."
# [area: Short Report Level 2]
Result_Level2 = "The Level 2 assessment criteria are not satisfied."
# [area: Long Report Level 2]
EquipmentType = "Pressure Vessel"
Component_Type = 1
DesignCode = "ASME Section VIII Div.1"
Failure_Mode = "General Metal Loss "
Methodology = "API 579-1/ASME FFS-1 2007 Fitness-For-Service"
# o ------------------------------------------------------------- o
# -
# -
# -
# -
# -
# -
# -
# -
# -
# -
# -
# -
# -
# -
# -
# -
# -
# -
# -
# -
# -
# -
# -
# -
# -
# -
# Picture
# Picture
# Picture
# o ------------------------------------------------------------- o
AssessmentLevel = "Level 1"
AnalysisBy = "TEST NAME"
AnalysisDate = "1/1/14"
AttachPicture = "TEST PICTURE"
AnalysisDetail = "FAILURE"
# STEP 1 – Determine the assessment parameters.
Unit_Length = "mm"
D = 483
Unit_Length = "mm"
FCA = 0.5
t_nom = 12.7
Unit_Length = "mm"
LOSS = 0.03
Unit_Length = "mm"
# STEP 2 – Determine the wall thickness to be used in the assessment.
t_c = 12.17
Unit_Length = "mm"
# STEP 3 –  Evaluation the dimension of Dent.
# Clasify the Dent damage
Flaw = "Pass"
# Check the distance between the edge of the HIC damage and the nearest weld seam.
Facility = "Pass"
# STEP 4 – Determine the MAWP for the component.
MAWP = 6.73096
Unit_Stress = "MPa"
# STEP 4 – Determine the acceptable number of cycles.
# Determine the circumferential stress
σ_max = 102.437
Unit_Stress = "MPa"
σ_min = 0
Unit_Stress = "MPa"
# Determine the cyclic circumferential membrane stress amplitude.
σ_a = 51.2186
Unit_Stress = "MPa"
# Determine the stress concentration factor.
K_d = 2.79596
# Determine the acceptable number of cycles
N_c = 825.28  # Cycles
# STEP 5 – Evaluate damage.
Result_Level2 = "The Level 2 assessment criteria are not satisfied."
