# [area: Page1_Home]
# -----------------------------------------------------------------------------------------------------------------------------------------------------------------------------------
# File | Edit | Tool | View | Help
# -----------------------------------------------------------------------------------------------------------------------------------------------------------------------------------
# Failure Mode
# Which assessment do you choose?
# Brittle Fracture | General Metal Loss | Local Metal Loss
# Pitting Corrosion | Crack-like Flaw | Creep Rupture
# [component: outputs Next]
# -----------------------------------------------------------------------------------------------------------------------------------------------------------------------------------
# Code
Failure_Mode := "General Metal Loss "
# [area: Page2_Equipment]
# -----------------------------------------------------------------------------------------------------------------------------------------------------------------------------------
# File | Edit | Tool | View | Help
# -----------------------------------------------------------------------------------------------------------------------------------------------------------------------------------
# Equipment | Design | Material | Dimention | Load | Result | Save | Report | Close
# Equipment Data
# [component: outputs Equipment_Type]
# [component: outputs Faillure_Mode]
# [component: outputs Methodology]
# [component: outputs Unit]
# [component: outputs Assessment_Level]
# //Level 3 not active now
# [component: outputs Analysis_By]
# [component: outputs Analysis_Date]
# [component: outputs Attach_Picture]
# [component: outputs Analysis_Detail]
# [component: outputs Next]
# -----------------------------------------------------------------------------------------------------------------------------------------------------------------------------------
# Code
# //Unit
Unit_Length :=
    "mm" if Unit == 1
    "in" if Unit == 2
Unit_Length = "mm"
Unit_Stress :=
    "MPa" if Unit == 1
    "psi" if Unit == 2
Unit_Stress = "MPa"
Unit_Temp :=
    "oC" if Unit == 1
    "oF" if Unit == 2
Unit_Temp = "oC"
Unit_Time := "Hrs"
Unit_Time = "Hrs"
# //Equipment Type
EquipmentType :=
    "Pipe Component" if Equipment_Type == 1
    "Pressure Vessel" if Equipment_Type == 2
    "Atmospheric Storage Tank" otherwise
EquipmentType = "Pipe Component"
# // Failure Mode
FaillureMode :=
    "Brittle Fracture" if Faillure_Mode == 1
    "General Metal Loss " if Faillure_Mode == 2
    "Local Metal Loss" if Faillure_Mode == 3
    "Pitting Corrosion " if Faillure_Mode == 4
    "Crack-like Flaw" if Faillure_Mode == 5
    "Creep Rupture" otherwise
FaillureMode = "Brittle Fracture"
# //Methodology
Methodology :=
    "API 579-1/ASME FFS-1 2007 Fitness-For-Service" if Methodology == 1
    "Other" otherwise
Methodology = "API 579-1/ASME FFS-1 2007 Fitness-For-Service"
# //Assessment Level
AssessmentLevel :=
    "Level 1" if Assessment_Level == 1
    "Level 2" if Assessment_Level == 2
    "Level 3" otherwise
AssessmentLevel = "Level 1"
# //Analysis By
AnalysisBy := Analysis_By
AnalysisBy = "TEST NAME"
# //Analysis Date
AnalysisDate := Analysis_Date
AnalysisDate = "1/1/14"
# //Attach Picture
AttachPicture := Attach_Picture
AttachPicture = "TEST PICTURE"
# //Analysis Detail
AnalysisDetail := Analysis_Detail
AnalysisDetail = "FAILURE"
# [area: Page3_Design]
# -----------------------------------------------------------------------------------------------------------------------------------------------------------------------------------
# File | Edit | Tool | View | Help
# -----------------------------------------------------------------------------------------------------------------------------------------------------------------------------------
# Equipment | Design | Material | Dimention | Load | Result | Save | Report | Close
# Design Data
# [component: outputs Component_Type]
# // if Equipment_Type = Pipe Component
# Component_Type = - Straight Pipe
# //if Equipment_Type = Pressure Vessel
# Component_Type = - Cylindical Shell
# - Spherical Shell
# - Hemispherical Head
# //if Equipment_Type = Atmospheric Storage Tank
# Component_Type = - Storage Tank
# [component: outputs Component_Shape]
# [component: outputs Design_Code]
# // if Equipment_Type = Pipe Component
# Design_Code =
# - ASME B31.3
# -Other
# //if Equipment_Type = Pressure Vessel
# Design_Code =
# - ASME Section VIII Div.1
# - ASME Section VIII Div.2
# -Other
# //if Equipment_Type = Atmospheric Storage Tank
# Design_Code =
# - API 620
# -Other
# [component: outputs Pressure_Design]
Unit_Stress = "MPa"
# [component: outputs Temperature_Design]
Unit_Temp = "oC"
# [component: outputs Inside_Diameter]
Unit_Length = "mm"
# [component: outputs Nominal_Thickness]
Unit_Length = "mm"
# [component: outputs Future_Corrosion_Allowance]
Unit_Length = "mm"
# [component: outputs Uniform_Metal_Loss]
Unit_Length = "mm"
# [component: outputs Weld_Efficiency]
# [component: outputs Automaticcally_Allowable_RSF]
# {for Level 2 only }
# [component: outputs Allowable_RSF]
# {for Level 2 only }
# [component: outputs Next]
# ----------------------------------------------------------------------------------------------------------------------------------------------------------------------------
# Code
ComponentShape :=
    "Cylindical" if Component_Shape == 1
    "Sphericall" otherwise
ComponentShape = "Cylindical"
DesignCode :=
    "ASME Section VIII Div.1" if Design_Code == 1
    "ASME Section VIII Div.2" if Design_Code == 2
    "ASME B31.3" if Design_Code == 3
    "API 620" if Design_Code == 3
    "Other" otherwise
DesignCode = "ASME Section VIII Div.1"
P_design := str2num(Pressure_Design)
P_design = 125
T_design := str2num(Temperature_Design)
T_design = 140
D := str2num(Inside_Diameter)
D = 120
t_nom := str2num(Nominal_Thickness)
t_nom = 12.7
FCA := str2num(Future_Corrosion_Allowance)
FCA = 0.0625
LOSS := str2num(Uniform_Metal_Loss)
LOSS = 0
R := D/2 + FCA + LOSS
R = 60.0625
E := str2num(Weld_Efficiency)
E = 1
RSF_a :=
    str2num(Allowable_RSF) if Automaticcally_Allowable_RSF == 1
    0.9 otherwise
RSF_a = 0.9
# [area: Page4_Material]
# -----------------------------------------------------------------------------------------------------------------------------------------------------------------------------------
# File | Edit | Tool | View | Help
# -----------------------------------------------------------------------------------------------------------------------------------------------------------------------------------
# Equipment | Design | Material | Dimention | Load | Result | Save | Report | Close
# Material Data
# [component: outputs Material_Specification]
# [component: outputs Material_Name]
# {active when Material_Specification = Other}
# [component: outputs Automatically_Calculation_Allowable_Stress]
# [component: outputs Allowable_Stress]
Unit_Stress = "MPa"  # {not active if tick "Automatically_Calculation_Allowable_Stress"}
# [component: outputs Ultimated_Tensile_Strength]
Unit_Stress = "MPa"  # {active when tick "Automatically_Calculation_Allowable_Stress" and Level 2}
# [component: outputs Yield_Stresngth]
Unit_Stress = "MPa"  # {active when tick "Automatically_Calculation_Allowable_Stress"}
# [component: outputs Next]
# -----------------------------------------------------------------------------------------------------------------------------------------------------------------------------------
# Code
Material :=
    Material_Name if Material_Specification == 3
    "test material" otherwise
S_utm := str2num(Ultimated_Tensile_Strength)
S_utm = 1
S_y := str2num(Yield_Stresngth)
S_y = 1
S_allow :=
    str2num(Allowable_Stress) if Automatically_Calculation_Allowable_Stress == 0
    min(0.85/3.5*S_utm, 2/3*0.85*S_y) otherwise  # //reference: TABLE 1-100 ASME SEC II-D-2010
S_allow = 17500
# [area: Page5_Flaw]
# -----------------------------------------------------------------------------------------------------------------------------------------------------------------------------------
# File | Edit | Tool | View | Help
# -----------------------------------------------------------------------------------------------------------------------------------------------------------------------------------
# Equipment | Design | Material | Dimention | Load | Result | Save | Report | Close
# Flaw Data
# {for Level 1 and 2}
# Flaw Dimension
# [component: outputs Number of Flaw]
# {max. 2 damages}
# [component: outputs Lamination Hight]
Unit_Length = "mm"
# [component: outputs Circumferential Direction]
Unit_Length = "mm"
# [component: outputs Longituidinal Direction]
Unit_Length = "mm"
# [component: outputs Min Measurement Thickness]
Unit_Length = "mm"
# [component: outputs Damage]
# {description:There is any surface bulging on either the inside or the outside surface of the component at the location of the lamination}
# Flaw to Facility
# [component: outputs Lamination to Lamination Spacing]
Unit_Length = "mm"
# [component: outputs Weld Joint]
Unit_Length = "mm"
# [component: outputs Major Structural Discontinuity]
Unit_Length = "mm"
# {In Case Number of Flaw > 1: Input in table as below}
# [component: outputs Input]
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# [component: outputs Next]
# -----------------------------------------------------------------------------------------------------------------------------------------------------------------------------------
# Code
N_F := str2num(Number of Flaw)
N_F = 1
L_h :=
    if N_F > 1
        L ←
            for i ∈ 0 .. N_F - 1
                L[i] ← Input[0, i]
                L
    str2num(Lamination Hight) otherwise
L_h = 0.125
Unit_Length = "mm"
c :=
    if N_F > 1
        c ←
            for i ∈ 0 .. N_F - 1
                c[i] ← Input[1, i]
                c
    str2num(Circumferential Direction) otherwise
c = 3.25
Unit_Length = "mm"
s :=
    if N_F > 1
        s ←
            for i ∈ 0 .. N_F - 1
                s[i] ← Input[2, i]
                s
    str2num(Longituidinal Direction) otherwise
s = 4.5
Unit_Length = "mm"
t_mm :=
    if N_F > 1
        t ←
            for i ∈ 0 .. N_F - 1
                t[i] ← Input[3, i]
                t
    str2num(Min Measurement Thickness) otherwise
t_mm = 0.325
Unit_Length = "mm"
L_s :=
    if N_F > 1
        l_s ←
            for i ∈ 0 .. N_F - 1
                l_s[i] ← Input[3, i]
                l_s
    str2num(Lamination to Lamination Spacing) otherwise
L_s = 11
Unit_Length = "mm"
L_w :=
    if N_F > 1
        l_w ←
            for i ∈ 0 .. N_F - 1
                l_w[i] ← Input[5, i]
                l_w
    str2num(Weld Joint) otherwise
L_w = 0.75
Unit_Length = "mm"
L_msd :=
    if N_F > 1
        l_msd ←
            for i ∈ 0 .. N_F - 1
                l_msd[i] ← Input[6, i]
                l_msd
    str2num(Major Structural Discontinuity) otherwise
L_msd = 42
Unit_Length = "mm"
# [area: Page6_Load]
# -----------------------------------------------------------------------------------------------------------------------------------------------------------------------------------
# File | Edit | Tool | View | Help
# -----------------------------------------------------------------------------------------------------------------------------------------------------------------------------------
# Equipment | Design | Material | Dimention | Load | Result | Save | Report | Close
# Load Data
# [component: outputs Operating_Pressure]
Unit_Stress = "MPa"
# [component: outputs Ecxternal_Pressure]
# //not active now
# [component: outputs Operating_Temperature]
Unit_Temp = "oC"
# [component: outputs Next]
# -----------------------------------------------------------------------------------------------------------------------------------------------------------------------------------
# Code
P_oper := str2num(Operating_Pressure)
P_oper = 125
Unit_Stress = "MPa"
T_oper := str2num(Operating_Temperature)
T_oper = 140
Unit_Stress = "MPa"
# [area: Calculation Level1]
# STEP 1 – Determine there is any surface bulging on either the inside or the outside surface.
Check_Damage :=
    "Pass" if Damage == 1
    "Fail" otherwise
Check_Damage = "Fail"
# STEP 2 – Determine the assessment parameters.
Unit_Length = "mm"
D = 120
Unit_Length = "mm"
FCA = 0.0625
t_nom = 12.7
Unit_Length = "mm"
LOSS = 0
Unit_Length = "mm"
N_F = 1
L_h = 0.125
Unit_Length = "mm"
c = 3.25
Unit_Length = "mm"
s = 4.5
Unit_Length = "mm"
t_mm = 0.325
Unit_Length = "mm"
L_w = 0.75
Unit_Length = "mm"
L_msd = 42
Unit_Length = "mm"
L_s = 11
Unit_Length = "mm"
# STEP 3 – Determine the wall thickness to be used in the assessment.
t_c := t_nom - FCA - LOSS
t_c = 12.6375
Unit_Length = "mm"
# STEP 4 –  Evaluation the dimension of flaw.
# Edge-To-Edge Spacing to the nearest lamination
L_s_check :=
    "Pass" if L_s > 2*t_c and N_F == 1
    if N_F > 1
        l ←
            for i ∈ 0 .. N_F - 1
                l ←
                    "Pass" if L_s[i] > 2*t_c
                    "Fail" otherwise
                if l == "Fail"
                    {
                        break
                    }
                l
    "Fail" otherwise
L_s = 11
# Lamination Height
L_s_check = "Fail"
L_h_check :=
    "Pass" if L_h ≤ 0.09*max(s, c) and N_F == 1
    if N_F > 1
        l ←
            for i ∈ 0 .. N_F - 1
                l ←
                    "Pass" if L_h[i] ≤ 0.09*max(s[i], c[i])
                    "Fail" otherwise
                if l == "Fail"
                    {
                        break
                    }
                l
    "Fail" otherwise
L_h_check = "Pass"
# There is no indication of through-thickness cracking
Check_Damage = "Fail"
# The lamination is not surface breaking
t_mm_check :=
    "Pass" if t_mm ≤ 0.19*t_c and N_F == 1
    if N_F > 1
        t ←
            for i ∈ 0 .. N_F - 1
                t ←
                    "Pass" if t_mm[i] ≤ 0.19*t_c
                    "Fail" otherwise
                if t == "Fail"
                    {
                        break
                    }
                t
    "Fail" otherwise
t_mm_check = "Pass"
# The distance between any edge of the lamination and the nearest weld seam.
L_w_check :=
    "Pass" if L_w ≥ max(2*t_c, 25) and N_F == 1 and Unit_Length == "mm"
    "Pass" if L_w ≥ max(2*t_c, 1.0) and N_F == 1 and Unit_Length == "in"
    if N_F > 1 and Unit_Length == "mm"
        ll ←
            for i ∈ 0 .. N_F - 1
                ll ←
                    "Pass" if L_w[i] ≥ max(2*t_c, 25)
                    "Fail" otherwise
                if ll == "Fail"
                    {
                        break
                    }
                ll
    if N_F > 1 and Unit_Length == "in"
        ll ←
            for i ∈ 0 .. N_F - 1
                ll ←
                    "Pass" if L_w[i] ≥ max(2*t_c, 1.0)
                    "Fail" otherwise
                if ll == "Fail"
                    {
                        break
                    }
                ll
    "Fail" otherwise
L_w_check = "Fail"
# The distance from any edge of the lamination to the nearest major structural discontinuity.
L_msd_check :=
    "Pass" if L_msd ≥ 1.8*sqrt(D*t_c) and N_F == 1
    if N_F > 1
        ll ←
            for i ∈ 0 .. N_F - 1
                ll ←
                    "Pass" if L_msd[i] ≥ 1.8*sqrt(D*t_c)
                    "Fail" otherwise
                if ll == "Fail"
                    {
                        break
                    }
                ll
    "Fail" otherwise
L_msd_check = "Fail"
# The planar dimensions of the lamination.
s_check :=
    "Pass" if s ≤ 0.6*sqrt(D*t_c) and N_F == 1
    if N_F > 1
        ss ←
            for i ∈ 0 .. N_F - 1
                ss ←
                    "Pass" if s[i] ≤ 0.6*sqrt(D*t_c)
                    "Fail" otherwise
                if ss == "Fail"
                    {
                        break
                    }
                ss
    "Fail" otherwise
s_check = "Pass"
c_check :=
    "Pass" if c ≤ 0.6*sqrt(D*t_c) and N_F == 1
    if N_F > 1
        cc ←
            for i ∈ 0 .. N_F - 1
                cc ←
                    "Pass" if c[i] ≤ 0.6*sqrt(D*t_c)
                    "Fail" otherwise
                if cc == "Fail"
                    {
                        break
                    }
                cc
    "Fail" otherwise
c_check = "Pass"
# STEP 5 – Determine the MAWP for the component.
P_design = 125
Unit_Stress = "MPa"
MAWP_C := S_allow*E*t_c/(R + 0.6*t_c)
MAWP_C = 3269.37
Unit_Stress = "MPa"
MAWP_L := 2*S_allow*E*t_c/(R - 0.4*t_c)
MAWP_L = 8040.95
Unit_Stress = "MPa"
MAWP := min(MAWP_C, MAWP_L)
MAWP = 3269.37
Unit_Stress = "MPa"
# STEP 6 – Evaluate damage.
Result_Level1 :=
    "The Level 1 assessment criteria are not satisfied." if Check_Damage == "Fail" or L_s_check == "Fail" or L_h_check == "Fail" or t_mm_check == "Fail" or L_w_check == "Fail" or L_msd_check == "Fail" or s_check == "Fail" or (c_check == "Fail") or P_design > MAWP
    "The Level 1 assessment criteria are satisfied." otherwise
Result_Level1 = "The Level 1 assessment criteria are not satisfied."
# [area: Short Report Level1]
Result_Level1 = "The Level 1 assessment criteria are not satisfied."
# [area: Long Report Level1]
EquipmentType = "Pipe Component"
Component_Type = 1
DesignCode = "ASME Section VIII Div.1"
Failure_Mode = "General Metal Loss "
Methodology = "API 579-1/ASME FFS-1 2007 Fitness-For-Service"
# o ------------------------------------------------------------- o
# -
# -
# -
# -
# -
# -
# -
# -
# -
# -
# -
# -
# -
# -
# -
# -
# -
# -
# -
# -
# -
# -
# -
# -
# -
# -
# Picture
# Picture
# Picture
# o ------------------------------------------------------------- o
AssessmentLevel = "Level 1"
AnalysisBy = "TEST NAME"
AnalysisDate = "1/1/14"
AttachPicture = "TEST PICTURE"
AnalysisDetail = "FAILURE"
# STEP 1 – Determine there is any surface bulging on either the inside or the outside surface.
Check_Damage = "Fail"
# STEP 2 – Determine the assessment parameters.
Unit_Length = "mm"
D = 120
Unit_Length = "mm"
FCA = 0.0625
t_nom = 12.7
Unit_Length = "mm"
LOSS = 0
Unit_Length = "mm"
N_F = 1
L_h = 0.125
Unit_Length = "mm"
c = 3.25
Unit_Length = "mm"
s = 4.5
Unit_Length = "mm"
t_mm = 0.325
Unit_Length = "mm"
L_w = 0.75
Unit_Length = "mm"
L_msd = 42
Unit_Length = "mm"
L_s = 11
Unit_Length = "mm"
# STEP 3 – Determine the wall thickness to be used in the assessment.
t_c = 12.6375
Unit_Length = "mm"
# STEP 4 –  Evaluation the dimension of flaw.
# Edge-To-Edge Spacing to the nearest lamination
L_s_check = "Fail"
# Lamination Height
L_h_check = "Pass"
# There is no indication of through-thickness cracking
Check_Damage = "Fail"
# The lamination is not surface breaking
t_mm_check = "Pass"
# The distance between any edge of the lamination and the nearest weld seam.
L_w_check = "Fail"
# The distance from any edge of the lamination to the nearest major structural discontinuity.
L_msd_check = "Fail"
# The planar dimensions of the lamination.
s_check = "Pass"
c_check = "Pass"
# STEP 5 – Determine the MAWP for the component.
P_design = 125
Unit_Stress = "MPa"
MAWP = 3269.37
Unit_Stress = "MPa"
# STEP 6 – Evaluate damage.
Result_Level1 = "The Level 1 assessment criteria are not satisfied."
# [area: Calculation Level2]
# STEP 1 – Determine there is any surface bulging on either the inside or the outside surface.
Check_Damage :=
    "Pass" if Damage == 1
    "Fail" otherwise
Check_Damage = "Fail"
# STEP 2 – Determine the assessment parameters.
Unit_Length = "mm"
D = 120
Unit_Length = "mm"
FCA = 0.0625
t_nom = 12.7
Unit_Length = "mm"
LOSS = 0
Unit_Length = "mm"
N_F = 1
L_h = 0.125
Unit_Length = "mm"
c = 3.25
Unit_Length = "mm"
s = 4.5
Unit_Length = "mm"
t_mm = 0.325
Unit_Length = "mm"
L_w = 0.75
Unit_Length = "mm"
L_msd = 42
Unit_Length = "mm"
L_s = 11
Unit_Length = "mm"
# STEP 3 – Determine the wall thickness to be used in the assessment.
t_c := t_nom - FCA - LOSS
t_c = 12.6375
Unit_Length = "mm"
# STEP 4 –  Evaluation the dimension of flaw.
# Edge-To-Edge Spacing to the nearest lamination
L_s_check :=
    "Pass" if L_s[0] > 2*t_c and N_F == 1
    if N_F > 1
        l ←
            for i ∈ 0 .. N_F - 1
                l ←
                    "Pass" if L_s[i] > 2*t_c
                    "Fail" otherwise
                if l == "Fail"
                    {
                        break
                    }
                l
    "Fail" otherwise
# Lamination Height
L_s_check =  # error: This variable is undefined.
L_h_check :=
    "Pass" if L_h[0] ≤ 0.09*max(s[0], c[0]) and N_F == 1
    if N_F > 1
        l ←
            for i ∈ 0 .. N_F - 1
                l ←
                    "Pass" if L_h[i] ≤ 0.09*max(s[i], c[i])
                    "Fail" otherwise
                if l == "Fail"
                    {
                        break
                    }
                l
    "Fail" otherwise
L_h_check =  # error
# There is no indication of through-thickness cracking
Check_Damage = "Fail"
# The lamination is not surface breaking
t_mm_check :=
    "Pass" if t_mm[0] ≤ 0.19*t_c and N_F == 1
    if N_F > 1
        t ←
            for i ∈ 0 .. N_F - 1
                t ←
                    "Pass" if t_mm[i] ≤ 0.19*t_c
                    "Fail" otherwise
                if t == "Fail"
                    {
                        break
                    }
                t
    "Fail" otherwise
t_mm_check =  # error
# The distance between any edge of the lamination and the nearest weld seam.
L_w_check :=
    "Pass" if L_w[0] ≥ max(2*t_c, 25) and N_F == 1 and Unit_Length == "mm"
    "Pass" if L_w[0] ≥ max(2*t_c, 1.0) and N_F == 1 and Unit_Length == "in"
    if N_F > 1 and Unit_Length == "mm"
        ll ←
            for i ∈ 0 .. N_F - 1
                ll ←
                    "Pass" if L_w[i] ≥ max(2*t_c, 25)
                    "Fail" otherwise
                if ll == "Fail"
                    {
                        break
                    }
                ll
    if N_F > 1 and Unit_Length == "in"
        ll ←
            for i ∈ 0 .. N_F - 1
                ll ←
                    "Pass" if L_w[i] ≥ max(2*t_c, 1.0)
                    "Fail" otherwise
                if ll == "Fail"
                    {
                        break
                    }
                ll
    "Fail" otherwise
L_w_check =  # error
# The distance from any edge of the lamination to the nearest major structural discontinuity.
L_msd_check :=
    "Pass" if L_msd[0] ≥ 1.8*sqrt(D*t_c) and N_F == 1
    if N_F > 1
        ll ←
            for i ∈ 0 .. N_F - 1
                ll ←
                    "Pass" if L_msd[i] ≥ 1.8*sqrt(D*t_c)
                    "Fail" otherwise
                if ll == "Fail"
                    {
                        break
                    }
                ll
    "Fail" otherwise
L_msd_check =  # error
# The planar dimensions of the lamination.
s_check :=
    "Pass" if s[0] ≤ 0.6*sqrt(D*t_c) and N_F == 1
    if N_F > 1
        ss ←
            for i ∈ 0 .. N_F - 1
                ss ←
                    "Pass" if s[i] ≤ 0.6*sqrt(D*t_c)
                    "Fail" otherwise
                if ss == "Fail"
                    {
                        break
                    }
                ss
    "Fail" otherwise
s_check =  # error
c_check :=
    "Pass" if c[0] ≤ 0.6*sqrt(D*t_c) and N_F == 1
    if N_F > 1
        cc ←
            for i ∈ 0 .. N_F - 1
                cc ←
                    "Pass" if c[i] ≤ 0.6*sqrt(D*t_c)
                    "Fail" otherwise
                if cc == "Fail"
                    {
                        break
                    }
                cc
    "Fail" otherwise
c_check =  # error
# STEP 5 – Determine the MAWP for the component.
P_design = 125
Unit_Stress = "MPa"
MAWP_C := S_allow*E*t_c/(R + 0.6*t_c)
MAWP_C = 3269.37
Unit_Stress = "MPa"
MAWP_L := 2*S_allow*E*t_c/(R - 0.4*t_c)
MAWP_L = 8040.95
Unit_Stress = "MPa"
MAWP := min(MAWP_C, MAWP_L)
MAWP = 3269.37
Unit_Stress = "MPa"
# STEP 6 – Evaluate damage.
Result_Level2 :=
    "The Level 2 assessment criteria are not satisfied." if Check_Damage == "Fail" or L_s_check == "Fail" or L_h_check == "Fail" or t_mm_check == "Fail" or L_w_check == "Fail" or L_msd_check == "Fail" or s_check == "Fail" or (c_check == "Fail") or P_design > MAWP
    "The Level 2 assessment criteria are satisfied." otherwise
Result_Level2 =  # error
# [area: Short Report Level 2]
Result_Level2 =  # error
# [area: Long Report Level 2]
EquipmentType = "Pipe Component"
Component_Type = 1
DesignCode = "ASME Section VIII Div.1"
Failure_Mode = "General Metal Loss "
Methodology = "API 579-1/ASME FFS-1 2007 Fitness-For-Service"
# o ------------------------------------------------------------- o
# -
# -
# -
# -
# -
# -
# -
# -
# -
# -
# -
# -
# -
# -
# -
# -
# -
# -
# -
# -
# -
# -
# -
# -
# -
# -
# Picture
# Picture
# Picture
# o ------------------------------------------------------------- o
AssessmentLevel = "Level 1"
AnalysisBy = "TEST NAME"
AnalysisDate = "1/1/14"
AttachPicture = "TEST PICTURE"
AnalysisDetail = "FAILURE"
# STEP 1 – Determine there is any surface bulging on either the inside or the outside surface.
Check_Damage = "Fail"
# STEP 2 – Determine the assessment parameters.
Unit_Length = "mm"
D = 120
Unit_Length = "mm"
FCA = 0.0625
t_nom = 12.7
Unit_Length = "mm"
LOSS = 0
Unit_Length = "mm"
N_F = 1
L_h = 0.125
Unit_Length = "mm"
c = 3.25
Unit_Length = "mm"
s = 4.5
Unit_Length = "mm"
t_mm = 0.325
Unit_Length = "mm"
L_w = 0.75
Unit_Length = "mm"
L_msd = 42
Unit_Length = "mm"
L_s = 11
Unit_Length = "mm"
# STEP 3 – Determine the wall thickness to be used in the assessment.
t_c = 12.6375
Unit_Length = "mm"
# STEP 4 –  Evaluation the dimension of flaw.
# Edge-To-Edge Spacing to the nearest lamination
L_s_check =  # error
# Lamination Height
L_h_check =  # error
# There is no indication of through-thickness cracking
Check_Damage = "Fail"
# The lamination is not surface breaking
t_mm_check =  # error
# The distance between any edge of the lamination and the nearest weld seam.
L_w_check =  # error
# The distance from any edge of the lamination to the nearest major structural discontinuity.
L_msd_check =  # error
# The planar dimensions of the lamination.
s_check =  # error
c_check =  # error
# STEP 5 – Determine the MAWP for the component.
P_design = 125
Unit_Stress = "MPa"
MAWP = 3269.37
Unit_Stress = "MPa"
# STEP 6 – Evaluate damage.
Result_Level2 =  # error
