# [area: Page1_Home]
# -----------------------------------------------------------------------------------------------------------------------------------------------------------------------------------
# File | Edit | Tool | View | Help
# -----------------------------------------------------------------------------------------------------------------------------------------------------------------------------------
# Failure Mode
# Which assessment do you choose?
# Brittle Fracture | General Metal Loss | Local Metal Loss
# Pitting Corrosion | Crack-like Flaw | Creep Rupture
# [component: outputs Next]
# [area: Code Page1_Home]
Failure_Mode := "Brittle Fracture"
# [area: Page2_Equipment]
# -----------------------------------------------------------------------------------------------------------------------------------------------------------------------------------
# File | Edit | Tool | View | Help
# -----------------------------------------------------------------------------------------------------------------------------------------------------------------------------------
# Equipment | Design | Material | Dimention | Load | Result | Save | Report | Close
# Equipment Data
# xxxxxxxxxxxxxxxxxxxxxxxxxxxxxxxxxxxxxxxxxxxxxxxxxxxxxxxxxxxxxxxxxxxxxxxxxxxxxxxxxxxxxxxxxxxxxx
# [component: outputs Equipment_Name]
# [component: outputs Equipment_Type]
# xxxxxxxxxxxxxxxxxxxxxxxxxxxxxxxxxxxxxxxxxxxxxxxxxxxxxxxxxxxxxxxxxxxxxxxxxxxxxxxxxxxxxxxxxxxxxx
# [component: outputs Methodology]
# [component: outputs Assessment_Level]
# //Level 3 not active now
# xxxxxxxxxxxxxxxxxxxxxxxxxxxxxxxxxxxxxxxxxxxxxxxxxxxxxxxxxxxxxxxxxxxxxxxxxxxxxxxxxxxxxxxxxxxxxx
# [component: outputs Unit]
# //in
# xxxxxxxxxxxxxxxxxxxxxxxxxxxxxxxxxxxxxxxxxxxxxxxxxxxxxxxxxxxxxxxxxxxxxxxxxxxxxxxxxxxxxxxxxxxxxx
# [component: outputs Analysis_By]
# [component: outputs Analysis_Date]
# [component: outputs Attach_Picture]
# xxxxxxxxxxxxxxxxxxxxxxxxxxxxxxxxxxxxxxxxxxxxxxxxxxxxxxxxxxxxxxxxxxxxxxxxxxxxxxxxxxxxxxxxxxxxxx
# [area: Code Page2_Equipment]
# //Unit
Unit_Length :=
    "mm" if Unit == 1
    "in" if Unit == 2
Unit_Length = "in"
Unit_Stress :=
    "MPa" if Unit == 1
    "psi" if Unit == 2
Unit_Stress = "psi"
Unit_Temp :=
    "oC" if Unit == 1
    "oF" if Unit == 2
Unit_Temp = "oF"
# //Equipment Type
EquipmentType :=
    "Pipe Component" if Equipment_Type == 1
    "Pressure Vessel" if Equipment_Type == 2
    "Atmospheric Storage Tank" otherwise
EquipmentType = "Pipe Component"
# //Methodology
Methodology :=
    "API 579-1/ASME FFS-1 2007 Fitness-For-Service" if Methodology == 1
    "Other" otherwise
Methodology = "API 579-1/ASME FFS-1 2007 Fitness-For-Service"
# //Assessment Level
AssessmentLevel :=
    "Level 1" if Assessment_Level == 1
    "Level 2" if Assessment_Level == 2
    "Level 3" otherwise
AssessmentLevel = "Level 1"
# //Analysis By
AnalysisBy := Analysis_By
AnalysisBy = "TEST"
# //Analysis Date
AnalysisDate := Analysis_Date
AnalysisDate = "1/1/14"
# //Attach Picture
AttachPicture := Attach_Picture
AttachPicture = "TEST PICTURE"
# //Equipment_Name
Equipment_Name := Equipment_Name
Equipment_Name = "Equipment 01"
# [area: Page3_Design]
# -----------------------------------------------------------------------------------------------------------------------------------------------------------------------------------
# File | Edit | Tool | View | Help
# -----------------------------------------------------------------------------------------------------------------------------------------------------------------------------------
# Equipment | Design | Material | Dimention | Load | Result | Save | Report | Close
# Design Data
# xxxxxxxxxxxxxxxxxxxxxxxxxxxxxxxxxxxxxxxxxxxxxxxxxxxxxxxxxxxxxxxxxxxxxxxxxxxxxxxxxxxxxxx
# [component: outputs Component_Type]
# [component: outputs Component_Shape]
# [component: outputs Design_Code]
# xxxxxxxxxxxxxxxxxxxxxxxxxxxxxxxxxxxxxxxxxxxxxxxxxxxxxxxxxxxxxxxxxxxxxxxxxxxxxxxxxxxxxxx
# [component: outputs Inside_Diameter]
# dont active for LV1
Unit_Length = "in"
# [component: outputs Nominal_Thickness]
Unit_Length = "in"
# [component: outputs Future_Corrosion_Allowance]
Unit_Length = "in"
# [component: outputs Uniform_Metal_Loss]
Unit_Length = "in"
# [component: outputs Weld_Efficiency]
# dont active for LV1
# xxxxxxxxxxxxxxxxxxxxxxxxxxxxxxxxxxxxxxxxxxxxxxxxxxxxxxxxxxxxxxxxxxxxxxxxxxxxxxxxxxxxxxx
# [component: outputs Automatically_Calculation_Min_Thickness]
# [component: outputs Longitudinal_Direction]
# dont active for LV1
# [component: outputs Circumferaintial_Direction]
# xxxxxxxxxxxxxxxxxxxxxxxxxxxxxxxxxxxxxxxxxxxxxxxxxxxxxxxxxxxxxxxxxxxxxxxxxxxxxxxxxxxxxxx
# [component: outputs Pressure_Design]
# dont active for LV1
Unit_Stress = "psi"
# [component: outputs Temperature_Design]
Unit_Temp = "oF"
# xxxxxxxxxxxxxxxxxxxxxxxxxxxxxxxxxxxxxxxxxxxxxxxxxxxxxxxxxxxxxxxxxxxxxxxxxxxxxxxxxxxxxxx
# ----------------------------------------------------------------------------------------------------------------------------------------------------------------------------
# [area: Code Page3_Design]
ComponentType :=
    "Cylindical Shell" if Component_Type == 1
    "Spherical Shell" if Component_Type == 2
    "Hemispherical Head" if Component_Type == 3
    "Straight Pipe" if Component_Type == 4
    "Storage Tank" otherwise
ComponentType = "Cylindical Shell"
DesignCode :=
    "ASME Section VIII Div.1" if Design_Code == 1
    "ASME Section VIII Div.2" if Design_Code == 2
    "ASME B31.3" if Design_Code == 3
    "API 620" if Design_Code == 3
    "Other" otherwise
DesignCode = "ASME Section VIII Div.1"
Component_Shape :=
    "Cylindrical" if Design_Code == 1
    "Spherrical" otherwise
Component_Shape = "Cylindrical"
P_design := str2num(Pressure_Design)
P_design = 0
T_design := str2num(Temperature_Design)
T_design = 0
ID := str2num(Inside_Diameter)
ID = 0
t_nom := str2num(Nominal_Thickness)
t_nom = 1.5
FCA := str2num(Future_Corrosion_Allowance)
FCA = 0
LOSS := str2num(Uniform_Metal_Loss)
LOSS = 0
E := str2num(Weld_Efficiency)
E = 1
# [area: Page4_Material]
# -----------------------------------------------------------------------------------------------------------------------------------------------------------------------------------
# File | Edit | Tool | View | Help
# -----------------------------------------------------------------------------------------------------------------------------------------------------------------------------------
# Equipment | Design | Material | Dimention | Load | Result | Save | Report | Close
# Material Data
# [component: outputs Material_Specification]
# [component: outputs ASME_Exemption_Curves]
# {Ex1 A }
# [component: outputs Allowable_Stress]
Unit_Stress = "psi"  # dont active for LV1
# [component: outputs Automatically_Calculation_Allowable_Stress]
# dont active for LV1
# {active when select level 2,
# not active if tick "Automatically_Calculation_Allowable_Stress" }
# [component: outputs Ultimated_Tensile_Strength]
Unit_Stress = "psi"  # dont active for LV1
# {active when tick "Automatically_Calculation_Allowable_Stress"}
# [component: outputs Yield_Stresngth]
Unit_Stress = "psi"  # dont active for LV1
# {active when tick "Automatically_Calculation_Allowable_Stress"}
ASME_Exemption_Curves = 4
# [component: outputs Next]
# -----------------------------------------------------------------------------------------------------------------------------------------------------------------------------------
# [area: Code Page4_Material]
# Code
Material :=
    "SS 304" if Material_Specification == 1
    "SC 319" if Material_Specification == 2
    "Other" otherwise
Curve :=
    "A" if ASME_Exemption_Curves == 1
    "B" if ASME_Exemption_Curves == 2
    "C" if ASME_Exemption_Curves == 3
    "D" otherwise
Curve = "D"
Unit_Stress = "psi"
S_allow := str2num(Allowable_Stress)
S_allow = 55
Unit_Stress = "psi"
S_utm := str2num(Ultimated_Tensile_Strength)
S_utm = 1
S_y := str2num(Yield_Stresngth)
Unit_Stress = "psi"
S_y = 1
# [area: Page5_Flaw]
# -----------------------------------------------------------------------------------------------------------------------------------------------------------------------------------
# File | Edit | Tool | View | Help
# -----------------------------------------------------------------------------------------------------------------------------------------------------------------------------------
# Equipment | Design | Material | Dimention | Load | Result | Save | Report | Close
# Flaw Data
# xxxxxxxxxxxxxxxxxxxxxxxxxxxxxxxxxxxxxxxxxxxxxxxxxxxxxxxxxxxxxxxxxxxxxxxxxxxxxxxxxxxxx
# [component: outputs The_Critical_Exposure_Temperature]
# {Ex1 10 oF}
# {unit in oC or oF}
# [component: outputs The_uncorroded_governing thickness]
# {unit in mm or in}
# {Ex1 1 in}
# xxxxxxxxxxxxxxxxxxxxxxxxxxxxxxxxxxxxxxxxxxxxxxxxxxxxxxxxxxxxxxxxxxxxxxxxxxxxxxxxxxxxx
# [component: outputs The component was fabricated from ASME P1 Group 1 or P1 Group 2 material]
# {Ex1 tick}
# [component: outputs The component has a wall thickness that is less than or equal to 38 mm (15 inches)]
# {Ex1 tick}
# [component: outputs The component was subject to PWHT]
# {Ex1 tick}
# xxxxxxxxxxxxxxxxxxxxxxxxxxxxxxxxxxxxxxxxxxxxxxxxxxxxxxxxxxxxxxxxxxxxxxxxxxxxxxxxxxxxx
# [component: outputs The_Minimum_Allowable_Temperature]
# {unit in oC or oF}
# [component: outputs Automaticcally_The_Minimum_Allowable_Temperature]
# {Ex1 tick}
# {if tick this box The_Minimum_Allowable_Temperature not active}
# xxxxxxxxxxxxxxxxxxxxxxxxxxxxxxxxxxxxxxxxxxxxxxxxxxxxxxxxxxxxxxxxxxxxxxxxxxxxxxxxxxxxx
# -----------------------------------------------------------------------------------------------------------------------------------------------------------------------------------
# [area: Code Page5_Flaw]
# Code
t_g := str2num(The_uncorroded_governing thickness)
t_g = 1.5  # {unit in mm or in}
CET := str2num(The_Critical_Exposure_Temperature)
CET = 10  # {oC or oF}
MAT_read :=
    str2num(The_Minimum_Allowable_Temperature) if Automaticcally_The_Minimum_Allowable_Temperature == 0
    1 otherwise
# MAT_read | {defualt value = 1 oC or oF}
Check_fabricate.material := The component was fabricated from ASME P1 Group 1 or P1 Group 2 material
Check_wall.thickness := The component has a wall thickness that is less than or equal to 38 mm (15 inches)
Check_PWTH := The component was subject to PWHT
# [area: Page6_Load]
# -----------------------------------------------------------------------------------------------------------------------------------------------------------------------------------
# File | Edit | Tool | View | Help
# -----------------------------------------------------------------------------------------------------------------------------------------------------------------------------------
# Equipment | Design | Material | Dimention | Load | Result | Save | Report | Close
# Load Data
# [component: outputs Operating_Pressure]
Unit_Stress = "psi"  # dont active for LV1
# [component: outputs Ecxternal_Pressure]
# {not active now}
# [component: outputs Operating_Temperature]
Unit_Temp = "oF"
# [component: outputs Next]
# -----------------------------------------------------------------------------------------------------------------------------------------------------------------------------------
# [area: Code Page6_Load]
# Code
P_oper := str2num(Operating_Pressure)
P_oper = 1
T_oper := str2num(Operating_Temperature)
T_oper = 10
# [area: Calculation_Level1]
# -----------------------------------------------------------------------------------------------------------------------------------------------------------------------------------
# STEP 1 – Determine the starting point for the MAT
# STEP 1.1 – Determine the following parameters
# A. Nominal uncorroded thickness at each weld joint
t_nom = 1.5
Unit_Length = "in"
# B. Material of construction
Material = "SS 304"
# STEP 1.2 – Determine the uncorroded governing thickness
t_g = 1.5
Unit_Length = "in"
t :=
    t_g*0.039 if Unit_Length == "mm"
    t_g otherwise
t = 1.5  # {unit is only in inches.}
# STEP 1.3 – Determine the applicable material toughness curve
MAT_STEP1.4 :=
    18 if Curve == "A" and (0 < t ≤ 0.394)
    (-76.911 + 284.85*t - 27.560*t^2)/(1 + 1.797*t - 0.17887*t^2) if Curve == "A" and (0.394 < t ≤ 6.0)
    -20 if Curve == "B" and (0 < t ≤ 0.394)
    -135.79 + 171.56*t^0.5 + 103.63*t + (-172*t^1.5) + 73.737*t^2 - 10.535*t^2.5 if Curve == "B" and (0.394 < t ≤ 6.0)
    -55 if Curve == "C" and (0 < t ≤ 0.394)
    101.29 - 255.5/t + 287.86/t^2 - 196.42/t^3 + 69.457/t^4 - 9.8082/t^5 if Curve == "C" and (0.394 < t ≤ 6.0)
    -55 if Curve == "D" and (0 < t_g ≤ 0.5)
    -92.965 + 94.065*t - 39.812*t^2 + 9.6838*t^3 + (-1.1698*t^4) + 0.054687*t^5 if Curve == "D" and (0.5 < t ≤ 6.0)
    "NON" otherwise
MAT_STEP1.4 = -14.2685  # {unit in only oF}
MAT_STEP1.4.reduce :=
    MAT_STEP1.4 - 30 if Check_fabricate.material == 1 and Check_wall.thickness == 1 and Check_PWTH == 1
    MAT_STEP1.4 otherwise
MAT_STEP1.4.reduce = -44.2685  # {unit in only oF}
MAT_LV1 :=
    MAT_STEP1.4.reduce if Unit_Temp == "oF" and Automaticcally_The_Minimum_Allowable_Temperature == 1
    (MAT_STEP1.4.reduce - 32)*5/9 if Unit_Temp == "oC" and Automaticcally_The_Minimum_Allowable_Temperature == 1
    MAT_read otherwise
MAT_LV1 = -44.2685
Unit_Temp = "oF"
Result_Level1 :=
    "The Level 1 assessment criteria are satisfied." if MAT_LV1 ≤ CET
    "The Level 1 assessment criteria are  not satisfied." otherwise
Result_Level1 = "The Level 1 assessment criteria are satisfied."
# -----------------------------------------------------------------------------------------------------------------------------------------------------------------------------------
# [area: Page7_Short Report_Level1]
# -----------------------------------------------------------------------------------------------------------------------------------------------------------------------------------
# File | Edit | Tool | View | Help
# -----------------------------------------------------------------------------------------------------------------------------------------------------------------------------------
# Equipment | Design | Material | Dimention | Load | Result | Save | Report | Close
Result_Level1 = "The Level 1 assessment criteria are satisfied."
# [component: outputs Next]
# -----------------------------------------------------------------------------------------------------------------------------------------------------------------------------------
# [area: Page8_Long Report_Level1]
# ----------------------------------------------For Level 1---------------------------------------------------------------
ComponentType = "Cylindical Shell"
DesignCode = "ASME Section VIII Div.1"
Failure_Mode = "Brittle Fracture"
Methodology = "API 579-1/ASME FFS-1 2007 Fitness-For-Service"
AssessmentLevel = "Level 1"
AnalysisBy = "TEST"
AnalysisDate = "1/1/14"
AttachPicture = "TEST PICTURE"
# Picture
# Picture
# Calculaltion Sheet
# STEP 1 – Determine the starting point for the MAT
# STEP 1.1 – Determine the following parameters
# A. Nominal uncorroded thickness at each weld joint
t_nom = 1.5
Unit_Length = "in"
# B. Material of construction
Material = "SS 304"
# STEP 1.2 – Determine the uncorroded governing thickness
t_g = 1.5
Unit_Length = "in"
# STEP 1.3 – Determine the applicable material toughness curve
MAT_LV1 = -44.2685
Unit_Temp = "oF"
CET = 10
Unit_Temp = "oF"
Result_Level1 = "The Level 1 assessment criteria are satisfied."
