# [area: Page1_Home]
# -----------------------------------------------------------------------------------------------------------------------------------------------------------------------------------
# File | Edit | Tool | View | Help
# -----------------------------------------------------------------------------------------------------------------------------------------------------------------------------------
# Failure Mode
# Which assessment do you choose?
# Brittle Fracture | General Metal Loss | Local Metal Loss
# Pitting Corrosion | Crack-like Flaw | Creep Rupture
# [component: outputs Next]
# [area: Code Page1_Home]
Failure_Mode := "Brittle Fracture"
# [area: Page2_Equipment]
# -----------------------------------------------------------------------------------------------------------------------------------------------------------------------------------
# File | Edit | Tool | View | Help
# -----------------------------------------------------------------------------------------------------------------------------------------------------------------------------------
# Equipment | Design | Material | Dimention | Load | Result | Save | Report | Close
# Equipment Data
# [component: outputs Equipment_Type]
# {Selected Pressure vessel}
# [component: outputs Methodology]
# {Selected API 579-1/ASME FFS-1 2007}
# [component: outputs Unit]
# {Selected in-psi-oF}
# [component: outputs Assessment_Level]
# {Selected Level 2}
# [component: outputs Analysis_By]
# [component: outputs Analysis_Date]
# [component: outputs Attach_Picture]
# [component: outputs Analysis_Detail]
# [component: outputs Next]
# [area: Code Page2_Equipment]
# //Unit
Unit_Length :=
    "mm" if Unit == 1
    "in" if Unit == 2
Unit_Length = "in"
Unit_Stress :=
    "MPa" if Unit == 1
    "psi" if Unit == 2
Unit_Stress = "psi"
Unit_Temp :=
    "oC" if Unit == 1
    "oF" if Unit == 2
Unit_Temp = "oF"
# //Equipment Type
EquipmentType :=
    "Pipe Component" if Equipment_Type == 1
    "Pressure Vessel" if Equipment_Type == 2
    "Atmospheric Storage Tank" otherwise
EquipmentType = "Pipe Component"
# //Methodology
Methodology :=
    "API 579-1/ASME FFS-1 2007 Fitness-For-Service" if Methodology == 1
    "Other" otherwise
Methodology = "API 579-1/ASME FFS-1 2007 Fitness-For-Service"
# //Assessment Level
AssessmentLevel :=
    "Level 1" if Assessment_Level == 1
    "Level 2" if Assessment_Level == 2
    "Level 3" otherwise
AssessmentLevel = "Level 2"
# //Analysis By
AnalysisBy := Analysis_By
AnalysisBy = "TEST NAME"
# //Analysis Date
AnalysisDate := Analysis_Date
AnalysisDate = "1/1/14"
# //Attach Picture
AttachPicture := Attach_Picture
AttachPicture = "TEST PICTURE"
# //Analysis Detail
AnalysisDetail := Analysis_Detail
AnalysisDetail = "FAILURE"
# [area: Page3_Design]
# -----------------------------------------------------------------------------------------------------------------------------------------------------------------------------------
# File | Edit | Tool | View | Help
# -----------------------------------------------------------------------------------------------------------------------------------------------------------------------------------
# Equipment | Design | Material | Dimention | Load | Result | Save | Report | Close
# Design Data
# [component: outputs Component_Type]
# {Selected Pressure Vessel}
# [component: outputs Design_Code]
# {Selected ASME Section VIII Div.1}
# [component: outputs Year_of_Fabrication:]
# [component: outputs Pressure_Design]
Unit_Stress = "psi"
# [component: outputs Temperature_Design]
Unit_Temp = "oF"
# [component: outputs Inside_Diameter]
Unit_Length = "in"
# [component: outputs Nominal_Thickness]
Unit_Length = "in"
# [component: outputs Future_Corrosion_Allowance]
Unit_Length = "in"
# [component: outputs Uniform_Metal_Loss]
Unit_Length = "in"
# [component: outputs Weld_Efficiency]
# [component: outputs Next]
# ----------------------------------------------------------------------------------------------------------------------------------------------------------------------------
# [area: Code Page3_Design]
ComponentType :=
    "Cylindical Shell" if Component_Type == 1
    "Spherical Shell" if Component_Type == 2
    "Hemispherical Head" if Component_Type == 3
    "Straight Pipe" if Component_Type == 4
    "Storage Tank" otherwise
ComponentType = "Cylindical Shell"
DesignCode :=
    "ASME Section VIII Div.1" if Design_Code == 1
    "ASME Section VIII Div.2" if Design_Code == 2
    "ASME B31.3" if Design_Code == 3
    "API 620" if Design_Code == 3
    "Other" otherwise
DesignCode = "ASME Section VIII Div.1"
FabYear := str2num(Year_of_Fabrication:)
FabYear = 2014
P_design := str2num(Pressure_Design)
P_design = 390
T_design := str2num(Temperature_Design)
T_design = 300
ID := str2num(Inside_Diameter)
ID = 234
t_nom := str2num(Nominal_Thickness)
t_nom = 2.72
FCA := str2num(Future_Corrosion_Allowance)
FCA = 0.063
LOSS := str2num(Uniform_Metal_Loss)
LOSS = 0
E := str2num(Weld_Efficiency)
E = 1
# [area: Page4_Material]
# -----------------------------------------------------------------------------------------------------------------------------------------------------------------------------------
# File | Edit | Tool | View | Help
# -----------------------------------------------------------------------------------------------------------------------------------------------------------------------------------
# Equipment | Design | Material | Dimention | Load | Result | Save | Report | Close
# Material Data
# [component: outputs Material_Specification]
# [component: outputs ASME_Exemption_Curves]
# {Select Curve A}
# [component: outputs Allowable_Stress]
Unit_Stress = "psi"
# [component: outputs Automatically_Calculation_Allowable_Stress]
# {Not tick}
# [component: outputs Ultimated_Tensile_Strength]
Unit_Stress = "psi"
# [component: outputs Yield_Stresngth]
Unit_Stress = "psi"
# [component: outputs Next]
# -----------------------------------------------------------------------------------------------------------------------------------------------------------------------------------
# [area: Code Page4_Material]
# Code
Material :=
    "SS 304" if Material_Specification == 1
    "SC 319" if Material_Specification == 2
    "Other" otherwise
Curve :=
    "A" if ASME_Exemption_Curves == 1
    "B" if ASME_Exemption_Curves == 2
    "C" if ASME_Exemption_Curves == 3
    "D" otherwise
Curve = "A"
Unit_Stress = "psi"
S_allow := str2num(Allowable_Stress)
S_allow = 17500
Unit_Stress = "psi"
S_utm := str2num(Ultimated_Tensile_Strength)
S_utm = 1
S_y := str2num(Yield_Stresngth)
Unit_Stress = "psi"
S_y = 1
# [area: Page5_Flaw]
# -----------------------------------------------------------------------------------------------------------------------------------------------------------------------------------
# File | Edit | Tool | View | Help
# -----------------------------------------------------------------------------------------------------------------------------------------------------------------------------------
# Equipment | Design | Material | Dimention | Load | Result | Save | Report | Close
# Dimension Data
# {Level 1 data}
# [component: outputs The_Critical_Exposure_Temperature]
# {unit in oC or oF}
# [component: outputs the_uncorroded_governing thickness]
# {unit in mm or in}
# [component: outputs The component was fabricated from ASME P1 Group 1 or P1 Group 2 material]
# {ticked}
P_ratio*P_design
# [component: outputs The component has a wall thickness that is less than or equal to 38 mm (15 inches)]
# {Not ticked} | P_ratio*P_design
# [component: outputs The component was subject to PWHT]
# {not ticked}
# {Level 2 option}
2.72 - 1/16 = 2.6575
# [component: outputs Reduction in the MAT]
# {Select Pressure-Temperature Basic}
# [component: outputs Next]
# -----------------------------------------------------------------------------------------------------------------------------------------------------------------------------------
# [area: Code Page5_Dimension]
# Code
t_g := str2num(the_uncorroded_governing thickness)
t_g = 2.72  # {unit in mm or in}
CET := str2num(The_Critical_Exposure_Temperature)
CET = 110  # {oC or oF}
Check_fabricate.material := The component was fabricated from ASME P1 Group 1 or P1 Group 2 material
Check_wall.thickness := The component has a wall thickness that is less than or equal to 38 mm (15 inches)
Check_PWTH := The component was subject to PWHT
Reduction in the MAT :=
    "Pressure-Temperature Basic" if Reduction in the MAT == 1
    "Stress Basic" if Reduction in the MAT == 2
    "Thickness Basic" otherwise
Reduction in the MAT = "Pressure-Temperature Basic"
# [area: Page6_Load]
# -----------------------------------------------------------------------------------------------------------------------------------------------------------------------------------
# File | Edit | Tool | View | Help
# -----------------------------------------------------------------------------------------------------------------------------------------------------------------------------------
# Equipment | Design | Material | Dimention | Load | Result | Save | Report | Close
# Load Data
# [component: outputs Operating_Pressure]
Unit_Stress = "psi"
# [component: outputs Ecxternal_Pressure]
# {Not tick}
# [component: outputs Operating_Temperature]
Unit_Temp = "oF"
# [component: outputs Next]
# -----------------------------------------------------------------------------------------------------------------------------------------------------------------------------------
# [area: Code Page6_Load]
# Code
P_oper := str2num(Operating_Pressure)
P_oper = 240
T_oper := str2num(Operating_Temperature)
T_oper = 300
# [area: Calculation_Level1]
# -----------------------------------------------------------------------------------------------------------------------------------------------------------------------------------
# STEP 1 – Determine the starting point for the MAT
# STEP 1.1 – Determine the following parameters
# A. Nominal uncorroded thickness at each weld joint
t_nom = 2.72
Unit_Length = "in"
# B. Material of construction
Material = "SS 304"
# STEP 1.2 – Determine the uncorroded governing thickness
t_g = 2.72
Unit_Length = "in"
t :=
    t_g*0.039 if Unit_Length == "mm"
    t_g otherwise
t = 2.72  # {unit is only in inches.}
# STEP 1.3 – Determine the applicable material toughness curve
MAT_STEP1.4 :=
    18 if Curve == "A" and (0 < t ≤ 0.394)
    (-76.911 + 284.85*t - 27.560*t^2)/(1 + 1.797*t - 0.17887*t^2) if Curve == "A" and (0.394 < t ≤ 6.0)
    -20 if Curve == "B" and (0 < t ≤ 0.394)
    -135.79 + 171.56*t^0.5 + 103.63*t + (-172*t^1.5) + 73.737*t^2 - 10.535*t^2.5 if Curve == "B" and (0.394 < t ≤ 6.0)
    -55 if Curve == "C" and (0 < t ≤ 0.394)
    101.29 - 255.5/t + 287.86/t^2 - 196.42/t^3 + 69.457/t^4 - 9.8082/t^5 if Curve == "C" and (0.394 < t ≤ 6.0)
    -55 if Curve == "D" and (0 < t_g ≤ 0.5)
    -92.965 + 94.065*t - 39.812*t^2 + 9.6838*t^3 + (-1.1698*t^4) + 0.054687*t^5 if Curve == "D" and (0.5 < t ≤ 6.0)
    "NON" otherwise
MAT_STEP1.4 = 108.223  # {unit in only oF}
MAT_STEP1.4.reduce :=
    MAT_STEP1.4 - 30 if Check_fabricate.material == 1 and Check_wall.thickness == 1 and Check_PWTH == 1
    MAT_STEP1.4 otherwise
MAT_STEP1.4.reduce = 108.223  # {unit in only oF}
MAT_LV1 :=
    MAT_STEP1.4.reduce if Unit_Temp == "oF"
    (MAT_STEP1.4.reduce - 32)*5/9 if Unit_Temp == "oC"
MAT_LV1 = 108.223
Unit_Temp = "oF"
Result_Level1 :=
    "The Level 1 assessment criteria are satisfied." if MAT_LV1 ≤ CET
    "The Level 1 assessment criteria are  not satisfied." otherwise
Result_Level1 = "The Level 1 assessment criteria are satisfied."
# -----------------------------------------------------------------------------------------------------------------------------------------------------------------------------------
# [area: Page7_Short Report_Level1]
# -----------------------------------------------------------------------------------------------------------------------------------------------------------------------------------
# File | Edit | Tool | View | Help
# -----------------------------------------------------------------------------------------------------------------------------------------------------------------------------------
# Equipment | Design | Material | Dimention | Load | Result | Save | Report | Close
Result_Level1 = "The Level 1 assessment criteria are satisfied."
# [component: outputs Next]
# -----------------------------------------------------------------------------------------------------------------------------------------------------------------------------------
# [area: Page8_Long Report_Level1]
# ----------------------------------------------For Level 1---------------------------------------------------------------
EquipmentType = "Pipe Component"
ComponentType = "Cylindical Shell"
DesignCode = "ASME Section VIII Div.1"
Failure_Mode = "Brittle Fracture"
Methodology = "API 579-1/ASME FFS-1 2007 Fitness-For-Service"
AssessmentLevel = "Level 2"
AnalysisBy = "TEST NAME"
AnalysisDate = "1/1/14"
AttachPicture = "TEST PICTURE"
AnalysisDetail = "FAILURE"
# o ------------------------------------------------------------- o
# -
# -
# -
# -
# -
# -
# -
# -
# -
# -
# -
# -
# -
# -
# -
# -
# -
# -
# -
# -
# -
# -
# -
# -
# -
# -
# Picture
# Picture
# Picture
# o ------------------------------------------------------------- o
# Calculaltion Sheet
# STEP 1 – Determine the starting point for the MAT
# STEP 1.1 – Determine the following parameters
# A. Nominal uncorroded thickness at each weld joint
t_nom = 2.72
Unit_Length = "in"
# B. Material of construction
Material = "SS 304"
# STEP 1.2 – Determine the uncorroded governing thickness
t_g = 2.72
Unit_Length = "in"
# STEP 1.3 – Determine the applicable material toughness curve
MAT_LV1 = 108.223
Unit_Temp = "oF"
CET = 110
Unit_Temp = "oF"
Result_Level1 = "The Level 1 assessment criteria are satisfied."
# [area: Calculation_Level2]
# -----------------------------------------------------------------------------------------------------------------------------------------------------------------------------------
# Pressure Vessels – Method A
# STEP 1 – Determine the starting point for the MAT
# { Determine MAT in this option is the same as that for Level 1 MAT.}
# STEP 1.1 – Determine the following parameters
# A. Nominal uncorroded thickness at each weld joint
t_nom = 2.72
Unit_Length = "in"
# B. Material of construction
Material = "SS 304"
# STEP 1.2 – Determine the uncorroded governing thickness
t_g = 2.72
Unit_Length = "in"
t :=
    t_g*0.039 if Unit_Length == "mm"
    t_g otherwise
t = 2.72  # {Unit is only in inches.}
# STEP 1.3 – Determine the applicable material toughness curve
Curve = "A"
# STEP 1.4 – Determine the Determine the MAT
MAT_LV2STEP1.4 :=
    18 if Curve == "A" and (0 < t ≤ 0.394)
    (-76.911 + 284.85*t - 27.560*t^2)/(1 + 1.797*t - 0.17887*t^2) if Curve == "A" and (0.394 < t ≤ 6.0)
    -20 if Curve == "B" and (0 < t ≤ 0.394)
    -135.79 + 171.56*t^0.5 + 103.63*t + (-172*t^1.5) + 73.737*t^2 - 10.535*t^2.5 if Curve == "B" and (0.394 < t ≤ 6.0)
    -55 if Curve == "C" and (0 < t ≤ 0.394)
    101.29 - 255.5/t + 287.86/t^2 - 196.42/t^3 + 69.457/t^4 - 9.8082/t^5 if Curve == "C" and (0.394 < t ≤ 6.0)
    -55 if Curve == "D" and (0 < t_g ≤ 0.5)
    -92.965 + 94.065*t - 39.812*t^2 + 9.6838*t^3 + (-1.1698*t^4) + 0.054687*t^5 if Curve == "D" and (0.5 < t ≤ 6.0)
    "NON" otherwise
MAT_LV2STEP1.4 = 108.223  # {only in oF.}
MAT_LV2STEP1.4.reduce :=
    MAT_LV2STEP1.4 - 30 if Check_fabricate.material == 1 and Check_wall.thickness == 1 and Check_PWTH == 1
    MAT_LV2STEP1.4 otherwise
MAT_LV2STEP1.4.reduce = 108.223  # {only in oF.}
# STEP 2 – For the component under consideration, determine the following parameters:
# i) All applicable loads and coincident Minimum Allowable Temperatures
# ii) Previous metal loss associated with the nominal thickness, LOSS
LOSS = 0
Unit_Length = "in"
# iii) Future corrosion allowance associated with the nominal thickness, FCA
FCA = 0.063
Unit_Length = "in"
# iv) Weld joint efficiencies, E and E* .
E = 1
E_star := max(E, 0.8)
# v) Required thickness in the corroded condition for all applicable loads
# STEP 3 - Determine the stress ratio
Reduction in the MAT = "Pressure-Temperature Basic"
P_ratio := 1, 0.95 .. 0.2
# {Level 2 option: Pressure-Temperature Basic}
P_design = 390
R_ts_p(P_ratting) := P_ratting/P_design
# {Level 2 option: Stress Basic}
R_c := ID/2 + FCA + LOSS
t_c := t_nom - FCA - LOSS
S_star(P) := P*(R_c/t_c + 0.6)
# {applied general primary stress
# (in this case it is a stress due to internal ressure of spherical shell)}
R_ts_s(P) := S_star(P)*E_star/(S_allow*E)  # {based on equation (3.3)}
S_allow*E = 17500
# {Level 2 option: Thickness Basic}
P_design = 390
S_star(P_design)*E_star = 17416.8
R_c := ID/2 + FCA + LOSS
S_allow = 17500
t_c := t_nom - FCA - LOSS
t_min.C(P) := P*R_c/(S_allow*E - 0.6*P)
t_min.L(P) := P*R_c/(2*S_allow*E + 0.4*P)
t_min(P) := max(t_min.C(P), t_min.L(P))
R_ts_t(P) := t_min(P)*E_star/(S_allow*E)
R_ts(P) :=
    R_ts_p(P) if Reduction in the MAT == "Pressure-Temperature Basic"
    R_ts_s(P) if Reduction in the MAT == "Stress Basic"
    R_ts_t(P) otherwise
R_ts(P_ratio*P_design) = [1; 0.95; 0.9; 0.85; 0.8; 0.75; 0.7; 0.65; 0.6; 0.55; 0.5; 0.45; 0.4; 0.35; 0.3; 0.25; 0.2]
P_ratio*P_design = [390; 370.5; 351; 331.5; 312; 292.5; 273; 253.5; 234; 214.5; 195; 175.5; 156; 136.5; 117; 97.5; 78]
# STEP 4 – Determine the reduction in the MAT based on the R.ts ratio
S :=
    S_allow*MPa if Unit_Stress == "MPa"
    S_allow*psi otherwise
R_ts_threshold :=
    0.4 if S ≤ 17.5*ksi
    0.35 if 17.5*ksi < S ≤ 20*ksi
    0.3 if 20*ksi < S ≤ 25*ksi
    "NON" otherwise
R_ts_threshold = 0.4
T_R_lower_limit :=
    105 if R_ts_threshold == 0.40
    140 if R_ts_threshold == 0.35
    200 if R_ts_threshold == 0.30
T_R_lower_limit = 105
T_R(P) :=
    T_R_lower_limit if R_ts(P) ≤ R_ts_threshold
    -9979.57 - 14125*R_ts(P)^1.5 + 9088.11*exp(R_ts(P)) - 17.3893*ln(R_ts(P))/R_ts(P)^2 if R_ts_threshold < R_ts(P) < 0.6
    (100*(1 - R_ts(P))) if R_ts(P) ≥ 0.6
# {only in oF}
T_R_report(P) :=
    (T_R(P) - 32)*5/9 if Unit_Temp == "oC"
    T_R(P) otherwise
MAT_LV2.reduce(P) :=
    -155 if R_ts(P) ≤ R_ts_threshold
    max(MAT_LV2STEP1.4.reduce - T_R(P), -55) if R_ts(P) > R_ts_threshold
# {only in oF}
MAT_LV2.reduce_report(P) :=
    (MAT_LV2.reduce(P) - 32)*5/9 if Unit_Temp == "oC"
    MAT_LV2.reduce(P) otherwise
T_R_report(P_ratio*P_design) = [0; 5; 10; 15; 20; 25; 30; 35; 40.014; 45.3317; 58.462; 78.0919; 105; 105; 105; 105; 105]
MAT_LV2.reduce_report(P_ratio*P_design) = [108.223; 103.223; 98.2227; 93.2227; 88.2227; 83.2227; 78.2227; 73.2227; 68.2086; 62.891; 49.7607; 30.1308; -155; -155; -155; -155; -155]
Unit_Temp = "oF"
R_ts(P_ratio*P_design) = [1; 0.95; 0.9; 0.85; 0.8; 0.75; 0.7; 0.65; 0.6; 0.55; 0.5; 0.45; 0.4; 0.35; 0.3; 0.25; 0.2]
# STEP 5 – The MAT determined in STEP 4 can be reduced
MAT_LV2(P) :=
    MAT_LV2.reduce(P) if Unit_Temp == "oF"
    (MAT_LV2.reduce(P) - 32)*5/9 if Unit_Temp == "oC"
Unit_Temp = "oF"
# STEP 6  – Evaluation
Result_Level2(P) :=
    "Satisfied." if MAT_LV2(P) ≤ CET
    "Not Satisfied. " otherwise
Result_Level2(P_ratio*P_design) = ["Satisfied."; "Satisfied."; "Satisfied."; "Satisfied."; "Satisfied."; "Satisfied."; "Satisfied."; "Satisfied."; "Satisfied."; "Satisfied."; "Satisfied."; "Satisfied."; "Satisfied."; "Satisfied."; "Satisfied."; "Satisfied."; "Satisfied."]
i := 0, 1 .. 16
P_ratio[i] := 1 - 0.05*i
Report[i, 0] := P_ratio[i]*P_design
Report[i, 1] := T_R_report(P_ratio[i]*P_design)
Report[i, 2] := MAT_LV2.reduce_report(P_ratio[i]*P_design)
Report[i, 3] := Result_Level2(P_ratio[i]*P_design)
Report = [
    390, 0, 108.223, "Satisfied.";
    370.5, 5, 103.223, "Satisfied.";
    351, 10, 98.2227, "Satisfied.";
    331.5, 15, 93.2227, "Satisfied.";
    312, 20, 88.2227, "Satisfied.";
    292.5, 25, 83.2227, "Satisfied.";
    273, 30, 78.2227, "Satisfied.";
    253.5, 35, 73.2227, "Satisfied.";
    234, 40, 68.2227, "Satisfied.";
    214.5, 45.3317, 62.891, "Satisfied.";
    195, 58.462, 49.7607, "Satisfied.";
    175.5, 78.0919, 30.1308, "Satisfied.";
    156, 105, -155, "Satisfied.";
    136.5, 105, -155, "Satisfied.";
    117, 105, -155, "Satisfied.";
    97.5, 105, -155, "Satisfied.";
    78, 105, -155, "Satisfied."
]
# [component: outputs Next]
# -----------------------------------------------------------------------------------------------------------------------------------------------------------------------------------
# [area: Page7_Short Report_Level2]
# -----------------------------------------------------------------------------------------------------------------------------------------------------------------------------------
# File | Edit | Tool | View | Help
# -----------------------------------------------------------------------------------------------------------------------------------------------------------------------------------
# Equipment | Design | Material | Dimention | Load | Result | Save | Report | Close
# Head of the table
# Pressure (Unit) | T_R (Unit) | MAT (Unit) | Judged
Report = [
    390, 0, 108.223, "Satisfied.";
    370.5, 5, 103.223, "Satisfied.";
    351, 10, 98.2227, "Satisfied.";
    331.5, 15, 93.2227, "Satisfied.";
    312, 20, 88.2227, "Satisfied.";
    292.5, 25, 83.2227, "Satisfied.";
    273, 30, 78.2227, "Satisfied.";
    253.5, 35, 73.2227, "Satisfied.";
    234, 40, 68.2227, "Satisfied.";
    214.5, 45.3317, 62.891, "Satisfied.";
    195, 58.462, 49.7607, "Satisfied.";
    175.5, 78.0919, 30.1308, "Satisfied.";
    156, 105, -155, "Satisfied.";
    136.5, 105, -155, "Satisfied.";
    117, 105, -155, "Satisfied.";
    97.5, 105, -155, "Satisfied.";
    78, 105, -155, "Satisfied."
]
# [component: outputs Next]
# -----------------------------------------------------------------------------------------------------------------------------------------------------------------------------------
# [area: Page8_Long Report_Level2]
# ----------------------------------------------For Level 1---------------------------------------------------------------
EquipmentType = "Pipe Component"
ComponentType = "Cylindical Shell"
DesignCode = "ASME Section VIII Div.1"
Failure_Mode = "Brittle Fracture"
Methodology = "API 579-1/ASME FFS-1 2007 Fitness-For-Service"
AssessmentLevel = "Level 2"
AnalysisBy = "TEST NAME"
AnalysisDate = "1/1/14"
AttachPicture = "TEST PICTURE"
AnalysisDetail = "FAILURE"
# o ------------------------------------------------------------- o
# -
# -
# -
# -
# -
# -
# -
# -
# -
# -
# -
# -
# -
# -
# -
# -
# -
# -
# -
# -
# -
# -
# -
# -
# -
# -
# Picture
# Picture
# Picture
# o ------------------------------------------------------------- o
# Calculation Sheet
# STEP 1 – Determine the starting point for the MAT
# { Determine MAT in this option is the same as that for Level 1 MAT.}
# STEP 1.1 – Determine the following parameters
# A. Nominal uncorroded thickness at each weld joint
t_nom = 2.72
Unit_Length = "in"
# B. Material of construction
Material = "SS 304"
# STEP 1.2 – Determine the uncorroded governing thickness
t_g = 2.72
Unit_Length = "in"
# STEP 1.3 – Determine the applicable material toughness curve
Curve = "A"
# STEP 1.4 – Determine the Determine the MAT
MAT_LV1 = 108.223
Unit_Temp = "oF"
# STEP 2 – For the component under consideration, determine the following parameters:
# i) All applicable loads and coincident Minimum Allowable Temperatures
# ii) Previous metal loss associated with the nominal thickness, LOSS
LOSS = 0
Unit_Length = "in"
# iii) Future corrosion allowance associated with the nominal thickness, FCA
FCA = 0.063
Unit_Length = "in"
# iv) Weld joint efficiencies, E and E* .
E = 1
E_star := max(E, 0.8)
# v) Required thickness in the corroded condition for all applicable loads
# STEP 3 - Determine the stress ratio
# see the table below
# STEP 4 – Determine the reduction in the MAT based on the R.ts ratio
# see the table below | {only in oF}
# STEP 5 – The MAT determined in STEP 4 can be reduced
# see the table below
# STEP 6  – Evaluation
CET = 110
Unit_Temp = "oF"
Report = [
    390, 0, 108.223, "Satisfied.";
    370.5, 5, 103.223, "Satisfied.";
    351, 10, 98.2227, "Satisfied.";
    331.5, 15, 93.2227, "Satisfied.";
    312, 20, 88.2227, "Satisfied.";
    292.5, 25, 83.2227, "Satisfied.";
    273, 30, 78.2227, "Satisfied.";
    253.5, 35, 73.2227, "Satisfied.";
    234, 40, 68.2227, "Satisfied.";
    214.5, 45.3317, 62.891, "Satisfied.";
    195, 58.462, 49.7607, "Satisfied.";
    175.5, 78.0919, 30.1308, "Satisfied.";
    156, 105, -155, "Satisfied.";
    136.5, 105, -155, "Satisfied.";
    117, 105, -155, "Satisfied.";
    97.5, 105, -155, "Satisfied.";
    78, 105, -155, "Satisfied."
]
