# 4.1 Example Problem 1
# Internal corrosion on the cylindrical shell of a heat exchanger has been found during an inspection. Details
# regarding the heat exchanger and inspection data are given below. The heat exchanger was constructed to
# the ASME B&PV Code, Section VIII, Division 1, Edition 1989. Determine if the heat exchanger is suitable for
# continued operation.
# Vessel Data
# • Material = SA−516 Grade 60 Year 1989
# •Design Conditions = 3.85 MPa @380 C and full vacuum @380 C
# • Inside Diameter = 484 mm
# • Nominal Thickness = 16 mm
# • Future Corrosion Allowance = 2 mm
# • Weld Joint Efficiency = 1.0
# • Tubesheet to tubesheet distance = 1524 mm
# Inspection Data
# Based on a visual inspection, the corrosion loss is characterized as general, and point thickness readings will
# be used in the assessment (see paragraph 4.3.3.1 and 4.3.3.2). Point thickness readings were taken in
# accordance with paragraph 4.3.3.2.
[
    Location, (Thickness Reading, mm);
    1, 13;
    2, 12;
    3, 11;
    4, 13;
    5, 10;
    6, 12;
    7, 11;
    8, 12;
    9, 13;
    10, 13;
    11, 11;
    12, 12;
    13, 12;
    14, 13;
    15, 13
]
# [area: Page1_Home]
# -----------------------------------------------------------------------------------------------------------------------------------------------------------------------------------
# File | Edit | Tool | View | Help
# -----------------------------------------------------------------------------------------------------------------------------------------------------------------------------------
# Failure Mode
# Which assessment do you choose?
# Brittle Fracture | General Metal Loss | Local Metal Loss
# Pitting Corrosion | Crack-like Flaw | Creep Rupture
# [component: outputs Next]
# [area: Code1]
# -----------------------------------------------------------------------------------------------------------------------------------------------------------------------------------
# Code
Failure_Mode := "General Metal Loss "
# [area: Page2_Equipment]
# -----------------------------------------------------------------------------------------------------------------------------------------------------------------------------------
# File | Edit | Tool | View | Help
# -----------------------------------------------------------------------------------------------------------------------------------------------------------------------------------
# Equipment | Design | Material | Dimention | Load | Result | Save | Report | Close
# Equipment Data
# [component: outputs Equipment_Type]
# {Pressure Vessel}
# [component: outputs Methodology]
# [component: outputs Unit]
# {mm-MPa-oC}
# [component: outputs Assessment_Level]
# {Level 1}
# [component: outputs Analysis_By]
# [component: outputs Analysis_Date]
# [component: outputs Attach_Picture]
# [component: outputs Analysis_Detail]
# [component: outputs Next]
# [area: Code2]
# -----------------------------------------------------------------------------------------------------------------------------------------------------------------------------------
# Code
# //Unit
Unit_Length :=
    "mm" if Unit == 1
    "in" if Unit == 2
Unit_Length = "mm"
Unit_Stress :=
    "MPa" if Unit == 1
    "psi" if Unit == 2
Unit_Stress = "MPa"
Unit_Temp :=
    "oC" if Unit == 1
    "oF" if Unit == 2
Unit_Temp = "oC"
# //Equipment Type
EquipmentType :=
    "Pipe Component" if Equipment_Type == 1
    "Pressure Vessel" if Equipment_Type == 2
    "Atmospheric Storage Tank" otherwise
EquipmentType = "Pipe Component"
# //Methodology
Methodology :=
    "API 579-1/ASME FFS-1 2007 Fitness-For-Service" if Methodology == 1
    "Other" otherwise
Methodology = "API 579-1/ASME FFS-1 2007 Fitness-For-Service"
# //Assessment Level
AssessmentLevel :=
    "Level 1" if Assessment_Level == 1
    "Level 2" if Assessment_Level == 2
    "Level 3" otherwise
AssessmentLevel = "Level 1"
# //Analysis By
AnalysisBy := Analysis_By
AnalysisBy = "TEST NAME"
# //Analysis Date
AnalysisDate := Analysis_Date
AnalysisDate = "1/1/14"
# //Attach Picture
AttachPicture := Attach_Picture
AttachPicture = "TEST PICTURE"
# //Analysis Detail
AnalysisDetail := Analysis_Detail
AnalysisDetail = "FAILURE"
# [area: Page3_Design]
# -----------------------------------------------------------------------------------------------------------------------------------------------------------------------------------
# File | Edit | Tool | View | Help
# -----------------------------------------------------------------------------------------------------------------------------------------------------------------------------------
# Equipment | Design | Material | Dimention | Load | Result | Save | Report | Close
# Design Data
# [component: outputs Component_Type]
# {Cylindical Shell}
# [component: outputs Design_Code]
# {ASME Section VIII Div.1}
# Operating Design
# [component: outputs Pressure_Design]
Unit_Stress = "MPa"
# [component: outputs Temperature_Design]
Unit_Temp = "oC"
# Geometry Design
# [component: outputs Inside_Diameter]
Unit_Length = "mm"
# [component: outputs Nominal_Thickness]
Unit_Length = "mm"
# [component: outputs Uniform_Metal_Loss]
Unit_Length = "mm"
# [component: outputs Future_Corrosion_Allowance]
Unit_Length = "mm"
# General Design
# [component: outputs Weld_Efficiency]
# [component: outputs Next]
# [area: Code2]
# Code
ComponentType :=
    "Cylindical Shell" if Component_Type == 1
    "Spherical Shell" if Component_Type == 2
    "Hemispherical Head" if Component_Type == 3
    "Straight Pipe" if Component_Type == 4
    "Storage Tank" otherwise
ComponentType = "Cylindical Shell"
DesignCode :=
    "ASME Section VIII Div.1" if Design_Code == 1
    "ASME Section VIII Div.2" if Design_Code == 2
    "ASME B31.3" if Design_Code == 3
    "API 620" if Design_Code == 3
    "Other" otherwise
DesignCode = "ASME Section VIII Div.1"
P_design := str2num(Pressure_Design)
P_design = 3.85
T_design := str2num(Temperature_Design)
T_design = 380
ID := str2num(Inside_Diameter)
ID = 484
t_nom := str2num(Nominal_Thickness)
t_nom = 16
FCA := str2num(Future_Corrosion_Allowance)
FCA = 2
E := str2num(Weld_Efficiency)
E = 1
# [area: Page4_Material]
# -----------------------------------------------------------------------------------------------------------------------------------------------------------------------------------
# File | Edit | Tool | View | Help
# -----------------------------------------------------------------------------------------------------------------------------------------------------------------------------------
# Equipment | Design | Material | Dimention | Load | Result | Save | Report | Close
# Material Data
# Material Specification
# [component: outputs Name]
# Physical Property
# [component: outputs Allowable_Stress]
# [component: outputs Ultimated_Tensile_Strength]
# [component: outputs Yield_Stresngth]
# [component: outputs Automatically_Calculation_Allowable_Stress]
# [component: outputs Next]
# [area: Code3]
# Code
S_utm := str2num(Ultimated_Tensile_Strength)
S_y := str2num(Yield_Stresngth)
S_allow :=
    str2num(Allowable_Stress) if Automatically_Calculation_Allowable_Stress == 0
    min(0.85/3.5*S_utm, 2/3*0.85*S_y) otherwise
# [area: Page5_Assessment]
# -----------------------------------------------------------------------------------------------------------------------------------------------------------------------------------
# File | Edit | Tool | View | Help
# -----------------------------------------------------------------------------------------------------------------------------------------------------------------------------------
# Equipment | Design | Material | Dimention | Load | Result | Save | Report | Close
# Dimension Data
# [component: outputs Thickness_Data]
# Minimum Require Thickness
# {Point thickness reading}
# [component: outputs Longitutinal_Thickness]
# [component: outputs Circumferential_Thickness]
# [component: outputs PTR]
# [component: outputs Automaticcally_Calculation]
# {ticked box}
# Remaining Strength Factor, RSF
# [component: outputs Allowable_RSF]
# [component: outputs Automaticcally_Allowable_RSF]
# {ticked box}
# [component: outputs Next]
# [area: Code4]
# -----------------------------------------------------------------------------------------------------------------------------------------------------------------------------------
# Code
Min_Measurement_Thickness := min(submatrix(PTR[:, 1], ORIGIN + 1, rows(PTR[:, 1]) - 1, ORIGIN, ORIGIN))
t_min_meas := Min_Measurement_Thickness
t_min_meas = 10
t_min_RL_read :=
    str2num(Longitutinal_Thickness) if Automaticcally_Calculation == 0
    0 otherwise
t_min_CL_read :=
    str2num(Circumferential_Thickness) if Automaticcally_Calculation == 0
    0 otherwise
t_min_R_read := max(t_min_RL_read, t_min_CL_read)
RSF_a :=
    str2num(Allowable_RSF) if Automaticcally_Allowable_RSF == 0
    0.9 otherwise
RSF_a = 0.9
# [area: Page6_Load]
# -----------------------------------------------------------------------------------------------------------------------------------------------------------------------------------
# File | Edit | Tool | View | Help
# -----------------------------------------------------------------------------------------------------------------------------------------------------------------------------------
# Equipment | Design | Material | Dimention | Load | Result | Save | Report | Close
# Load Data
Operating
# [component: outputs Pressure]
# [component: outputs Temperature]
# [component: outputs Next]
# [area: Code5]
# -----------------------------------------------------------------------------------------------------------------------------------------------------------------------------------
# Code
P_oper := str2num(Pressure)
P_oper = 3.85
T_oper := str2num(Temperature)
T_oper = 380
# [area: Calculation_Level1]
# -----------------------------------------------------------------------------------------------------------------------------------------------------------------------------------
# Point Thickness Reading (PTR) data
# STEP 1 – Determine the minimum required thickness
# for Cylindrical Shells
R := ID/2
R = 242
LOSS := t_nom - t_min_meas
LOSS = 6
t_min_CL_cal := P_design*(R + FCA + LOSS)/(S_allow*E - 0.6*P_design)
t_min_CL_cal = 10.2547
t_min_RL_cal := P_design*(R + FCA + LOSS)/(2*S_allow*E + 0.4*P_design)
t_min_RL_cal = 4.96446
t_min_R_cal := max(t_min_CL_cal, t_min_RL_cal)
t_min_R_cal = 10.2547
t_min_R :=
    t_min_R_read if Automaticcally_Calculation == 0
    t_min_R_cal
t_min_R = 10.2547
# STEP 2 – Determine the minimum measured thickness
PTR = [
    1, 13;
    2, 12;
    3, 11;
    4, 13;
    5, 10;
    6, 12;
    7, 11;
    8, 12;
    9, 13;
    10, 13;
    11, 11;
    12, 12;
    13, 12;
    14, 13;
    15, 13
]
t_min_meas = 10
# STEP 3 – Verify COV of PTR
# STEP 3.1 – Determine COV
N := rows(PTR) = 15
i := 0, 1 .. N - 1
t[i] := PTR[:, 1][i]
t_am := 1/N*sum(t[j], j = 0 .. N - 1)
t_am = 12.0667
S := sum(t[j] - t_am, j = 0 .. N - 1)
S = 3.55271e-15
COV := 1/t_am*sqrt(S/(N - 1))*100
COV = 1.32017e-7
# STEP 3.2 – Evaluate COV
COV_evaluate :=
    "Pass" if COV ≤ 10
    "Fail" otherwise
COV_evaluate = "Pass"
# STEP 4 – Evaluate the result
PRT_evaluate :=
    "Pass" if t_am - FCA ≥ t_min_R
    "Fail" otherwise
PRT_evaluate = "Fail"
t_unit :=
    2.5 if Unit_Length == "mm"
    0.1 otherwise
THK_evaluatate :=
    "Pass" if (ComponentType ≠ "Storage Tank") and (t_min_meas - FCA ≥ max(0.5*t_min_R, max(0.2*t_nom, t_unit)))
    "Pass" if (ComponentType == "Storage Tank") and (t_min_meas - FCA ≥ max(0.6*t_min_R, max(0.2*t_nom, t_unit)))
    "Fail" otherwise
THK_evaluatate = "Pass"
Result_Level1 :=
    "The Level 1 assessment criteria are satisfied." if (COV_evaluate == "Pass") and (PRT_evaluate == "Pass") and (PRT_evaluate == "Pass")
    "The Level 1 assessment criteria are  not satisfied." otherwise
Result_Level1 = "The Level 1 assessment criteria are  not satisfied."
# [area: Page7 Short Report Level 1]
# -----------------------------------------------------------------------------------------------------------------------------------------------------------------------------------
# File | Edit | Tool | View | Help
# -----------------------------------------------------------------------------------------------------------------------------------------------------------------------------------
# Equipment | Design | Material | Dimention | Load | Result | Save | Report | Close
Result_Level1 = "The Level 1 assessment criteria are  not satisfied."
# [area: Page8 Long Report Level 1]
# ----------------------------------------------For Level 1---------------------------------------------------------------
EquipmentType = "Pipe Component"  # o ------------------------------------------------------------- o
ComponentType = "Cylindical Shell"
# -
# -
# -
# -
# -
# -
# -
# -
# -
# -
# -
# -
# -
# -
# -
# -
# -
# -
# -
# -
# -
# -
# -
# -
# -
# -
# Picture
DesignCode = "ASME Section VIII Div.1"
Failure_Mode = "General Metal Loss "  # Picture
Methodology = "API 579-1/ASME FFS-1 2007 Fitness-For-Service"
AssessmentLevel = "Level 1"  # Picture
AnalysisBy = "TEST NAME"
AnalysisDate = "1/1/14"  # o ------------------------------------------------------------- o
AttachPicture = "TEST PICTURE"
AnalysisDetail = "FAILURE"
# Calculation Sheet for The Point Thickness Reading (PTR) data
# STEP 1 – Determine the minimum required thickness
# for Cylindrical Shells
t_min_R = 10.2547  # //--------->>>>  Unit is mm/in
# STEP 2 – Determine the minimum measured thickness
PTR = [
    1, 13;
    2, 12;
    3, 11;
    4, 13;
    5, 10;
    6, 12;
    7, 11;
    8, 12;
    9, 13;
    10, 13;
    11, 11;
    12, 12;
    13, 12;
    14, 13;
    15, 13
]
t_min_meas = 10  # //--------->>>> Unit is mm/in
# STEP 3 – Verify COV of PTR
# STEP 3.1 – Determine COV
COV = 1.32017e-7  # //--------->>>> Unit is %
# STEP 3.2 – Evaluate COV
COV_evaluate = "Pass"
# STEP 4 – Evaluate the result
PRT_evaluate = "Fail"
Result_Level1 = "The Level 1 assessment criteria are  not satisfied."
# [area: Calculation_Level2]
# -----------------------------------------------------------------------------------------------------------------------------------------------------------------------------------
# Point Thickness Reading (PTR) data
# STEP 1 – Determine the minimum required thickness
# for Cylindrical Shells
R := ID/2
R = 242
LOSS := t_nom - t_min_meas
LOSS = 6
t_min_CL_cal := P_design*(R + FCA + LOSS)/(S_allow*E - 0.6*P_design)
t_min_CL_cal = 10.2547
t_min_RL_cal := P_design*(R + FCA + LOSS)/(2*S_allow*E + 0.4*P_design)
t_min_RL_cal = 4.96446
t_min_R_cal := max(t_min_CL_cal, t_min_RL_cal)
t_min_R_cal = 10.2547
t_min_R :=
    t_min_R_read if Automaticcally_Calculation == 0
    t_min_R_cal
t_min_R = 10.2547
# STEP 2 – Determine the minimum measured thickness
PTR = [
    1, 13;
    2, 12;
    3, 11;
    4, 13;
    5, 10;
    6, 12;
    7, 11;
    8, 12;
    9, 13;
    10, 13;
    11, 11;
    12, 12;
    13, 12;
    14, 13;
    15, 13
]
t_min_meas = 10
# STEP 3 – Verify COV of PTR
# STEP 3.1 – Determine COV
N := rows(PTR) = 15
i := 0, 1 .. N - 1
t[i] := PTR[:, 1][i]
t_am := 1/N*sum(t[j], j = 0 .. N - 1)
t_am = 12.0667
S := sum(t[j] - t_am, j = 0 .. N - 1)
S = 3.55271e-15
COV := 1/t_am*sqrt(S/(N - 1))*100
COV = 1.32017e-7
# STEP 3.2 – Evaluate COV
COV_evaluate :=
    "Pass" if COV ≤ 10
    "Fail" otherwise
COV_evaluate = "Pass"
# STEP 4 – Evaluate the result
RSF_a = 0.9
PRT_evaluate :=
    "Pass" if t_am - FCA ≥ RSF_a*t_min_R
    "Pass" otherwise
PRT_evaluate = "Pass"
Result_Level2 :=
    "The Level 2 assessment criteria are satisfied." if (COV_evaluate == "Pass") and (PRT_evaluate == "Pass")
    "The Level 2 assessment criteria are  not satisfied." otherwise
Result_Level2 = "The Level 2 assessment criteria are satisfied."
# -----------------------------------------------------------------------------------------------------------------------------------------------------------------------------------
# [area: Page7_Short Report Level 2]
# -----------------------------------------------------------------------------------------------------------------------------------------------------------------------------------
# File | Edit | Tool | View | Help
# -----------------------------------------------------------------------------------------------------------------------------------------------------------------------------------
# Equipment | Design | Material | Dimention | Load | Result | Save | Report | Close
Result_Level2 = "The Level 2 assessment criteria are satisfied."
# [component: outputs Next]
# -----------------------------------------------------------------------------------------------------------------------------------------------------------------------------------
# [area: Page8_Long Report Level 2]
# ----------------------------------------------For Level 1---------------------------------------------------------------
EquipmentType = "Pipe Component"  # o ------------------------------------------------------------- o
ComponentType = "Cylindical Shell"
# -
# -
# -
# -
# -
# -
# -
# -
# -
# -
# -
# -
# -
# -
# -
# -
# -
# -
# -
# -
# -
# -
# -
# -
# -
# -
# Picture
DesignCode = "ASME Section VIII Div.1"
Failure_Mode = "General Metal Loss "  # Picture
Methodology = "API 579-1/ASME FFS-1 2007 Fitness-For-Service"
AssessmentLevel = "Level 1"  # Picture
AnalysisBy = "TEST NAME"
AnalysisDate = "1/1/14"  # o ------------------------------------------------------------- o
AttachPicture = "TEST PICTURE"
AnalysisDetail = "FAILURE"
# Calculation Sheet for The Point Thickness Reading (PTR) data
# STEP 1 – Determine the minimum required thickness
# for Cylindrical Shells
R = 242
LOSS = 6
t_min_R = 10.2547
# STEP 2 – Determine the minimum measured thickness
PTR = [
    1, 13;
    2, 12;
    3, 11;
    4, 13;
    5, 10;
    6, 12;
    7, 11;
    8, 12;
    9, 13;
    10, 13;
    11, 11;
    12, 12;
    13, 12;
    14, 13;
    15, 13
]
t_min_meas = 10
# STEP 3 – Verify COV of PTR
# STEP 3.1 – Determine COV
t_am = 12.0667
COV = 1.32017e-7
# STEP 3.2 – Evaluate COV
COV_evaluate = "Pass"
# STEP 4 – Evaluate the result
RSF_a = 0.9
PRT_evaluate = "Pass"
Result_Level2 = "The Level 2 assessment criteria are satisfied."
