# [area: Page1_Home]
# -----------------------------------------------------------------------------------------------------------------------------------------------------------------------------------
# File | Edit | Tool | View | Help
# -----------------------------------------------------------------------------------------------------------------------------------------------------------------------------------
# Failure Mode
# Which assessment do you choose?
# Brittle Fracture | General Metal Loss | Local Metal Loss
# Pitting Corrosion | Crack-like Flaw | Creep Rupture
# [component: outputs Next]
# [area: Code1]
# -----------------------------------------------------------------------------------------------------------------------------------------------------------------------------------
# Code
Failure_Mode := "General Metal Loss "
# [area: Page2_Equipment]
# -----------------------------------------------------------------------------------------------------------------------------------------------------------------------------------
# File | Edit | Tool | View | Help
# -----------------------------------------------------------------------------------------------------------------------------------------------------------------------------------
# Equipment | Design | Material | Dimention | Load | Result | Save | Report | Close
# Equipment Data
# [component: outputs Equipment_Type]
# {Pressure Vessel}
# [component: outputs Methodology]
# [component: outputs Unit]
# {mm-Mpa-oC}
# [component: outputs Assessment_Level]
# {Level 1}
# [component: outputs Analysis_By]
# [component: outputs Analysis_Date]
# [component: outputs Attach_Picture]
# [component: outputs Analysis_Detail]
# [component: outputs Next]
# [area: Code2]
# -----------------------------------------------------------------------------------------------------------------------------------------------------------------------------------
# Code
# //Unit
Unit_Length :=
    "mm" if Unit == 1
    "in" if Unit == 2
Unit_Length = "mm"
Unit_Stress :=
    "MPa" if Unit == 1
    "psi" if Unit == 2
Unit_Stress = "MPa"
Unit_Temp :=
    "oC" if Unit == 1
    "oF" if Unit == 2
Unit_Temp = "oC"
# //Equipment Type
EquipmentType :=
    "Pipe Component" if Equipment_Type == 1
    "Pressure Vessel" if Equipment_Type == 2
    "Atmospheric Storage Tank" otherwise
EquipmentType = "Pipe Component"
# //Methodology
Methodology :=
    "API 579-1/ASME FFS-1 2007 Fitness-For-Service" if Methodology == 1
    "Other" otherwise
Methodology = "API 579-1/ASME FFS-1 2007 Fitness-For-Service"
# //Assessment Level
AssessmentLevel :=
    "Level 1" if Assessment_Level == 1
    "Level 2" if Assessment_Level == 2
    "Level 3" otherwise
AssessmentLevel = "Level 1"
# //Analysis By
AnalysisBy := Analysis_By
AnalysisBy = "TEST NAME"
# //Analysis Date
AnalysisDate := Analysis_Date
AnalysisDate = "1/1/14"
# //Attach Picture
AttachPicture := Attach_Picture
AttachPicture = "TEST PICTURE"
# //Analysis Detail
AnalysisDetail := Analysis_Detail
AnalysisDetail = "FAILURE"
# [area: Page3_Design]
# -----------------------------------------------------------------------------------------------------------------------------------------------------------------------------------
# File | Edit | Tool | View | Help
# -----------------------------------------------------------------------------------------------------------------------------------------------------------------------------------
# Equipment | Design | Material | Dimention | Load | Result | Save | Report | Close
# Design Data
# [component: outputs Component_Type]
# {Cylindical Shell}
# [component: outputs Design_Code]
# {ASME Section VIII Div.1}
# Operating Design
# [component: outputs Pressure_Design]
Unit_Stress = "MPa"
# [component: outputs Temperature_Design]
Unit_Temp = "oC"
# Geometry Design
# [component: outputs Inside_Diameter]
Unit_Length = "mm"
# [component: outputs Nominal_Thickness]
Unit_Length = "mm"
# [component: outputs Uniform_Metal_Loss]
Unit_Length = "mm"
# [component: outputs Future_Corrosion_Allowance]
Unit_Length = "mm"
# General Design
# [component: outputs Weld_Efficiency]
# [component: outputs Next]
# [area: Code2]
# Code
ComponentType :=
    "Cylindical Shell" if Component_Type == 1
    "Spherical Shell" if Component_Type == 2
    "Hemispherical Head" if Component_Type == 3
    "Straight Pipe" if Component_Type == 4
    "Storage Tank" otherwise
ComponentType = "Cylindical Shell"
DesignCode :=
    "ASME Section VIII Div.1" if Design_Code == 1
    "ASME Section VIII Div.2" if Design_Code == 2
    "ASME B31.3" if Design_Code == 3
    "API 620" if Design_Code == 3
    "Other" otherwise
DesignCode = "ASME Section VIII Div.1"
P_design := str2num(Pressure_Design)
P_design = 300
T_design := str2num(Temperature_Design)
T_design = 350
ID := str2num(Inside_Diameter)
ID = 48
t_nom := str2num(Nominal_Thickness)
t_nom = 0.75
FCA := str2num(Future_Corrosion_Allowance)
FCA = 0.1
LOSS := str2num(Uniform_Metal_Loss)
E := str2num(Weld_Efficiency)
E = 0.85
# [area: Page4_Material]
# -----------------------------------------------------------------------------------------------------------------------------------------------------------------------------------
# File | Edit | Tool | View | Help
# -----------------------------------------------------------------------------------------------------------------------------------------------------------------------------------
# Equipment | Design | Material | Dimention | Load | Result | Save | Report | Close
# Material Data
# Material Specification
# [component: outputs Name]
# Physical Property
# [component: outputs Allowable_Stress]
# [component: outputs Ultimated_Tensile_Strength]
# [component: outputs Yield_Stresngth]
# [component: outputs Automatically_Calculation_Allowable_Stress]
# [component: outputs Next]
# [area: Code3]
# Code
S_utm := str2num(Ultimated_Tensile_Strength)
S_y := str2num(Yield_Stresngth)
S_allow :=
    str2num(Allowable_Stress) if Automatically_Calculation_Allowable_Stress == 0
    min(0.85/3.5*S_utm, 2/3*0.85*S_y) otherwise
# [area: Page5_Assessment]
# -----------------------------------------------------------------------------------------------------------------------------------------------------------------------------------
# File | Edit | Tool | View | Help
# -----------------------------------------------------------------------------------------------------------------------------------------------------------------------------------
# Equipment | Design | Material | Dimention | Load | Result | Save | Report | Close
# Dimension Data
# [component: outputs Thickness_Data]
# Minimum Require Thickness
# [component: outputs Longitutinal_Thickness]
# Grid Spacing
# [component: outputs Circumferential_Thickness]
# [component: outputs Longitudinal]
# [component: outputs Automaticcally_Calculation]
# {ticked box}
# [component: outputs Circumferential]
# Remaining Strength Factor, RSF
# [component: outputs Allowable_RSF]
# [component: outputs Automaticcally_Allowable_RSF]
# {ticked box}
# [component: outputs CTP]
CTP = [
    0.75, 0.75, 0.75, 0.75, 0.75, 0.75, 0.75, 0.75;
    0.75, 0.48, 0.52, 0.57, 0.56, 0.58, 0.6, 0.75;
    0.75, 0.57, 0.59, 0.55, 0.59, 0.6, 0.66, 0.75;
    0.75, 0.61, 0.47, 0.58, 0.36, 0.58, 0.64, 0.75;
    0.75, 0.62, 0.59, 0.58, 0.57, 0.48, 0.62, 0.75;
    0.75, 0.57, 0.59, 0.61, 0.57, 0.56, 0.49, 0.75;
    0.75, 0.75, 0.75, 0.75, 0.75, 0.75, 0.75, 0.75
]
# [component: outputs Next]
# [area: Code4]
t_mm := min(CTP)
t_mm = 0.36
Unit_Length = "mm"
N := rows(CTP) = 7
M := cols(CTP) = 8
g_L := str2num(Longitudinal)
g_L = 2.5
g_C := str2num(Circumferential)
g_C = 2.5
t_min_RL_read :=
    str2num(Longitutinal_Thickness) if Automaticcally_Calculation == 0
    0 otherwise
t_min_CL_read :=
    str2num(Circumferential_Thickness) if Automaticcally_Calculation == 0
    0 otherwise
t_min_R_read := max(t_min_RL_read, t_min_CL_read)
RSF_a :=
    str2num(Allowable_RSF) if Automaticcally_Allowable_RSF == 0
    0.9 otherwise
# [area: Page6_Load]
# -----------------------------------------------------------------------------------------------------------------------------------------------------------------------------------
# File | Edit | Tool | View | Help
# -----------------------------------------------------------------------------------------------------------------------------------------------------------------------------------
# Equipment | Design | Material | Dimention | Load | Result | Save | Report | Close
# Load Data
Operating
# [component: outputs Pressure]
# [component: outputs Temperature]
# [component: outputs Next]
# [area: Code 6]
P_oper := str2num(Pressure)
T_oper := str2num(Temperature)
# [area: Calculation_Level1]
# -----------------------------------------------------------------------------------------------------------------------------------------------------------------------------------
# the Critical Thickness Profile (CTP)
# STEP 1 – Determine the minimum required thickness
# for Cylindrical Shells
FCA = 0.1
LOSS = 0
R := ID/2
R = 24
t_min.C := P_design*(R + FCA + LOSS)/(S_allow*E - 0.6*P_design)
t_min.C = 0.429845
t_min.L := P_design*(R + FCA + LOSS)/(2*S_allow*E + 0.4*P_design)
t_min.L = 0.211899
t_min := max(t_min.C, t_min.L)
t_min = 0.429845
t_min :=
    t_min_R_read if Automaticcally_Calculation == 0
    t_min otherwise
t_min = 0.429845
# STEP 2 – Determine the minimum measured thickness
t_mm = 0.36
# STEP 3 – Determine the wall thickness to be used in the assessment
t_c := t_nom - LOSS - FCA
t_c = 0.65
# STEP 4 –Compute the remaining thickness ratio
R_t := (t_mm - FCA)/t_c = 0.4
LOSS = 0
# STEP 5 – Compute the length for thickness averaging
Q := 1.123*(((1 - R_t)/(1 - R_t/RSF_a))^2 - 1)^0.5 = 0.458096
D := ID + 2*(LOSS + FCA)
D = 48.2
L := Q*sqrt(D*t_c)
L = 2.56411
g_L = 2.5
L_evaluate :=
    "Pass" if L < min(M*g_L, N*g_C)
    "Fail" otherwise
N = 7
M = 8
L_evaluate = "Pass"
# STEP 6  – Determine the average measured thickness
# Longitudinal CTP
i := 0, 1 .. (M - 1)
x[i] := min(CTP[:, i])
ma := match(min(CTP), x)[0]
L = 2.56411
mp :=
    trunc(L*0.5/g_L) + 1 if L*0.5/g_L - trunc(L*0.5/g_L) > 0
    trunc(L*0.5/g_L) otherwise
p_0 := x[ma]
p_1 := x[ma - mp]
p_2 := x[ma + mp]
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t_1 := p_0 + (p_1 - p_0)*(L*0.5/(mp*g_L))
t_1 = 0.457436
t_2 := p_0 + (p_2 - p_0)*(L*0.5/(mp*g_L))
t_2 = 0.421539
A_1 := (t_1 + p_0)/2*(L*0.5)
A_2 := (t_2 + p_0)/2*(L*0.5)
t_am.s := (A_1 + A_2)/L
t_am.s = 0.399744  # unit is mm or in
# Curcumferential CTP
j := 0, 1 .. (N - 1)
# N, ROW 0-6 = Circumferential Inspection Planes,
# M, Colunm 0-7 = Longitudinal Inspection Planes,
y[j] := min(transpose(CTP)[:, j])
na := match(min(CTP), y)[0]
np :=
    trunc(L*0.5/g_L) + 1 if L*0.5/g_L - trunc(L*0.5/g_L) > 0
    trunc(L*0.5/g_L) otherwise
p_0 := y[na]
p_1 := y[na - np]
p_2 := y[na + np]
p_1 = 0.55
p_2 = 0.48
np = 1
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p_0 = 0.36
t_3 := p_0 + (p_1 - p_0)*(L*0.5/(np*g_C))
t_4 := p_0 + (p_2 - p_0)*(L*0.5/(np*g_C))
A_3 := (t_3 + p_0)/2*(L*0.5)
A_4 := (t_4 + p_0)/2*(L*0.5)
t_am.c := (A_3 + A_4)/L
t_am := min(t_am.s, t_am.c)
t_am = 0.399744
# ---------------------------->>>> unit is mm or in
# ---------------------------->>>> unit is mm or in
# STEP 7 – Evaluate the result
Longutinal_evaluate :=
    "Pass" if t_am.s - FCA ≥ t_min.C
    "Fail" otherwise
Longutinal_evaluate = "Fail"
Circumference_evaluate :=
    "Pass" if t_am.c - FCA ≥ t_min.L
    "Fail" otherwise
Circumference_evaluate = "Pass"
t_unit :=
    2.5 if Unit_Length == "mm"
    0.1 otherwise
THK_evaluatate :=
    "Pass" if (ComponentType ≠ "Storage Tank") and (t_min - FCA ≥ max(0.5*t_min, max(0.2*t_nom, t_unit)))
    "Pass" if (ComponentType == "Storage Tank") and (t_min - FCA ≥ max(0.6*t_min, max(0.2*t_nom, t_unit)))
    "Fail" otherwise
THK_evaluatate = "Fail"
Result_Level1 :=
    "The Level 1 assessment criteria are satisfied." if Longutinal_evaluate == "Pass" and Circumference_evaluate == "Pass" and THK_evaluatate == "Pass"
    "The Level 1 assessment criteria are  not satisfied." otherwise
Result_Level1 = "The Level 1 assessment criteria are  not satisfied."
# [area: Page7 Short Report Level 1]
# -----------------------------------------------------------------------------------------------------------------------------------------------------------------------------------
# File | Edit | Tool | View | Help
# -----------------------------------------------------------------------------------------------------------------------------------------------------------------------------------
# Equipment | Design | Material | Dimention | Load | Result | Save | Report | Close
Result :=
    Result_Level1 if AssessmentLevel == "Level 1"
    Result_Level2 otherwise  # error: This variable is undefined.  # --------->>>> Code
Result =  # error: This variable is undefined.
# [component: outputs Next]
# -----------------------------------------------------------------------------------------------------------------------------------------------------------------------------------
# [area: Page8_Long Report Level 1]
# ----------------------------------------------For Level 1---------------------------------------------------------------
EquipmentType = "Pipe Component"  # o ------------------------------------------------------------- o
ComponentType = "Cylindical Shell"
# -
# -
# -
# -
# -
# -
# -
# -
# -
# -
# -
# -
# -
# -
# -
# -
# -
# -
# -
# -
# -
# -
# -
# -
# -
# -
# Picture
DesignCode = "ASME Section VIII Div.1"
Failure_Mode = "General Metal Loss "  # Picture
Methodology = "API 579-1/ASME FFS-1 2007 Fitness-For-Service"
AssessmentLevel = "Level 1"  # Picture
AnalysisBy = "TEST NAME"
AnalysisDate = "1/1/14"  # o ------------------------------------------------------------- o
AttachPicture = "TEST PICTURE"
AnalysisDetail = "FAILURE"
# Calculation Sheet for The Critical Thickness Profile (CTP) data
# STEP 1 – Determine the minimum required thickness
# for Cylindrical Shells
t_min = 0.429845  # ------------------------------>>>> Unit is mm or in
# STEP 2 – Determine the minimum measured thickness
t_mm = 0.36
# STEP 3 – Determine the wall thickness to be used in the assessment
t_c = 0.65  # ------------------------------>>>> Unit is mm or in
# STEP 4 –Compute the remaining thickness ratio
R_t = 0.4
# STEP 5 – Compute the length for thickness averaging
L = 2.56411  # ------------------------------>>>> Unit is mm or in
# STEP 6  – Determine the average measured thickness
# Longitudinal CTP
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t_am.s = 0.399744  # ---------------------------->>>> unit is mm or in
# Curcumferential CTP
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t_am.c = 0.399744  # ---------------------------->>>> unit is mm or in
t_am = 0.399744  # ---------------------------->>>> unit is mm or in
# STEP 7 – Evaluate the result
Result_Level1 = "The Level 1 assessment criteria are  not satisfied."
# ---------------------------------------------------------------------------------For Level 2 Assessment----------------------------------------------
EquipmentType = "Pipe Component"  # o ------------------------------------------------------------- o
ComponentType = "Cylindical Shell"
# -
# -
# -
# -
# -
# -
# -
# -
# -
# -
# -
# -
# -
# -
# -
# -
# -
# -
# -
# -
# -
# -
# -
# -
# -
# -
# Picture
DesignCode = "ASME Section VIII Div.1"
Failure_Mode = "General Metal Loss "  # Picture
Methodology = "API 579-1/ASME FFS-1 2007 Fitness-For-Service"
AssessmentLevel = "Level 1"  # Picture
AnalysisBy = "TEST NAME"
AnalysisDate = "1/1/14"  # o ------------------------------------------------------------- o
AttachPicture = "TEST PICTURE"
AnalysisDetail = "FAILURE"
# Calculation Sheet for The Critical Thickness Profile (CTP) data
# STEP 1 – Determine the minimum required thickness
# for Cylindrical Shells
t_min = 0.429845  # ------------------------------>>>> Unit is mm or in
# STEP 2 – Determine the minimum measured thickness
t_mm = 0.36  # ------------------------------>>>> Unit is mm or in
# STEP 3 – Determine the wall thickness to be used in the assessment
t_c = 0.65  # ------------------------------>>>> Unit is mm or in
# STEP 4 –Compute the remaining thickness ratio
R_t = 0.4
# STEP 5 – Compute the length for thickness averaging
L = 2.56411
# STEP 6  – Determine the average measured thickness
# Longitudinal CTP
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t_am.s = 0.399744  # ---------------------------->>>> unit is mm or in
# Curcumferential CTP
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t_am.c = 0.399744  # ---------------------------->>>> unit is mm or in
t_am = 0.399744  # ---------------------------->>>> unit is mm or in
# STEP 7 – Evaluate the result
Result_Level2 =  # error
# [area: Calculation_Level2]
# -----------------------------------------------------------------------------------------------------------------------------------------------------------------------------------
# the Critical Thickness Profile (CTP)
# STEP 1 – Determine the minimum required thickness
# for Cylindrical Shells
FCA = 0.1
# ------------------------------>>>> Unit is mm or in
LOSS = 0
# ------------------------------>>>> Unit is mm or in
R := ID/2
R = 24  # ------------------------------>>>> Unit is mm or in
t_min.C := P_design*(R + FCA + LOSS)/(S_allow*E - 0.6*P_design)
t_min.C = 0.429845  # ------------------------------>>>> Unit is mm or in
t_min.L := P_design*(R + FCA + LOSS)/(2*S_allow*E + 0.4*P_design)
t_min.L = 0.211899  # ------------------------------>>>> Unit is mm or in
t_min := max(t_min.C, t_min.L)
t_min = 0.429845  # ------------------------------>>>> Unit is mm or in
t_min_R :=
    t_min_R_read if Automaticcally_Calculation == 0
    t_min
t_min = 0.429845  # ------------------------------>>>> Unit is mm or in
# STEP 2 – Determine the minimum measured thickness
t_min = 0.429845
# STEP 3 – Determine the wall thickness to be used in the assessment
t_c := t_nom - LOSS - FCA
t_c = 0.65  # ------------------------------>>>> Unit is mm or in
# STEP 4 –Compute the remaining thickness ratio
R_t := (t_mm - FCA)/t_c = 0.4
# STEP 5 – Compute the length for thickness averaging
Q := 1.123*(((1 - R_t)/(1 - R_t/RSF_a))^2 - 1)^0.5 = 0.458096
D := ID + 2*(LOSS + FCA)
D = 48.2
L := Q*sqrt(D*t_c)
L = 2.56411
# STEP 6  – Determine the average measured thickness
# Longitudinal CTP
i := 0, 1 .. (M - 1)
x[i] := min(CTP[:, i])
ma := match(min(CTP), x)[0]
L = 2.56411
mp :=
    trunc(L*0.5/g_L) + 1 if L*0.5/g_L - trunc(L*0.5/g_L) > 0
    trunc(L*0.5/g_L) otherwise
p_0 := x[ma]
p_1 := x[ma - mp]
p_2 := x[ma + mp]
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t_1 := p_0 + (p_1 - p_0)*(L*0.5/(mp*g_L))
t_2 := p_0 + (p_2 - p_0)*(L*0.5/(mp*g_L))
A_1 := (t_1 + p_0)/2*(L*0.5)
A_2 := (t_2 + p_0)/2*(L*0.5)
t_am.s := (A_1 + A_2)/L
t_am.s = 0.399744  # unit is mm or in
# Curcumferential CTP
j := 0, 1 .. (N - 1)
# N, ROW 0-6 = Circumferential Inspection Planes,
# M, Colunm 0-7 = Longitudinal Inspection Planes,
y[j] := min(transpose(CTP)[:, j])
na := match(min(CTP), y)[0]
np :=
    trunc(L*0.5/g_L) + 1 if L*0.5/g_L - trunc(L*0.5/g_L) > 0
    trunc(L*0.5/g_L) otherwise
p_0 := y[na]
p_1 := y[na - np]
p_2 := y[na + np]
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t_3 := p_0 + (p_1 - p_0)*(L*0.5/(np*g_C))
t_4 := p_0 + (p_2 - p_0)*(L*0.5/(np*g_C))
A_3 := (t_3 + p_0)/2*(L*0.5)
A_4 := (t_4 + p_0)/2*(L*0.5)
t_am.c := (A_3 + A_4)/L
t_am := min(t_am.s, t_am.c)
# STEP 7 – Evaluate the result
Longutinal_evaluate :=
    "Pass" if t_am.s - FCA ≥ RSF_a*t_min.C
    "Fail" otherwise
Longutinal_evaluate = "Fail"
Circumference_evaluate :=
    "Pass" if t_am.c - FCA ≥ RSF_a*t_min.L
    "Fail" otherwise
t_am.c = 0.399744
Circumference_evaluate = "Pass"  # ---------------------------->>>> unit is mm or in
t_unit :=
    2.5 if Unit_Length == "mm"
    0.1 otherwise
t_am = 0.399744  # ---------------------------->>>> unit is mm or in
THK_evaluatate :=
    "Pass" if (ComponentType ≠ "Storage Tank") and (t_mm - FCA ≥ max(0.5*t_min_R, max(0.2*t_nom, t_unit)))
    "Pass" if (ComponentType == "Storage Tank") and (t_mm - FCA ≥ max(0.6*t_min_R, max(0.2*t_nom, t_unit)))
    "Fail" otherwise
THK_evaluatate = "Fail"
Result_Level2 :=
    "The Level 2 assessment criteria are satisfied." if Longutinal_evaluate == "Pass" and Circumference_evaluate == "Pass" and THK_evaluatate == "Pass"
    "The Level 2 assessment criteria are  not satisfied. "
Result_Level2 = "The Level 2 assessment criteria are  not satisfied. "
# [component: outputs Next]
# -----------------------------------------------------------------------------------------------------------------------------------------------------------------------------------
# [area: Page7_Short Report Level 2]
# -----------------------------------------------------------------------------------------------------------------------------------------------------------------------------------
# File | Edit | Tool | View | Help
# -----------------------------------------------------------------------------------------------------------------------------------------------------------------------------------
# Equipment | Design | Material | Dimention | Load | Result | Save | Report | Close
Result :=
    Result_Level1 if AssessmentLevel == "Level 1"
    Result_Level2 otherwise  # --------->>>> Code
Result = "The Level 1 assessment criteria are  not satisfied."
# [component: outputs Next]
# -----------------------------------------------------------------------------------------------------------------------------------------------------------------------------------
# [area: Page8_Long Report Level 2]
# ----------------------------------------------For Level 1---------------------------------------------------------------
EquipmentType = "Pipe Component"  # o ------------------------------------------------------------- o
ComponentType = "Cylindical Shell"
# -
# -
# -
# -
# -
# -
# -
# -
# -
# -
# -
# -
# -
# -
# -
# -
# -
# -
# -
# -
# -
# -
# -
# -
# -
# -
# Picture
DesignCode = "ASME Section VIII Div.1"
Failure_Mode = "General Metal Loss "  # Picture
Methodology = "API 579-1/ASME FFS-1 2007 Fitness-For-Service"
AssessmentLevel = "Level 1"  # Picture
AnalysisBy = "TEST NAME"
AnalysisDate = "1/1/14"  # o ------------------------------------------------------------- o
AttachPicture = "TEST PICTURE"
AnalysisDetail = "FAILURE"
# Calculation Sheet for The Critical Thickness Profile (CTP) data
# STEP 1 – Determine the minimum required thickness
# for Cylindrical Shells
t_min = 0.429845  # ------------------------------>>>> Unit is mm or in
# STEP 2 – Determine the minimum measured thickness
t_mm = 0.36
# STEP 3 – Determine the wall thickness to be used in the assessment
t_c = 0.65  # ------------------------------>>>> Unit is mm or in
# STEP 4 –Compute the remaining thickness ratio
R_t = 0.4
# STEP 5 – Compute the length for thickness averaging
L = 2.56411  # ------------------------------>>>> Unit is mm or in
# STEP 6  – Determine the average measured thickness
# Longitudinal CTP
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t_am.s = 0.399744  # ---------------------------->>>> unit is mm or in
# Curcumferential CTP
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t_am.c = 0.399744  # ---------------------------->>>> unit is mm or in
t_am = 0.399744  # ---------------------------->>>> unit is mm or in
# STEP 7 – Evaluate the result
Result_Level1 = "The Level 1 assessment criteria are  not satisfied."
# ---------------------------------------------------------------------------------For Level 2 Assessment----------------------------------------------
EquipmentType = "Pipe Component"  # o ------------------------------------------------------------- o
ComponentType = "Cylindical Shell"
# -
# -
# -
# -
# -
# -
# -
# -
# -
# -
# -
# -
# -
# -
# -
# -
# -
# -
# -
# -
# -
# -
# -
# -
# -
# -
# Picture
DesignCode = "ASME Section VIII Div.1"
Failure_Mode = "General Metal Loss "  # Picture
Methodology = "API 579-1/ASME FFS-1 2007 Fitness-For-Service"
AssessmentLevel = "Level 1"  # Picture
AnalysisBy = "TEST NAME"
AnalysisDate = "1/1/14"  # o ------------------------------------------------------------- o
AttachPicture = "TEST PICTURE"
AnalysisDetail = "FAILURE"
# Calculation Sheet for The Critical Thickness Profile (CTP) data
# STEP 1 – Determine the minimum required thickness
# for Cylindrical Shells
t_min = 0.429845  # ------------------------------>>>> Unit is mm or in
# STEP 2 – Determine the minimum measured thickness
t_mm = 0.36  # ------------------------------>>>> Unit is mm or in
# STEP 3 – Determine the wall thickness to be used in the assessment
t_c = 0.65  # ------------------------------>>>> Unit is mm or in
# STEP 4 –Compute the remaining thickness ratio
R_t = 0.4
# STEP 5 – Compute the length for thickness averaging
L = 2.56411
# STEP 6  – Determine the average measured thickness
# Longitudinal CTP
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t_am.s = 0.399744  # ---------------------------->>>> unit is mm or in
# Curcumferential CTP
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t_am.c = 0.399744  # ---------------------------->>>> unit is mm or in
t_am = 0.399744  # ---------------------------->>>> unit is mm or in
# STEP 7 – Evaluate the result
Result_Level2 = "The Level 2 assessment criteria are  not satisfied. "
