# Worksheet setting: ORIGIN = 1
# [area: Page1_Home]
# -----------------------------------------------------------------------------------------------------------------------------------------------------------------------------------
# File | Edit | Tool | View | Help
# -----------------------------------------------------------------------------------------------------------------------------------------------------------------------------------
# Failure Mode
# Which assessment do you choose ?
# Brittle Fracture | General Metal Loss | Local Metal Loss
# Pitting Corrosion | Crack-like Flaw | Creep Rupture
# [component: outputs Next]
# [area: Code 1]
Failure_Mode := "General Metal Loss "
# [area: Page2_Equipment]
# -----------------------------------------------------------------------------------------------------------------------------------------------------------------------------------
# File | Edit | Tool | View | Help
# -----------------------------------------------------------------------------------------------------------------------------------------------------------------------------------
# Equipment | Design | Material | Dimention | Load | Result | Save | Report | Close
# Equipment Data
# [component: outputs Equipment_Type]
# [component: outputs Faillure_Mode]
# [component: outputs Methodology]
# [component: outputs Unit]
# [component: outputs Assessment_Level]
# [component: outputs Analysis_By]
# [component: outputs Analysis_Date]
# [component: outputs Attach_Picture]
# [component: outputs Analysis_Detail]
# [component: outputs Next]
# [area: Code 2]
# {Unit}
Unit_Length :=
    "mm" if Unit == 1
    "in" if Unit == 2
Unit_Stress :=
    "MPa" if Unit == 1
    "psi" if Unit == 2
Unit_Temp :=
    "oC" if Unit == 1
    "oF" if Unit == 2
# {Equipment Type}
EquipmentType :=
    "Pipe Component" if Equipment_Type == 1
    "Pressure Vessel" if Equipment_Type == 2
    "Atmospheric Storage Tank" otherwise
# {Failure Mode}
FaillureMode :=
    "Brittle Fracture" if Faillure_Mode == 1
    "General Metal Loss " if Faillure_Mode == 2
    "Local Metal Loss" if Faillure_Mode == 3
    "Pitting Corrosion " if Faillure_Mode == 4
    "Crack-like Flaw" if Faillure_Mode == 5
    "Creep Rupture" otherwise
# {Methodology}
Methodology :=
    "API 579-1/ASME FFS-1 2007 Fitness-For-Service" if Methodology == 1
    "Other" otherwise
# {Assessment Level }
AssessmentLevel :=
    "Level 1" if Assessment_Level == 1
    "Level 2" if Assessment_Level == 2
    "Level 3" otherwise
# {Analysis By}
AnalysisBy := Analysis_By
# {Analysis Date}
AnalysisDate := Analysis_Date
# {Attach Picture }
AttachPicture := Attach_Picture
# {Analysis Detail}
AnalysisDetail := Analysis_Detail
# [area: Page3_Design]
# -----------------------------------------------------------------------------------------------------------------------------------------------------------------------------------
# File | Edit | Tool | View | Help
# -----------------------------------------------------------------------------------------------------------------------------------------------------------------------------------
# Equipment | Design | Material | Dimention | Load | Result | Save | Report | Close
# Design Data
# [component: outputs Component_Type]
# [component: outputs Component_Shape]
# [component: outputs Design_Code]
# Operating Design
# [component: outputs Pressure_Design]
# [component: outputs Temperature_Design]
# Geometry Design
# [component: outputs Inside_Diameter]
# [component: outputs Nominal_Thickness]
# [component: outputs Uniform_Metal_Loss]
# [component: outputs Future_Corrosion_Allowance]
# General Design
# [component: outputs Weld_Efficiency]
# [component: outputs Next]
# [area: Code 3]
ComponentShape :=
    "Cylindical" if Component_Shape == 1
    "Sphericall" otherwise
DesignCode :=
    "ASME Section VIII Div.1" if Design_Code == 1
    "ASME Section VIII Div.2" if Design_Code == 2
    "ASME B31.3" if Design_Code == 3
    "API 620" if Design_Code == 3
    "Other" otherwise
P_design := str2num(Pressure_Design)
T_design := str2num(Temperature_Design)
D := str2num(Inside_Diameter)
R := D/2
t_nom := str2num(Nominal_Thickness)
FCA := str2num(Future_Corrosion_Allowance)
LOSS := str2num(Uniform_Metal_Loss)
E := str2num(Weld_Efficiency)
# [area: Page4_Material]
# -----------------------------------------------------------------------------------------------------------------------------------------------------------------------------------
# File | Edit | Tool | View | Help
# -----------------------------------------------------------------------------------------------------------------------------------------------------------------------------------
# Equipment | Design | Material | Dimention | Load | Result | Save | Report | Close
# Material Data
# Material Specification
# [component: outputs Name]
# Physical Property
# [component: outputs Allowable_Stress]
# [component: outputs Ultimated_Tensile_Strength]
# [component: outputs Yield_Stresngth]
# [component: outputs Automatically_Calculation_Allowable_Stress]
# [component: outputs Next]
# [area: Code 4]
S_utm := str2num(Ultimated_Tensile_Strength)
S_y := str2num(Yield_Stresngth)
S_allow :=
    str2num(Allowable_Stress) if Automatically_Calculation_Allowable_Stress == 0
    min(0.85/3.5*S_utm, 2/3*0.85*S_y) otherwise
# [area: Page5_Assessment]
# -----------------------------------------------------------------------------------------------------------------------------------------------------------------------------------
# File | Edit | Tool | View | Help
# -----------------------------------------------------------------------------------------------------------------------------------------------------------------------------------
# Equipment | Design | Material | Dimention | Load | Result | Save | Report | Close
# Dimension Data
# Inspection Data
# [component: outputs Thickness_Data]
# Minimum Require Thickness
# [component: outputs Longitutinal_Thickness]
# [component: outputs Data]
# [component: outputs Circumferential_Thickness]
# [component: outputs Automaticcally_Calculation]
# Grid Spacing | Remaining Strength Factor, RSF
# [component: outputs Longitudinal]
# [component: outputs Allowable_RSF]
# [component: outputs Automaticcally_Allowable_RSF]
# [component: outputs Circumferential]
# Distance to the nearest major structural discontinuity
# [component: outputs Distance]
# [component: outputs Next]
# [area: Code 5]
CTP :=
    transpose(Data) if cols(Data) ≤ 1
    Data otherwise
g_L := str2num(Longitudinal)
g_C := str2num(Circumferential)
L_msd := str2num(Distance)
t_min_RL_read :=
    str2num(Longitutinal_Thickness) if Automaticcally_Calculation == 0
    0 otherwise
t_min_CL_read :=
    str2num(Circumferential_Thickness) if Automaticcally_Calculation == 0
    0 otherwise
t_min_R_read := max(t_min_RL_read, t_min_CL_read)
RSF_a :=
    str2num(Allowable_RSF) if Automaticcally_Allowable_RSF == 0
    0.9 otherwise
# [area: Page6_Load]
# -----------------------------------------------------------------------------------------------------------------------------------------------------------------------------------
# File | Edit | Tool | View | Help
# -----------------------------------------------------------------------------------------------------------------------------------------------------------------------------------
# Equipment | Design | Material | Dimention | Load | Result | Save | Report | Close
# Load Data
Operating
# [component: outputs Pressure]
# [component: outputs Temperature]
# [component: outputs Next]
# [area: Code 6]
P_oper := str2num(Pressure)
T_oper := str2num(Temperature)
# [area: Calculation_Level1]
# -----------------------------------------------------------------------------------------------------------------------------------------------------------------------------------
# STEP 1 – Determine the CTP
CTP = [
    1.15, 1.15, 1.15, 1.15, 1.15, 1.15, 1.15, 1.15, 1.15;
    1.15, 0.87, 0.75, 0.7, 0.76, 0.8, 0.85, 0.94, 1.15;
    1.15, 0.81, 0.82, 0.84, 0.62, 0.47, 0.65, 0.9, 1.15;
    1.15, 0.85, 0.88, 0.81, 0.84, 0.83, 0.9, 0.91, 1.15;
    1.15, 1.15, 1.15, 1.15, 1.15, 1.15, 1.15, 1.15, 1.15
]
t_mm := min(CTP)
t_mm = 0.47
Unit_Length = "mm"
cols(CTP) = 9
# Longitudinal CTP
i := 1, 2 .. cols(CTP)
x[i] := min(CTP[:, i])
M := match(min(CTP), x)[1]
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# Circumferential CTP
j := 1, 2 .. rows(CTP)
y[j] := min(transpose(CTP)[:, j])
M := match(min(CTP), y)[1]
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# STEP 2 – Determine the wall thickness to be used in the assessment
t_c := t_nom - LOSS - FCA
t_c = 1.025
Unit_Length = "mm"
# STEP 3 – Determine the minimum measured thickness and the dimension s for CTP
t_mm = 0.47
t_mm = 0.47
Unit_Length = "mm"
s := (cols(CTP) - 1)*g_L
s = 4
Unit_Length = "mm"
# STEP 4 –Determine the remaining thickness ratio
R_t := (t_mm - FCA)/t_c
R_t = 0.336585
λ :=
    1.285*s/sqrt(D*t_c) if 1.285*s/sqrt(D*t_c) ≤ 20
    20 otherwise
λ = 0.518162
# STEP 5 – Check the limiting flaw size criteria
Check_R_t :=
    "Pass" if R_t ≥ 0.2
    "Fail" otherwise
Check_R_t = "Pass"
Check_L_msd :=
    "Pass" if L_msd ≥ 1.8*sqrt(D*t_c)
    "Fail" otherwise
Check_L_msd = "Pass"
Check_t_mm :=
    if {
        t_mm - FCA ≥ 2.5 if Unit_Length == "mm"
        t_mm - FCA ≥ 0.1 otherwise
    }
        "Pass"
    "Fail" otherwise
Check_t_mm = "Fail"
Check_flaw_long :=
    "Pass" if Check_R_t == "Pass" and Check_L_msd == "Pass" and Check_t_mm == "Pass"
    "Fail" otherwise
Check_flaw_long = "Fail"
# STEP 6  – Check the limiting groove size criteria
# This assessment only for Local Thin Area, LTA, not for Groove-Like Flaw
# STEP 7 – Determine the MAWP for the component
# Circumferential direction
MAWP_C := S_allow*E*t_c/(R + 0.6*t_c)
MAWP_C = 368.97
Unit_Stress = "MPa"
# Longitudinal direction
MAWP_L := 2*S_allow*E*t_c/(R - 0.4*t_c)
MAWP_L = 753.835
Unit_Stress = "MPa"
MAWP := min(MAWP_L, MAWP_C)
MAWP = 368.97
Unit_Stress = "MPa"
# STEP 8 – Evaluate the result
Level1_ScreenCriteria :=
    "Figure 5.6" if Component_Shape == 1
    "Figure 5.7" if Component_Shape == 2
# Define the allowable remaining strength factor
RSF_a = 0.9
M_t :=
    (1.0010 - 0.014195*λ + 0.29090*λ^2 - 0.096420*λ^3 + 0.020890*λ^4 - 0.0030540*λ^5 + 2.9570*10^-4*λ^6 - 1.8462*10^-5*λ^7 + 7.1553*10^-7*λ^8 - 1.5631*10^-8*λ^9 + 1.4656*10^-10*λ^10) if Component_Shape == 1
    (1.0005 + 0.49001*λ + 0.32409*λ^2)/(1.0 + 0.50144*λ - 0.011067*λ^2) if Component_Shape == 2
λ = 0.518162
M_t = 1.05973
RSF := R_t/(1 - (1 - R_t)/M_t)
RSF = 0.900011
MAWP_r := MAWP*RSF/RSF_a
MAWP_r = 368.975
Unit_Stress = "MPa"
R_t_Limit :=
    0.2 if λ ≤ 0.354 and Component_Shape == 1
    (RSF_a - RSF_a/M_t)*(1 - RSF_a/M_t)^-1 if (0.354 < λ < 20) and Component_Shape == 1
    0.9 if λ ≥ 20 and Component_Shape == 1
    0.2 if λ ≤ 0.330 and Component_Shape == 2
    (RSF_a - RSF_a/M_t)*(1 - RSF_a/M_t)^-1 if (0.330 < λ < 20) and Component_Shape == 2
    0.9 if λ ≥ 20 and Component_Shape == 2
R_t_Limit = 0.336557
Check_long :=
    "Pass" if (Check_flaw_long == "Pass") and R_t ≥ R_t_Limit
    "Pass" if (Check_flaw_long == "Pass") and R_t < R_t_Limit and RSF ≥ RSF_a
    "Fail" otherwise
Check_long = "Fail"
# ///////////////////////////////////////////////Do step 9 when Component_Shape is Cylindrical only///////////////////////////////////////////////
# STEP 9 – Evaluate the circumferential extent of the flaw
# STEP 9.1 – Determine the circumferential flaw length parameter
c := (rows(CTP) - 1)*g_C
c = 4
Unit_Length = "mm"
c :=
    s if c == 0 and Component_Shape == 1
    c otherwise
λ_c := 1.285*c/sqrt(D*t_c)
λ_c = 0.518162
# STEP 9.2 – Check the limiting circumferential flaw size criteria
Check_λ_c :=
    "Pass" if λ_c ≤ 9
    "Fail" otherwise
Check_D_t_c :=
    "Pass" if D/t_c ≥ 20
    "Fail" otherwise
Check_RSF :=
    "Pass" if 0.7 ≤ RSF ≤ 1.0
    "Fail" otherwise
Check_RSF = "Pass"
# STEP 9.3 – Determine the tensile stress factor
TSF := E/(2*RSF)*(1 + sqrt(4 - 3*E^2)/E)
TSF = 1.1111
Check_TSF :=
    "Pass" if 0.7 ≤ RSF ≤ 2.3
    "Fail" otherwise
Check_flaw_cir :=
    1 if Check_λ_c == "Pass" and Check_D_t_c == "Pass" and Check_RSF == "Pass" and Check_TSF == "Pass"
    0 otherwise
Check_TSF = "Pass"
# Interpolate R.t from Table5_4
Table5_4 := [
    0.7, 0.75, 0.8, 0.9, 1, 1.2, 1.4, 1.8, 2.3;
    0.21, 0.48, 0.67, 0.98, 1.23, 1.66, 2.03, 2.66, 3.35;
    0.99221, 0.96801, 0.94413, 0.89962, 0.85947, 0.78654, 0.72335, 0.60737, 0.49304;
    -0.11959, -0.2378, -0.31256, -0.3886, -0.40012, -0.25322, 0.011528, 0.93796, 2.1692;
    -0.057333, -0.32678, -0.69968, -1.6485, -2.7979, -5.7982, -9.3536, -19.239, -32.459;
    0.016948, 0.20684, 0.6502, 2.3445, 5.0729, 13.858, 26.031, 64.267, 122.45;
    -0.0017976, -0.046537, -0.22102, -1.2534, -3.5217, -13.118, -29.372, -91.307, -202.43;
    6.9114e-5, 0.0039436, 0.028799, 0.25331, 0.91877, 4.6436, 12.387, 48.962, 127.27
]
UpperIndex :=
    UpperIndex ← 2
    for i ∈ 2 .. 8
        UpperIndex ← UpperIndex + 1 if TSF ≥ Table5_4[1, i]
        UpperIndex ← UpperIndex otherwise
    UpperIndex
Table5_4[1, 6] = 1.2
UpperIndex = 6
LowerIndex := UpperIndex - 1
LowerIndex = 5
i := 2 .. 8
C_up[i] := Table5_4[i, UpperIndex]
C_lo[i] := Table5_4[i, LowerIndex]
R_t_up :=
    0.2 if λ_c ≤ Table5_4[2, UpperIndex]
    sum(C_up[i]/λ_c^(i - 3), i = 3 .. 8) otherwise
R_t_up = 0.2
R_t_lo :=
    0.2 if λ_c ≤ Table5_4[2, LowerIndex]
    sum(C_lo[i]/λ_c^(i - 3), i = 3 .. 8) otherwise
R_t_lo = 0.2
# Interpolate to determine minimum value of Rt
TSF_lo := Table5_4[1, LowerIndex]
TSF_up := Table5_4[1, UpperIndex]
R_t_cir := R_t_lo + (TSF - TSF_lo)/(TSF_up - TSF_lo)*(R_t_up - R_t_lo)
R_t_cir = 0.2
Check_cir :=
    "Pass" if Check_flaw_cir == 1 and R_t ≥ R_t_cir
    "Fail" otherwise
Check_cir = "Pass"
Result_Level1 :=
    "The Level 1 assessment criteria are satisfied." if Component_Shape == 1 and Check_long == "Pass" and Check_cir == "Pass"
    "The Level 1 assessment criteria are  not satisfied." if Component_Shape == 1 and Check_long == "Fail" and Check_cir == "Pass"
    "The Level 1 assessment criteria are  not satisfied." if Component_Shape == 1 and Check_long == "Pass" and Check_cir == "Fail"
    "The Level 1 assessment criteria are satisfied." if Component_Shape == 2 and Check_long == "Pass"
    "The Level 1 assessment criteria are not satisfied." otherwise
Result_Level1 = "The Level 1 assessment criteria are  not satisfied."
# -----------------------------------------------------------------------------------------------------------------------------------------------------------------------------------
# [area: Page7_Short Report_Level1]
# -----------------------------------------------------------------------------------------------------------------------------------------------------------------------------------
# File | Edit | Tool | View | Help
# -----------------------------------------------------------------------------------------------------------------------------------------------------------------------------------
# Equipment | Design | Material | Dimention | Load | Result | Save | Report | Close
Result := Result_Level1
Result = "The Level 1 assessment criteria are  not satisfied."
# [component: outputs Next]
# -----------------------------------------------------------------------------------------------------------------------------------------------------------------------------------
# [area: Page8_Long Report_Level1]
# ----------------------------------------------For Level 1---------------------------------------------------------------
EquipmentType = "Pipe Component"
Component_Type = 1
DesignCode = "ASME Section VIII Div.1"
Failure_Mode = "General Metal Loss "
Methodology = "API 579-1/ASME FFS-1 2007 Fitness-For-Service"
# o ------------------------------------------------------------- o
# -
# -
# -
# -
# -
# -
# -
# -
# -
# -
# -
# -
# -
# -
# -
# -
# -
# -
# -
# -
# -
# -
# -
# -
# -
# -
# Picture
# Picture
# Picture
# o ------------------------------------------------------------- o
AssessmentLevel = "Level 1"
AnalysisBy = "TEST NAME"
AnalysisDate = "1/1/14"
AttachPicture = "TEST PICTURE"
AnalysisDetail = "FAILURE"
# -----------------------------------------------------------------------------------------------------------------------------------------------------------------------------------
# STEP 1 – Determine the CTP
t_mm = 0.47
Unit_Length = "mm"
# Longitudinal CTP
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# Curcumferential CTP
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# STEP 2 – Determine the wall thickness to be used in the assessment
t_c = 1.025
Unit_Length = "mm"
# STEP 3 – Determine the minimum measured thickness and the dimension s for CTP
t_mm = 0.47
Unit_Length = "mm"
s = 4
Unit_Length = "mm"
# STEP 4 –Determine the remaining thickness ratio
R_t = 0.336585
λ = 0.518162
# STEP 5 – Check the limiting flaw size criteria
Check_R_t = "Pass"
Check_L_msd = "Pass"
Check_t_mm = "Fail"
Check_flaw_long = "Fail"
# STEP 6  – Check the limiting groove size criteria
# This assessment only for Local Thin Area, LTA, not for Groove-Like Flaw
# STEP 7 – Determine the MAWP for the component
# Circumferential direction
MAWP_C = 368.97
Unit_Stress = "MPa"
# Longitudinal direction
MAWP_L = 753.835
Unit_Stress = "MPa"
MAWP = 368.97
Unit_Stress = "MPa"
# STEP 8 – Evaluate the result
Level1_ScreenCriteria = "Figure 5.6"
# Define the allowable remaining strength factor
RSF_a = 0.9
M_t = 1.05973
RSF = 0.900011
MAWP_r = 368.975
Unit_Stress = "MPa"
R_t_Limit = 0.336557
Check_long = "Fail"
# ///////////////////////////////////////////////Do step 9 when Component_Shape is Cylindrical only///////////////////////////////////////////////
# STEP 9 – Evaluate the circumferential extent of the flaw
# STEP 9.1 – Determine the circumferential flaw length parameter
c = 4
Unit_Length = "mm"
λ_c = 0.518162
# STEP 9.2 – Check the limiting circumferential flaw size criteria
Check_λ_c = "Pass"
Check_D_t_c = "Pass"
Check_RSF = "Pass"
# STEP 9.3 – Determine the tensile stress factor
TSF = 1.1111
# Interpolate to determine minimum value of Rt
R_t_cir = 0.2
Check_cir = "Pass"
Result_Level1 = "The Level 1 assessment criteria are  not satisfied."
# [area: Calculation_Level2]
# -----------------------------------------------------------------------------------------------------------------------------------------------------------------------------------
# STEP 1 – Determine the CTP
CTP = [
    1.15, 1.15, 1.15, 1.15, 1.15, 1.15, 1.15, 1.15, 1.15;
    1.15, 0.87, 0.75, 0.7, 0.76, 0.8, 0.85, 0.94, 1.15;
    1.15, 0.81, 0.82, 0.84, 0.62, 0.47, 0.65, 0.9, 1.15;
    1.15, 0.85, 0.88, 0.81, 0.84, 0.83, 0.9, 0.91, 1.15;
    1.15, 1.15, 1.15, 1.15, 1.15, 1.15, 1.15, 1.15, 1.15
]
t_mm = 0.47
Unit_Length = "mm"
# Longitudinal CTP
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# Curcumferential CTP
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# STEP 2 – Determine the wall thickness to be used in the assessment
t_c = 1.025
Unit_Length = "mm"
# STEP 3 – Determine the minimum measured thickness and the dimension s for CTP
t_mm = 0.47
Unit_Length = "mm"
s = 4
Unit_Length = "mm"
# STEP 4 –Determine the remaining thickness ratio
R_t = 0.336585
λ = 0.518162
# STEP 5 – Check the limiting flaw size criteria
Check_R_t = "Pass"
Check_L_msd = "Pass"
Check_t_mm = "Fail"
Check_flaw_long = "Fail"
# STEP 6  – Check the limiting groove size criteria
# This assessment only for Local Thin Area, LTA, not for Groove-Like Flaw
# STEP 7 – Determine the MAWP for the component
# Circumferential direction
MAWP_C = 368.97
Unit_Stress = "MPa"
# Longitudinal direction
MAWP_L = 753.835
Unit_Stress = "MPa"
MAWP = 368.97
Unit_Stress = "MPa"
# STEP 8 – Evaluate the result
Level1_ScreenCriteria = "Figure 5.6"
# Set minimum of longitudinal direction
i := 1, 2 .. cols(CTP)
CTP_L[i] := min(CTP[:, i])
transpose(CTP_L) = [1.15, 0.81, 0.75, 0.7, 0.62, 0.47, 0.65, 0.9, 1.15]
# No. of data point
Num_L := length(CTP_L)
Num_L = 9
# Grid size (Longitudinal)
Grid_L := g_L
# Reading position
j := 1 .. Num_L
x[j] := Grid_L*(j - 1)
RSF_L :=
    for i ∈ 1 .. Num_L - 1
        for j ∈ 1 .. Num_L
            rsf[i, j] ← 100
    for i ∈ 1 .. Num_L - 1
        for j ∈ i + 1 .. Num_L
            L[i, j] ← x[j] - x[i]
            A_0[i, j] ← t_nom*L[i, j]
            A[i, j] ← A_0[i, j] - sum(1/2*(x[k + 1] - x[k])*(CTP_L[k + 1] + CTP_L[k]), k = i .. j - 1)
            λ[i, j] ← 1.285*L[i, j]/sqrt(2*R*t_c)
            M_t[i, j] ← 1.0010 - 0.014195*λ[i, j] + 0.29090*λ[i, j]^2 - 0.096420*λ[i, j]^3 + 0.020890*λ[i, j]^4 - 0.0030540*λ[i, j]^5 + 2.9570*10^-4*λ[i, j]^6 - 1.8462*10^-5*λ[i, j]^7 + 7.1553*10^-7*λ[i, j]^8 - 1.5631*10^-8*λ[i, j]^9 + 1.4656*10^-10*λ[i, j]^10
            rsf[i, j] ← (1 - A[i, j]/A_0[i, j])/(1 - 1/M_t[i, j]*A[i, j]/A_0[i, j])
    rsf
RSF := min(RSF_L)
RSF = 0.964506
MAWP_r := MAWP*RSF/RSF_a
MAWP_r = 395.416
Unit_Stress = "MPa"
Check_long :=
    "Pass" if (Check_flaw_long == "Pass") and R_t ≥ R_t_Limit and RSF ≥ RSF_a
    "Fail" otherwise
Check_long = "Fail"
# ///////////////////////////////////////////////Do step 9 when Component_Shape is Cylindrical only///////////////////////////////////////////////
# STEP 9 – Evaluate the circumferential extent of the flaw
# STEP 9.1 – Determine the circumferential flaw length parameter
c = 4
Unit_Length = "mm"
λ_c = 0.518162
# STEP 9.2 – Check the limiting circumferential flaw size criteria
Check_λ_c :=
    "Pass" if λ_c ≤ 9
    "Fail" otherwise
Check_λ_c = "Pass"
Check_D_t_c :=
    "Pass" if D/t_c ≥ 20
    "Fail" otherwise
Check_D_t_c = "Pass"
Check_RSF :=
    "Pass" if 0.7 ≤ RSF ≤ 1.0
    "Fail" otherwise
Check_RSF = "Pass"
# STEP 9.3 – Determine the tensile stress factor
TSF := E/(2*RSF)*(1 + sqrt(4 - 3*E^2)/E)
TSF = 1.0368
Check_TSF :=
    "Pass" if 0.7 ≤ RSF ≤ 2.3
    "Fail" otherwise
Check_TSF = "Pass"
Check_flaw_cir :=
    1 if Check_λ_c == "Pass" and Check_D_t_c == "Pass" and Check_RSF == "Pass" and Check_TSF == "Pass"
    0 otherwise
Check_flaw_cir = 1
# Interpolate R.t from Table5_4
Table5_4 = [
    0.7, 0.75, 0.8, 0.9, 1, 1.2, 1.4, 1.8, 2.3;
    0.21, 0.48, 0.67, 0.98, 1.23, 1.66, 2.03, 2.66, 3.35;
    0.99221, 0.96801, 0.94413, 0.89962, 0.85947, 0.78654, 0.72335, 0.60737, 0.49304;
    -0.11959, -0.2378, -0.31256, -0.3886, -0.40012, -0.25322, 0.011528, 0.93796, 2.1692;
    -0.057333, -0.32678, -0.69968, -1.6485, -2.7979, -5.7982, -9.3536, -19.239, -32.459;
    0.016948, 0.20684, 0.6502, 2.3445, 5.0729, 13.858, 26.031, 64.267, 122.45;
    -0.0017976, -0.046537, -0.22102, -1.2534, -3.5217, -13.118, -29.372, -91.307, -202.43;
    6.9114e-5, 0.0039436, 0.028799, 0.25331, 0.91877, 4.6436, 12.387, 48.962, 127.27
]
TSF = 1.0368
UpperIndex :=
    UpperIndex ← 2
    for i ∈ 2 .. 8
        UpperIndex ← UpperIndex + 1 if TSF ≥ Table5_4[1, i]
        UpperIndex ← UpperIndex otherwise
    UpperIndex
UpperIndex = 6
LowerIndex := UpperIndex - 1
i := 2 .. 8
LowerIndex = 5
C_up[i] := Table5_4[i, UpperIndex]
C_lo[i] := Table5_4[i, LowerIndex]
R_t_up :=
    0.2 if λ_c ≤ Table5_4[2, UpperIndex]
    sum(C_up[i]/λ_c^(i - 3), i = 3 .. 8) otherwise
R_t_lo :=
    0.2 if λ_c ≤ Table5_4[2, LowerIndex]
    sum(C_lo[i]/λ_c^(i - 3), i = 3 .. 8) otherwise
# Interpolate to determine minimum value of Rt
TSF_lo := Table5_4[1, LowerIndex]
TSF_up := Table5_4[1, UpperIndex]
R_t_min := R_t_lo + (TSF - TSF_lo)/(TSF_up - TSF_lo)*(R_t_up - R_t_lo)
# Interpolate to determine minimum value of Rt
TSF_lo := Table5_4[1, LowerIndex]
TSF_up := Table5_4[1, UpperIndex]
R_t_cir := R_t_lo + (TSF - TSF_lo)/(TSF_up - TSF_lo)*(R_t_up - R_t_lo)
Check_cir :=
    "Pass" if Check_flaw_cir == 1 and R_t ≥ R_t_min
    "Fail" otherwise
Check_cir = "Pass"
Result_Level2 :=
    "The Level 2 assessment criteria are satisfied." if Component_Shape == 1 and Check_long == "Pass" and Check_cir == "Pass"
    "The Level 2 assessment criteria are  not satisfied." if Component_Shape == 1 and Check_long == "Fail" and Check_cir == "Pass"
    "The Level 2 assessment criteria are  not satisfied." if Component_Shape == 1 and Check_long == "Pass" and Check_cir == "Fail"
    "The Level 2 assessment criteria are satisfied." if Component_Shape == 2 and Check_long == "Pass"
    "The Level 2 assessment criteria are not satisfied." otherwise
Result_Level2 = "The Level 2 assessment criteria are  not satisfied."
# [area: Page7_Short Report_Level2]
# -----------------------------------------------------------------------------------------------------------------------------------------------------------------------------------
# File | Edit | Tool | View | Help
# -----------------------------------------------------------------------------------------------------------------------------------------------------------------------------------
# Equipment | Design | Material | Dimention | Load | Result | Save | Report | Close
Result := Result_Level2
Result = "The Level 2 assessment criteria are  not satisfied."
# [component: outputs Next]
# -----------------------------------------------------------------------------------------------------------------------------------------------------------------------------------
# [area: Page8_Long Report_Level2]
# ----------------------------------------------For Level 1---------------------------------------------------------------
EquipmentType = "Pipe Component"
Component_Type = 1
DesignCode = "ASME Section VIII Div.1"
Failure_Mode = "General Metal Loss "
Methodology = "API 579-1/ASME FFS-1 2007 Fitness-For-Service"
# o ------------------------------------------------------------- o
# -
# -
# -
# -
# -
# -
# -
# -
# -
# -
# -
# -
# -
# -
# -
# -
# -
# -
# -
# -
# -
# -
# -
# -
# -
# -
# Picture
# Picture
# Picture
# o ------------------------------------------------------------- o
AssessmentLevel = "Level 1"
AnalysisBy = "TEST NAME"
AnalysisDate = "1/1/14"
AttachPicture = "TEST PICTURE"
AnalysisDetail = "FAILURE"
# -----------------------------------------------------------------------------------------------------------------------------------------------------------------------------------
# STEP 1 – Determine the CTP
CTP = [
    1.15, 1.15, 1.15, 1.15, 1.15, 1.15, 1.15, 1.15, 1.15;
    1.15, 0.87, 0.75, 0.7, 0.76, 0.8, 0.85, 0.94, 1.15;
    1.15, 0.81, 0.82, 0.84, 0.62, 0.47, 0.65, 0.9, 1.15;
    1.15, 0.85, 0.88, 0.81, 0.84, 0.83, 0.9, 0.91, 1.15;
    1.15, 1.15, 1.15, 1.15, 1.15, 1.15, 1.15, 1.15, 1.15
]
t_mm = 0.47
Unit_Length = "mm"
# Longitudinal CTP
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# Curcumferential CTP
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# STEP 2 – Determine the wall thickness to be used in the assessment
t_c = 1.025
Unit_Length = "mm"
# STEP 3 – Determine the minimum measured thickness and the dimension s for CTP
t_mm = 0.47
Unit_Length = "mm"
s = 4
Unit_Length = "mm"
# STEP 4 –Determine the remaining thickness ratio
R_t = 0.336585
λ = 0.518162
# STEP 5 – Check the limiting flaw size criteria
Check_R_t = "Pass"
Check_L_msd = "Pass"
Check_t_mm = "Fail"
Check_flaw_long = "Fail"
# STEP 6  – Check the limiting groove size criteria
# This assessment only for Local Thin Area, LTA, not for Groove-Like Flaw
# STEP 7 – Determine the MAWP for the component
# Circumferential direction
MAWP_C = 368.97
Unit_Stress = "MPa"
# Longitudinal direction
MAWP_L = 753.835
Unit_Stress = "MPa"
MAWP = 368.97
Unit_Stress = "MPa"
# STEP 8 – Evaluate the result
# Define the allowable remaining strength factor
transpose(CTP_L) = [1.15, 0.81, 0.75, 0.7, 0.62, 0.47, 0.65, 0.9, 1.15]
RSF = 0.964506
MAWP_r = 395.416
Unit_Stress = "MPa"
Check_long = "Fail"
# ///////////////////////////////////////////////Do step 9 when Component_Shape is Cylindrical only///////////////////////////////////////////////
# STEP 9 – Evaluate the circumferential extent of the flaw
# STEP 9.1 – Determine the circumferential flaw length parameter
c = 4
Unit_Length = "mm"
λ_c = 0.518162
# STEP 9.2 – Check the limiting circumferential flaw size criteria
Check_λ_c = "Pass"
Check_D_t_c = "Pass"
Check_RSF = "Pass"
# STEP 9.3 – Determine the tensile stress factor
TSF = 1.0368
Check_TSF = "Pass"
Check_flaw_cir = 1
# Interpolate R.t from Table5_4
Table5_4 = [
    0.7, 0.75, 0.8, 0.9, 1, 1.2, 1.4, 1.8, 2.3;
    0.21, 0.48, 0.67, 0.98, 1.23, 1.66, 2.03, 2.66, 3.35;
    0.99221, 0.96801, 0.94413, 0.89962, 0.85947, 0.78654, 0.72335, 0.60737, 0.49304;
    -0.11959, -0.2378, -0.31256, -0.3886, -0.40012, -0.25322, 0.011528, 0.93796, 2.1692;
    -0.057333, -0.32678, -0.69968, -1.6485, -2.7979, -5.7982, -9.3536, -19.239, -32.459;
    0.016948, 0.20684, 0.6502, 2.3445, 5.0729, 13.858, 26.031, 64.267, 122.45;
    -0.0017976, -0.046537, -0.22102, -1.2534, -3.5217, -13.118, -29.372, -91.307, -202.43;
    6.9114e-5, 0.0039436, 0.028799, 0.25331, 0.91877, 4.6436, 12.387, 48.962, 127.27
]
# Interpolate to determine minimum value of Rt
R_t_cir = 0.2
Check_cir = "Pass"
Result_Level2 = "The Level 2 assessment criteria are  not satisfied."
# -----------------------------------------------------------------------------------------------------------------------------------------------------------------------------------
# Done
# Step 9 : Evaluate the circumferential extent of the flaw
# Step 9.1 : Determine the circumferential flaw length parameter
# Done
c = 4000 mm/m
λ_C =  # error: This variable is undefined.
# Step 9.2
Check_λC =  # error
Check_ThinWall =  # error
Check_EL =  # error
Check_EC =  # error
Check_RSF :=
    "Pass" if 0.7 ≤ RSF ≤ 1.0
    "Fail" otherwise
Check_RSF = "Pass"
ContinueToStep9_3 :=
    "Yes" if Check_λC == "Pass" and Check_ThinWall == "Pass" and Check_RSF == "Pass" and Check_EL == "Pass" and Check_EC == "Pass"
    "No, higher assessment level is necessary" otherwise
ContinueToStep9_3 =  # error
# Step 9.3 : Determine tensile stress factor
TSF :=
    (E_C/(2*RSF)*(1 + sqrt(4 - 3*E_L^2)/E_L)) if ContinueToStep9_3 == "Yes"
    "Not available" otherwise
TSF =  # error
# [area: Determine the minimum of Rt on screening curve Fig 5.8]
Table5_4 := [
    0.7, 0.75, 0.8, 0.9, 1, 1.2, 1.4, 1.8, 2.3;
    0.21, 0.48, 0.67, 0.98, 1.23, 1.66, 2.03, 2.66, 3.35;
    0.99221, 0.96801, 0.94413, 0.89962, 0.85947, 0.78654, 0.72335, 0.60737, 0.49304;
    -0.11959, -0.2378, -0.31256, -0.3886, -0.40012, -0.25322, 0.011528, 0.93796, 2.1692;
    -0.057333, -0.32678, -0.69968, -1.6485, -2.7979, -5.7982, -9.3536, -19.239, -32.459;
    0.016948, 0.20684, 0.6502, 2.3445, 5.0729, 13.858, 26.031, 64.267, 122.45;
    -0.0017976, -0.046537, -0.22102, -1.2534, -3.5217, -13.118, -29.372, -91.307, -202.43;
    6.9114e-5, 0.0039436, 0.028799, 0.25331, 0.91877, 4.6436, 12.387, 48.962, 127.27
]
UpperIndex :=
    UpperIndex ← 1
    for i ∈ 1 .. 9
        UpperIndex ← UpperIndex + 1 if TSF ≥ Table5_4[1, i]
        UpperIndex ← UpperIndex otherwise
    UpperIndex
UpperIndex =  # error
LowerIndex := UpperIndex - 1
LowerIndex =  # error
i := 1 .. 6
C_up[i] := Table5_4[i + 2, UpperIndex]
transpose(C_up) =  # error
C_lo[i] := Table5_4[i + 2, LowerIndex]
transpose(C_lo) =  # error
R_t_up :=
    0.2 if λ_C ≤ Table5_4[2, UpperIndex]
    sum(C_up[i]/λ_C^(i - 1), i = 1 .. 6) otherwise
R_t_up =  # error
R_t_lo :=
    0.2 if λ_C ≤ Table5_4[2, LowerIndex]
    sum(C_lo[i]/λ_C^(i - 1), i = 1 .. 6) otherwise
R_t_lo =  # error
# Interpolate to determine minimum value of Rt
TSF_lo := Table5_4[1, LowerIndex]
TSF_up := Table5_4[1, UpperIndex]
R_t_min := R_t_lo + (TSF - TSF_lo)/(TSF_up - TSF_lo)*(R_t_up - R_t_lo)
R_t_min =  # error
Level2_Assessment :=
    "Circumferential flaw is acceptable" if R_t ≥ R_t_min
    "Circumferential flaw is unacceptable" otherwise
Level2_Assessment =  # error
