# [area: Page1_Home]
# -----------------------------------------------------------------------------------------------------------------------------------------------------------------------------------
# File | Edit | Tool | View | Help
# -----------------------------------------------------------------------------------------------------------------------------------------------------------------------------------
# Failure Mode
# Which assessment do you choose?
# Brittle Fracture | General Metal Loss | Local Metal Loss
# Pitting Corrosion | Crack-like Flaw | Creep Rupture
# [component: outputs Next]
# -----------------------------------------------------------------------------------------------------------------------------------------------------------------------------------
# Code
Failure_Mode := "Pitting Corrosion"
# [area: Code_Home]
Failure_Mode := "Pitting Corrosion"
# [area: Page2_Equipment]
# -----------------------------------------------------------------------------------------------------------------------------------------------------------------------------------
# File | Edit | Tool | View | Help
# -----------------------------------------------------------------------------------------------------------------------------------------------------------------------------------
# Equipment | Design | Material | Dimention | Load | Result | Save | Report | Close
# Equipment Data
# xxxxxxxxxxxxxxxxxxxxxxxxxxxxxxxxxxxxxxxxxxxxxxxxxxxxxxxxxxxxxxxxxxxxxxxxxxxxxxxxxxxxxxxxxxxxxx
# [component: outputs Equipment_Name]
# [component: outputs Equipment_Type]
# {selected Pressure Vessel}
# xxxxxxxxxxxxxxxxxxxxxxxxxxxxxxxxxxxxxxxxxxxxxxxxxxxxxxxxxxxxxxxxxxxxxxxxxxxxxxxxxxxxxxxxxxxxxx
# [component: outputs Methodology]
# [component: outputs Assessment_Level]
# {Level 3 not active now}
# xxxxxxxxxxxxxxxxxxxxxxxxxxxxxxxxxxxxxxxxxxxxxxxxxxxxxxxxxxxxxxxxxxxxxxxxxxxxxxxxxxxxxxxxxxxxxx
# [component: outputs Unit]
# {selected in-psi-oF}
# xxxxxxxxxxxxxxxxxxxxxxxxxxxxxxxxxxxxxxxxxxxxxxxxxxxxxxxxxxxxxxxxxxxxxxxxxxxxxxxxxxxxxxxxxxxxxx
# [component: outputs Analysis_By]
# [component: outputs Analysis_Date]
# [component: outputs Attach_Picture]
# xxxxxxxxxxxxxxxxxxxxxxxxxxxxxxxxxxxxxxxxxxxxxxxxxxxxxxxxxxxxxxxxxxxxxxxxxxxxxxxxxxxxxxxxxxxxxx
# [area: Code_Equipment]
# //Unit
Unit_Length :=
    "mm" if Unit == 1
    "in" if Unit == 2
Unit_Length = "mm"
Unit_Stress :=
    "MPa" if Unit == 1
    "psi" if Unit == 2
Unit_Stress = "MPa"
Unit_Temp :=
    "oC" if Unit == 1
    "oF" if Unit == 2
Unit_Temp = "oC"
Unit_Time := "Hrs"
Unit_Time = "Hrs"
# //Equipment Type
EquipmentType :=
    "Pipe Component" if Equipment_Type == 1
    "Pressure Vessel" if Equipment_Type == 2
    "Atmospheric Storage Tank" otherwise
EquipmentType = "Pipe Component"
# //Methodology
Methodology :=
    "API 579-1/ASME FFS-1 2007 Fitness-For-Service" if Methodology == 1
    "Other" otherwise
Methodology = "API 579-1/ASME FFS-1 2007 Fitness-For-Service"
# //Assessment Level
AssessmentLevel :=
    "Level 1" if Assessment_Level == 1
    "Level 2" if Assessment_Level == 2
    "Level 3" otherwise
AssessmentLevel = "Level 1"
# //Analysis By
AnalysisBy := Analysis_By
AnalysisBy = "TEST"
# //Analysis Date
AnalysisDate := Analysis_Date
AnalysisDate = "1/1/14"
# //Attach Picture
AttachPicture := Attach_Picture
AttachPicture = "TEST PICTURE"
# [area: Page3_Design]
# -----------------------------------------------------------------------------------------------------------------------------------------------------------------------------------
# File | Edit | Tool | View | Help
# -----------------------------------------------------------------------------------------------------------------------------------------------------------------------------------
# Equipment | Design | Material | Dimention | Load | Result | Save | Report | Close
# Design Data
# xxxxxxxxxxxxxxxxxxxxxxxxxxxxxxxxxxxxxxxxxxxxxxxxxxxxxxxxxxxxxxxxxxxxxxxxxxxxxxxxxxxxxxxxxxxxxxxxxxx
# [component: outputs Component_Type]
# {selected Cylidrical Shell}
# [component: outputs Component_Shape]
# [component: outputs Design_Code]
# xxxxxxxxxxxxxxxxxxxxxxxxxxxxxxxxxxxxxxxxxxxxxxxxxxxxxxxxxxxxxxxxxxxxxxxxxxxxxxxxxxxxxxxxxxxxxxxxxxx
# [component: outputs Inside_Diameter]
Unit_Length = "mm"
# [component: outputs Nominal_Thickness]
Unit_Length = "mm"
# [component: outputs Future_Corrosion_Allowance]
Unit_Length = "mm"
# [component: outputs Uniform_Metal_Loss]
Unit_Length = "mm"
# [component: outputs Weld_Efficiency]
# xxxxxxxxxxxxxxxxxxxxxxxxxxxxxxxxxxxxxxxxxxxxxxxxxxxxxxxxxxxxxxxxxxxxxxxxxxxxxxxxxxxxxxxxxxxxxxxxxxx
# [component: outputs Automaticcally_Min_Require_Thickness]
# {don't active}
# [component: outputs Min_Require_Longitutinal_Thickness]
Unit_Length = "mm"  # {don't active}
# [component: outputs Min_Require_Circumferential_Thickness]
Unit_Length = "mm"  # {don't active}
# xxxxxxxxxxxxxxxxxxxxxxxxxxxxxxxxxxxxxxxxxxxxxxxxxxxxxxxxxxxxxxxxxxxxxxxxxxxxxxxxxxxxxxxxxxxxxxxxxxx
# [component: outputs Pressure_Design]
Unit_Stress = "MPa"
# [component: outputs Temperature_Design]
Unit_Temp = "oC"
# xxxxxxxxxxxxxxxxxxxxxxxxxxxxxxxxxxxxxxxxxxxxxxxxxxxxxxxxxxxxxxxxxxxxxxxxxxxxxxxxxxxxxxxxxxxxxxxxxxx
# [area: Code_Design]
ComponentShape :=
    "Cylindical" if Component_Shape == 1
    "Sphericall" otherwise
ComponentShape = "Cylindical"
DesignCode :=
    "ASME Section VIII Div.1" if Design_Code == 1
    "ASME Section VIII Div.2" if Design_Code == 2
    "ASME B31.3" if Design_Code == 3
    "API 620" if Design_Code == 3
    "Other" otherwise
DesignCode = "ASME Section VIII Div.1"
P_design := str2num(Pressure_Design)
P_design = 300
T_design := str2num(Temperature_Design)
T_design = 250
D := str2num(Inside_Diameter)
D = 60
t_nom := str2num(Nominal_Thickness)
t_nom = 0.75
FCA := str2num(Future_Corrosion_Allowance)
FCA = 0.07
LOSS := str2num(Uniform_Metal_Loss)
LOSS = 0.05
R := D/2 + FCA + LOSS
R = 30.12
E := str2num(Weld_Efficiency)
E = 0.85
t_min_l :=
    str2num(Min_Require_Longitutinal_Thickness) if Automaticcally_Min_Require_Thickness == 1
    0 otherwise
t_min_l = 0
t_min_c :=
    str2num(Min_Require_Circumferential_Thickness) if Automaticcally_Min_Require_Thickness == 1
    0 otherwise
t_min_c = 0
t_min := max(t_min_l, t_min_c)
t_min = 0
# [area: Page4_Material]
# -----------------------------------------------------------------------------------------------------------------------------------------------------------------------------------
# File | Edit | Tool | View | Help
# -----------------------------------------------------------------------------------------------------------------------------------------------------------------------------------
# Equipment | Design | Material | Dimention | Load | Result | Save | Report | Close
# Material Data
# x xxxxxxxxxxxxxxxxxxxxxxxxxxxxxxxxxxxxxxxxxxxxxxxxxxxxxxxxxxxxxxxxxxxxxxxxxxxxxxxxxxxxxxxxxxxxxxx x
# [component: outputs Material_Specification]
# [component: outputs Material_Name]
# {active when Material_Specification = Other}
# x xxxxxxxxxxxxxxxxxxxxxxxxxxxxxxxxxxxxxxxxxxxxxxxxxxxxxxxxxxxxxxxxxxxxxxxxxxxxxxxxxxxxxxxxxxxxxxx x
# [component: outputs Automatically_Calculation_Allowable_Stress]
# {do not tick}
# [component: outputs Allowable_Stress]
Unit_Stress = "MPa"  # {not active if tick "Automatically_Calculation_Allowable_Stress"}
# [component: outputs Ultimated_Tensile_Strength]
Unit_Stress = "MPa"  # {not active if tick "Automatically_Calculation_Allowable_Stress"}
# [component: outputs Yield_Stresngth]
Unit_Stress = "MPa"  # {not active if tick "Automatically_Calculation_Allowable_Stress"}
# x xxxxxxxxxxxxxxxxxxxxxxxxxxxxxxxxxxxxxxxxxxxxxxxxxxxxxxxxxxxxxxxxxxxxxxxxxxxxxxxxxxxxxxxxxxxxxxx x
# [area: Code_Material]
# Code
Material :=
    Material_Name if Material_Specification == 3
    "test material" otherwise
S_utm := str2num(Ultimated_Tensile_Strength)
S_utm = 1
S_y := str2num(Yield_Stresngth)
S_y = 1
S_allow :=
    str2num(Allowable_Stress) if Automatically_Calculation_Allowable_Stress == 0
    min(0.85/3.5*S_utm, 2/3*0.85*S_y) otherwise  # //reference: TABLE 1-100 ASME SEC II-D-2010
S_allow = 17500
# [area: Page5_Flaw]
# -----------------------------------------------------------------------------------------------------------------------------------------------------------------------------------
# File | Edit | Tool | View | Help
# -----------------------------------------------------------------------------------------------------------------------------------------------------------------------------------
# Equipment | Design | Material | Dimention | Load | Result | Save | Report | Close
# Dimension Data
# x xxxxxxxxxxxxxxxxxxxxxxxxxxxxxxxxxxxxxxxxxxxxxxxxxxxxxxxxxxxxxxxxxxxxxxxxxxxxxxxxxxxxxxxxx x
# [component: outputs The_Maximum_Pit_Depth]
Unit_Length = "mm"
# [component: outputs The_Standard_Pit_Chart]
# {Select Grade 2}
# x xxxxxxxxxxxxxxxxxxxxxxxxxxxxxxxxxxxxxxxxxxxxxxxxxxxxxxxxxxxxxxxxxxxxxxxxxxxxxxxxxxxxxxxxx x
# Single Layer Analysis
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# << show these picture
# angle between σ_2 direction and the line joining pit 1 and 2 of pit couple k
# number of pit-couple, k | distance between pit centers in pit-couple k | diameter of pit i in pit-couple k | depth of the pit i in pit-couple k | diameter of pit j in pit-couple k | depth of the pit j in pit-couple k
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# << data input in table
# ex. below
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# x xxxxxxxxxxxxxxxxxxxxxxxxxxxxxxxxxxxxxxxxxxxxxxxxxxxxxxxxxxxxxxxxxxxxxxxxxxxxxxxxxxxxxxxxxx x
# [component: outputs Automaticcally_Allowable_RSF]
# [component: outputs Allowable_RSF]
# {not active if tick Automaticcally_Allowable_RSF, default = 0.9}
# [area: Code_Flaw]
w_max := str2num(The_Maximum_Pit_Depth)
Pit_chart :=
    "Figure 6.3 – Pitting Chart for Grade 1 Pitting" if The_Standard_Pit_Chart == 1
    "Figure 6.4 – Pitting Chart for Grade 2 Pitting" if The_Standard_Pit_Chart == 2
    "Figure 6.5 – Pitting Chart for Grade 3 Pitting" if The_Standard_Pit_Chart == 3
    "Figure 6.6 – Pitting Chart for Grade 4 Pitting" if The_Standard_Pit_Chart == 4
    "Figure 6.7 – Pitting Chart for Grade 5 Pitting" if The_Standard_Pit_Chart == 5
    "Figure 6.8 – Pitting Chart for Grade 6 Pitting" if The_Standard_Pit_Chart == 6
    "Figure 6.9 – Pitting Chart for Grade 7 Pitting" if The_Standard_Pit_Chart == 7
    "Figure 6.10 – Pitting Chart for Grade 8 Pitting" if The_Standard_Pit_Chart == 8
    "Other" otherwise
RSF_a :=
    str2num(Allowable_RSF) if Automaticcally_Allowable_RSF == 1
    0.9 otherwise
RSF_a = 0.9
a :=
    "E:\Calculation sheet rev01\Part 6 Pitting Corrosion\Figure 6.3 – Pitting Chart for Grade 1 Pitting.bmp" if The_Standard_Pit_Chart == 1
    "E:\Calculation sheet rev01\Part 6 Pitting Corrosion\Figure 6.4 – Pitting Chart for Grade 2 Pitting.bmp" if The_Standard_Pit_Chart == 2
    "E:\Calculation sheet rev01\Part 6 Pitting Corrosion\Figure 6.5 – Pitting Chart for Grade 3 Pitting.bmp" if The_Standard_Pit_Chart == 3
    "E:\Calculation sheet rev01\Part 6 Pitting Corrosion\Figure 6.6 – Pitting Chart for Grade 4 Pitting.bmp" if The_Standard_Pit_Chart == 4
    "E:\Calculation sheet rev01\Part 6 Pitting Corrosion\Figure 6.7 – Pitting Chart for Grade 5 Pitting.bmp" if The_Standard_Pit_Chart == 5
    "E:\Calculation sheet rev01\Part 6 Pitting Corrosion\Figure 6.8 – Pitting Chart for Grade 6 Pit.bmp" if The_Standard_Pit_Chart == 6
    "E:\Calculation sheet rev01\Part 6 Pitting Corrosion\Figure 6.9 – Pitting Chart for Grade 7 Pitting.bmp" if The_Standard_Pit_Chart == 7
    "E:\Calculation sheet rev01\Part 6 Pitting Corrosion\Figure 6.10 – Pitting Chart for Grade 8 Pitting.bmp" if The_Standard_Pit_Chart == 8
    "E:\Calculation sheet rev01\Part 6 Pitting Corrosion\User defined.bmp" otherwise
# [component: inputs a]
# [area: Page6_Load]
# -----------------------------------------------------------------------------------------------------------------------------------------------------------------------------------
# File | Edit | Tool | View | Help
# -----------------------------------------------------------------------------------------------------------------------------------------------------------------------------------
# Equipment | Design | Material | Dimention | Load | Result | Save | Report | Close
# Load Data
# x xxxxxxxxxxxxxxxxxxxxxxxxxxxxxxxxxxxxxxxxxxxxxxxxxxxxxxxxxxxxxxxxxxxxxxxxxxxxxxxxxxxxxxxxx x
# [component: outputs Operating_Pressure]
Unit_Stress = "MPa"
# [component: outputs Operating_Temperature]
Unit_Temp = "oC"
# [area: Code_Load]
P_oper := str2num(Operating_Pressure)
P_oper = 300
Unit_Stress = "MPa"
T_oper := str2num(Operating_Temperature)
T_oper = 250
Unit_Stress = "MPa"
# [area: Calculation_Level1]
# -----------------------------------------------------------------------------------------------------------------------------------------------------------------------------------
# STSTEP 1 – Determine the assement parameter.
D = 60
Unit_Length = "mm"
FCA = 0.07
Unit_Length = "mm"
LOSS = 0.05
Unit_Length = "mm"
t_nom = 0.75
Unit_Length = "mm"
# STEP 2 – Determine the wall thickness to be used in the assessment.
t_c := t_nom - FCA - LOSS
t_c = 0.63
Unit_Length = "mm"
# STEP 3 – Locate the area on the component that has the highest density of pitting damage based on the
# number of pits.
# STEP 4 – Determine the maximum pit depth.
w_max = 0.3
Unit_Length = "mm"
# STEP 5 – Determine the ratio of the remaining wall thickness
R_wt := (t_c + FCA - w_max)/t_c
R_wt = 0.634921
Check_R_wt :=
    "Pass" if R_wt ≥ 0.2
    "Not Pass" otherwise
Check_R_wt = "Pass"
# STEP 6 – Determine the MAWP for the component
# Cylindrical Shells
# Circumferential direction
MAWP_C := S_allow*E*t_c/(R + 0.6*t_c)
MAWP_C = 307.274
Unit_Stress = "MPa"
# Longitudinal direction
MAWP_L := 2*S_allow*E*t_c/(R - 0.4*t_c)
MAWP_L = 627.511
Unit_Stress = "MPa"
MAWP := min(MAWP_L, MAWP_C)
MAWP = 307.274
Unit_Stress = "MPa"
# STEP 7 – Compare the surface damage from the photographs or rubbings to the standard pit charts
# shown in Figures 6.3 through 6.10.
Pit_chart = "Figure 6.3 – Pitting Chart for Grade 1 Pitting"
# [component: inputs a]
# Figure 6.3 –Pitting Chart for Grade 1 Pitting
# >> column 0 = R_wt.std
# >> column 1 = for Cylinder
# >> column 1 = for Sphere
R_wt.6.3 := [0.8, 0.97, 0.96; 0.6, 0.95, 0.91; 0.4, 0.92, 0.87; 0.2, 0.89, 0.83]
R_wt.6.4 := [0.8, 0.97, 0.96; 0.6, 0.95, 0.91; 0.4, 0.92, 0.87; 0.2, 0.89, 0.83]
R_wt.6.5 := [0.8, 0.96, 0.95; 0.6, 0.93, 0.89; 0.4, 0.89, 0.84; 0.2, 0.86, 0.79]
R_wt.6.6 := [0.8, 0.95, 0.93; 0.6, 0.90, 0.86; 0.4, 0.85, 0.79; 0.2, 0.79, 0.72]
R_wt.6.7 := [0.8, 0.93, 0.91; 0.6, 0.85, 0.81; 0.4, 0.78, 0.72; 0.2, 0.70, 0.62]
R_wt.6.8 := [0.8, 0.91, 0.89; 0.6, 0.82, 0.78; 0.4, 0.73, 0.67; 0.2, 0.64, 0.56]
R_wt.6.9 := [0.8, 0.89, 0.88; 0.6, 0.79, 0.76; 0.4, 0.68, 0.63; 0.2, 0.58, 0.51]
R_wt.6.10 := [0.8, 0.88, 0.87; 0.6, 0.77, 0.74; 0.4, 0.65, 0.60; 0.2, 0.53, 0.47]
R_wt.6.11 := [0.8, 0, 0; 0.6, 0, 0; 0.4, 0, 0; 0.2, 0, 0]
R_wt.std :=
    R_wt.6.3 if Pit_chart == "Figure 6.3 – Pitting Chart for Grade 1 Pitting"
    R_wt.6.4 if Pit_chart == "Figure 6.4 – Pitting Chart for Grade 2 Pitting"
    R_wt.6.5 if Pit_chart == "Figure 6.5 – Pitting Chart for Grade 3 Pitting"
    R_wt.6.6 if Pit_chart == "Figure 6.6 – Pitting Chart for Grade 4 Pitting"
    R_wt.6.7 if Pit_chart == "Figure 6.7 – Pitting Chart for Grade 5 Pitting"
    R_wt.6.8 if Pit_chart == "Figure 6.8 – Pitting Chart for Grade 6 Pitting"
    R_wt.6.9 if Pit_chart == "Figure 6.9 – Pitting Chart for Grade 7 Pitting"
    R_wt.6.10 if Pit_chart == "Figure 6.10 – Pitting Chart for Grade 8 Pitting"
    R_wt.6.11 otherwise
R_wt.std = [0.8, 0.97, 0.96; 0.6, 0.95, 0.91; 0.4, 0.92, 0.87; 0.2, 0.89, 0.83]
UpperIndex :=
    UpperIndex ← 2
    for i ∈ 2 .. 1
        UpperIndex ← UpperIndex - 1 if R_wt ≥ R_wt.std[i, 0]
        UpperIndex ← UpperIndex otherwise
    UpperIndex
UpperIndex = 0
LowerIndex := UpperIndex + 1
LowerIndex = 1
RSF_low :=
    R_wt.std[LowerIndex, 1] if Component_Shape == 1
    R_wt.std[LowerIndex, 2] otherwise
# >> Component_Shape = Cylinder
# >> Component_Shape = Sphere
RSF_up :=
    R_wt.std[UpperIndex, 1] if Component_Shape == 1
    R_wt.std[UpperIndex, 2] otherwise
# >> Component_Shape = Cylinder
# >> Component_Shape = Sphere
R_wt.std.low := R_wt.std[LowerIndex, 0]
R_wt.std.low = 0.6
R_wt.std.up := R_wt.std[UpperIndex, 0]
R_wt.std.up = 0.8
RSF :=
    R_wt if R_wt.std == R_wt.6.11
    RSF_low + (RSF_up - RSF_low)/(R_wt.std.up - R_wt.std.low)*(R_wt - R_wt.std.low) otherwise
RSF = 0.953492
# STEP 8 – Determine the RSF.
RSF = 0.953492
# STEP 9 – Evaluate damage.
RSF_a = 0.9
MAWP_r :=
    MAWP if RSF ≥ RSF_a
    MAWP*RSF/RSF_a otherwise
MAWP_r = 307.274
Unit_Stress = "MPa"
Result_Level1 :=
    "The Level 1 assessment criteria are not satisfied." if RSF < RSF_a or Check_R_wt == "Fail"
    "The Level 1 assessment criteria are satisfied." otherwise
Result_Level1 = "The Level 1 assessment criteria are satisfied."
# -----------------------------------------------------------------------------------------------------------------------------------------------------------------------------------
# [area: Page7_Short Report_Level1]
# -----------------------------------------------------------------------------------------------------------------------------------------------------------------------------------
# File | Edit | Tool | View | Help
# -----------------------------------------------------------------------------------------------------------------------------------------------------------------------------------
# Equipment | Design | Material | Dimention | Load | Result | Save | Report | Close
Result := Result_Level1
Result = "The Level 1 assessment criteria are satisfied."
# [component: outputs Next]
# -----------------------------------------------------------------------------------------------------------------------------------------------------------------------------------
# [area: Page8_Long Report_Level1]
# ----------------------------------------------For Level 1---------------------------------------------------------------
EquipmentType = "Pipe Component"
Component_Type = 1
DesignCode = "ASME Section VIII Div.1"
Failure_Mode = "Pitting Corrosion"
Methodology = "API 579-1/ASME FFS-1 2007 Fitness-For-Service"
# o ------------------------------------------------------------- o
# -
# -
# -
# -
# -
# -
# -
# -
# -
# -
# -
# -
# -
# -
# -
# -
# -
# -
# -
# -
# -
# -
# -
# -
# -
# -
# Picture
# Picture
# Picture
# o ------------------------------------------------------------- o
AssessmentLevel = "Level 1"
AnalysisBy = "TEST"
AnalysisDate = "1/1/14"
AttachPicture = "TEST PICTURE"
# -----------------------------------------------------------------------------------------------------------------------------------------------------------------------------------
# STEP 1 – Determine the assement parameter.
D = 60
Unit_Length = "mm"
FCA = 0.07
Unit_Length = "mm"
LOSS = 0.05
Unit_Length = "mm"
t_nom = 0.75
Unit_Length = "mm"
# STEP 2 – Determine the wall thickness to be used in the assessment.
t_c = 0.63
Unit_Length = "mm"
# STEP 3 – Locate the area on the component that has the highest density of pitting damage based on the
# number of pits.
# STEP 4 – Determine the maximum pit depth.
w_max = 0.3
Unit_Length = "mm"
# STEP 5 – Determine the ratio of the remaining wall thickness
R_wt = 0.634921
# STEP 6 – Determine the MAWP for the component
# Circumferential direction
MAWP_C = 307.274
Unit_Stress = "MPa"
# Longitudinal direction
MAWP_L = 627.511
Unit_Stress = "MPa"
MAWP = 307.274
Unit_Stress = "MPa"
# STEP 7 – Compare the surface damage from the photographs or rubbings to the standard pit charts
# shown in Figures 6.3 through 6.10.
Pit_chart = "Figure 6.3 – Pitting Chart for Grade 1 Pitting"
# [component: inputs a]
# STEP 8 – Determine the RSF.
RSF = 0.953492
# STEP 9 – Evaluate damage.
RSF_a = 0.9
MAWP_r = 307.274
Unit_Stress = "MPa"
Result_Level1 = "The Level 1 assessment criteria are satisfied."
# -----------------------------------------------------------------------------------------------------------------------------------------------------------------------------------
