# [area: Page1_Home]
# -----------------------------------------------------------------------------------------------------------------------------------------------------------------------------------
# File | Edit | Tool | View | Help
# -----------------------------------------------------------------------------------------------------------------------------------------------------------------------------------
# Failure Mode
# Which assessment do you choose?
# Brittle Fracture | General Metal Loss | Local Metal Loss
# Pitting Corrosion | Crack-like Flaw | Creep Rupture
# [component: outputs Next]
# -----------------------------------------------------------------------------------------------------------------------------------------------------------------------------------
# Code
Failure_Mode := "Pitting Corrosion"
# [area: Code_Home]
Failure_Mode := "Pitting Corrosion"
# [area: Page2_Equipment]
# -----------------------------------------------------------------------------------------------------------------------------------------------------------------------------------
# File | Edit | Tool | View | Help
# -----------------------------------------------------------------------------------------------------------------------------------------------------------------------------------
# Equipment | Design | Material | Dimention | Load | Result | Save | Report | Close
# Equipment Data
# xxxxxxxxxxxxxxxxxxxxxxxxxxxxxxxxxxxxxxxxxxxxxxxxxxxxxxxxxxxxxxxxxxxxxxxxxxxxxxxxxxxxxxxxxxxxxx
# [component: outputs Equipment_Name]
# [component: outputs Equipment_Type]
# {selected Pressure Vessel}
# xxxxxxxxxxxxxxxxxxxxxxxxxxxxxxxxxxxxxxxxxxxxxxxxxxxxxxxxxxxxxxxxxxxxxxxxxxxxxxxxxxxxxxxxxxxxxx
# [component: outputs Methodology]
# [component: outputs Assessment_Level]
# {Select Level 2}
# xxxxxxxxxxxxxxxxxxxxxxxxxxxxxxxxxxxxxxxxxxxxxxxxxxxxxxxxxxxxxxxxxxxxxxxxxxxxxxxxxxxxxxxxxxxxxx
# [component: outputs Unit]
# {selected in-psi-oF}
# xxxxxxxxxxxxxxxxxxxxxxxxxxxxxxxxxxxxxxxxxxxxxxxxxxxxxxxxxxxxxxxxxxxxxxxxxxxxxxxxxxxxxxxxxxxxxx
# [component: outputs Analysis_By]
# [component: outputs Analysis_Date]
# [component: outputs Attach_Picture]
# xxxxxxxxxxxxxxxxxxxxxxxxxxxxxxxxxxxxxxxxxxxxxxxxxxxxxxxxxxxxxxxxxxxxxxxxxxxxxxxxxxxxxxxxxxxxxx
# [area: Code_Equipment]
# //Unit
Unit_Length :=
    "mm" if Unit == 1
    "in" if Unit == 2
Unit_Length = "in"
Unit_Stress :=
    "MPa" if Unit == 1
    "psi" if Unit == 2
Unit_Stress = "psi"
Unit_Temp :=
    "oC" if Unit == 1
    "oF" if Unit == 2
Unit_Temp = "oF"
Unit_Time := "Hrs"
Unit_Time = "Hrs"
# //Equipment Type
EquipmentType :=
    "Pipe Component" if Equipment_Type == 1
    "Pressure Vessel" if Equipment_Type == 2
    "Atmospheric Storage Tank" otherwise
EquipmentType = "Pipe Component"
# //Methodology
Methodology :=
    "API 579-1/ASME FFS-1 2007 Fitness-For-Service" if Methodology == 1
    "Other" otherwise
Methodology = "API 579-1/ASME FFS-1 2007 Fitness-For-Service"
# //Assessment Level
AssessmentLevel :=
    "Level 1" if Assessment_Level == 1
    "Level 2" if Assessment_Level == 2
    "Level 3" otherwise
AssessmentLevel = "Level 2"
# //Analysis By
AnalysisBy := Analysis_By
AnalysisBy = "TEST"
# //Analysis Date
AnalysisDate := Analysis_Date
AnalysisDate = "1/1/14"
# //Attach Picture
AttachPicture := Attach_Picture
AttachPicture = "TEST PICTURE"
# [area: Page3_Design]
# -----------------------------------------------------------------------------------------------------------------------------------------------------------------------------------
# File | Edit | Tool | View | Help
# -----------------------------------------------------------------------------------------------------------------------------------------------------------------------------------
# Equipment | Design | Material | Dimention | Load | Result | Save | Report | Close
# Design Data
# xxxxxxxxxxxxxxxxxxxxxxxxxxxxxxxxxxxxxxxxxxxxxxxxxxxxxxxxxxxxxxxxxxxxxxxxxxxxxxxxxxxxxxxxxxxxxxxxxxx
# [component: outputs Component_Type]
# {selected Cylidrical Shell}
# [component: outputs Component_Shape]
# [component: outputs Design_Code]
# xxxxxxxxxxxxxxxxxxxxxxxxxxxxxxxxxxxxxxxxxxxxxxxxxxxxxxxxxxxxxxxxxxxxxxxxxxxxxxxxxxxxxxxxxxxxxxxxxxx
# [component: outputs Inside_Diameter]
Unit_Length = "in"
# [component: outputs Nominal_Thickness]
Unit_Length = "in"
# [component: outputs Future_Corrosion_Allowance]
Unit_Length = "in"
# [component: outputs Uniform_Metal_Loss]
Unit_Length = "in"
# [component: outputs Weld_Efficiency]
# xxxxxxxxxxxxxxxxxxxxxxxxxxxxxxxxxxxxxxxxxxxxxxxxxxxxxxxxxxxxxxxxxxxxxxxxxxxxxxxxxxxxxxxxxxxxxxxxxxx
# [component: outputs Automaticcally_Min_Require_Thickness]
# {don't active}
# [component: outputs Min_Require_Longitutinal_Thickness]
Unit_Length = "in"  # {don't active}
# [component: outputs Min_Require_Circumferential_Thickness]
Unit_Length = "in"  # {don't active}
# xxxxxxxxxxxxxxxxxxxxxxxxxxxxxxxxxxxxxxxxxxxxxxxxxxxxxxxxxxxxxxxxxxxxxxxxxxxxxxxxxxxxxxxxxxxxxxxxxxx
# [component: outputs Pressure_Design]
Unit_Stress = "psi"
# [component: outputs Temperature_Design]
Unit_Temp = "oF"
# xxxxxxxxxxxxxxxxxxxxxxxxxxxxxxxxxxxxxxxxxxxxxxxxxxxxxxxxxxxxxxxxxxxxxxxxxxxxxxxxxxxxxxxxxxxxxxxxxxx
# [area: Code_Design]
ComponentShape :=
    "Cylindical" if Component_Shape == 1
    "Sphericall" otherwise
ComponentShape = "Cylindical"
DesignCode :=
    "ASME Section VIII Div.1" if Design_Code == 1
    "ASME Section VIII Div.2" if Design_Code == 2
    "ASME B31.3" if Design_Code == 3
    "API 620" if Design_Code == 3
    "Other" otherwise
DesignCode = "ASME Section VIII Div.1"
P_design := str2num(Pressure_Design)
P_design = 500
T_design := str2num(Temperature_Design)
T_design = 450
D := str2num(Inside_Diameter)
D = 60
t_nom := str2num(Nominal_Thickness)
t_nom = 1.125
FCA := str2num(Future_Corrosion_Allowance)
FCA = 0.05
LOSS := str2num(Uniform_Metal_Loss)
LOSS = 0.03
R := D/2 + FCA + LOSS
R = 30.08
E := str2num(Weld_Efficiency)
E = 0.85
t_min_l :=
    str2num(Min_Require_Longitutinal_Thickness) if Automaticcally_Min_Require_Thickness == 1
    0 otherwise
t_min_l = 0
t_min_c :=
    str2num(Min_Require_Circumferential_Thickness) if Automaticcally_Min_Require_Thickness == 1
    0 otherwise
t_min_c = 0
t_min := max(t_min_l, t_min_c)
t_min = 0
# [area: Page4_Material]
# -----------------------------------------------------------------------------------------------------------------------------------------------------------------------------------
# File | Edit | Tool | View | Help
# -----------------------------------------------------------------------------------------------------------------------------------------------------------------------------------
# Equipment | Design | Material | Dimention | Load | Result | Save | Report | Close
# Material Data
# x xxxxxxxxxxxxxxxxxxxxxxxxxxxxxxxxxxxxxxxxxxxxxxxxxxxxxxxxxxxxxxxxxxxxxxxxxxxxxxxxxxxxxxxxxxxxxxx x
# [component: outputs Material_Specification]
# [component: outputs Material_Name]
# {active when Material_Specification = Other}
# x xxxxxxxxxxxxxxxxxxxxxxxxxxxxxxxxxxxxxxxxxxxxxxxxxxxxxxxxxxxxxxxxxxxxxxxxxxxxxxxxxxxxxxxxxxxxxxx x
# [component: outputs Automatically_Calculation_Allowable_Stress]
# {do not tick}
# [component: outputs Allowable_Stress]
Unit_Stress = "psi"  # {not active if tick "Automatically_Calculation_Allowable_Stress"}
# [component: outputs Ultimated_Tensile_Strength]
Unit_Stress = "psi"  # {not active if tick "Automatically_Calculation_Allowable_Stress"}
# [component: outputs Yield_Stresngth]
Unit_Stress = "psi"  # {not active if tick "Automatically_Calculation_Allowable_Stress"}
# x xxxxxxxxxxxxxxxxxxxxxxxxxxxxxxxxxxxxxxxxxxxxxxxxxxxxxxxxxxxxxxxxxxxxxxxxxxxxxxxxxxxxxxxxxxxxxxx x
# [area: Code_Material]
# Code
Material :=
    Material_Name if Material_Specification == 3
    "test material" otherwise
S_utm := str2num(Ultimated_Tensile_Strength)
S_utm = 1
S_y := str2num(Yield_Stresngth)
S_y = 1
S_allow :=
    str2num(Allowable_Stress) if Automatically_Calculation_Allowable_Stress == 0
    min(0.85/3.5*S_utm, 2/3*0.85*S_y) otherwise  # //reference: TABLE 1-100 ASME SEC II-D-2010
S_allow = 17500
# [area: Page5_Flaw]
# -----------------------------------------------------------------------------------------------------------------------------------------------------------------------------------
# File | Edit | Tool | View | Help
# -----------------------------------------------------------------------------------------------------------------------------------------------------------------------------------
# Equipment | Design | Material | Dimention | Load | Result | Save | Report | Close
# Dimension Data
# x xxxxxxxxxxxxxxxxxxxxxxxxxxxxxxxxxxxxxxxxxxxxxxxxxxxxxxxxxxxxxxxxxxxxxxxxxxxxxxxxxxxxxxxxx x
# [component: outputs The_Maximum_Pit_Depth]
Unit_Length = "in"
# [component: outputs The_Standard_Pit_Chart]
# {Select Grade 1}
# x xxxxxxxxxxxxxxxxxxxxxxxxxxxxxxxxxxxxxxxxxxxxxxxxxxxxxxxxxxxxxxxxxxxxxxxxxxxxxxxxxxxxxxxxx x
# [component: outputs pitdata]
# Single Layer Analysis
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# << show these picture
# angle between σ_2 direction and the line joining pit 1 and 2 of pit couple k
# number of pit-couple, k | distance between pit centers in pit-couple k | diameter of pit i in pit-couple k | depth of the pit i in pit-couple k | diameter of pit j in pit-couple k | depth of the pit j in pit-couple k
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# << data input in table
# ex. below
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# x xxxxxxxxxxxxxxxxxxxxxxxxxxxxxxxxxxxxxxxxxxxxxxxxxxxxxxxxxxxxxxxxxxxxxxxxxxxxxxxxxxxxxxxxxx x
# [component: outputs Automaticcally_Allowable_RSF]
# {tick}
# [component: outputs Allowable_RSF]
# {not active if tick Automaticcally_Allowable_RSF, default = 0.9}
# [area: Code_Flaw]
w_max := str2num(The_Maximum_Pit_Depth)
Pit_chart :=
    "Figure 6.3 – Pitting Chart for Grade 1 Pitting" if The_Standard_Pit_Chart == 1
    "Figure 6.4 – Pitting Chart for Grade 2 Pitting" if The_Standard_Pit_Chart == 2
    "Figure 6.5 – Pitting Chart for Grade 3 Pitting" if The_Standard_Pit_Chart == 3
    "Figure 6.6 – Pitting Chart for Grade 4 Pitting" if The_Standard_Pit_Chart == 4
    "Figure 6.7 – Pitting Chart for Grade 5 Pitting" if The_Standard_Pit_Chart == 5
    "Figure 6.8 – Pitting Chart for Grade 6 Pitting" if The_Standard_Pit_Chart == 6
    "Figure 6.9 – Pitting Chart for Grade 7 Pitting" if The_Standard_Pit_Chart == 7
    "Figure 6.10 – Pitting Chart for Grade 8 Pitting" if The_Standard_Pit_Chart == 8
    "Other" otherwise
RSF_a :=
    str2num(Allowable_RSF) if Automaticcally_Allowable_RSF == 1
    0.9 otherwise
RSF_a = 0.9
a :=
    "E:\Calculation sheet rev01\Part 6 Pitting Corrosion\Figure 6.3 – Pitting Chart for Grade 1 Pitting.bmp" if The_Standard_Pit_Chart == 1
    "E:\Calculation sheet rev01\Part 6 Pitting Corrosion\Figure 6.4 – Pitting Chart for Grade 2 Pitting.bmp" if The_Standard_Pit_Chart == 2
    "E:\Calculation sheet rev01\Part 6 Pitting Corrosion\Figure 6.5 – Pitting Chart for Grade 3 Pitting.bmp" if The_Standard_Pit_Chart == 3
    "E:\Calculation sheet rev01\Part 6 Pitting Corrosion\Figure 6.6 – Pitting Chart for Grade 4 Pitting.bmp" if The_Standard_Pit_Chart == 4
    "E:\Calculation sheet rev01\Part 6 Pitting Corrosion\Figure 6.7 – Pitting Chart for Grade 5 Pitting.bmp" if The_Standard_Pit_Chart == 5
    "E:\Calculation sheet rev01\Part 6 Pitting Corrosion\Figure 6.8 – Pitting Chart for Grade 6 Pit.bmp" if The_Standard_Pit_Chart == 6
    "E:\Calculation sheet rev01\Part 6 Pitting Corrosion\Figure 6.9 – Pitting Chart for Grade 7 Pitting.bmp" if The_Standard_Pit_Chart == 7
    "E:\Calculation sheet rev01\Part 6 Pitting Corrosion\Figure 6.10 – Pitting Chart for Grade 8 Pitting.bmp" if The_Standard_Pit_Chart == 8
    "E:\Calculation sheet rev01\Part 6 Pitting Corrosion\User defined.bmp" otherwise
# [component: inputs a]
# [area: Page6_Load]
# -----------------------------------------------------------------------------------------------------------------------------------------------------------------------------------
# File | Edit | Tool | View | Help
# -----------------------------------------------------------------------------------------------------------------------------------------------------------------------------------
# Equipment | Design | Material | Dimention | Load | Result | Save | Report | Close
# Load Data
# x xxxxxxxxxxxxxxxxxxxxxxxxxxxxxxxxxxxxxxxxxxxxxxxxxxxxxxxxxxxxxxxxxxxxxxxxxxxxxxxxxxxxxxxxx x
# [component: outputs Operating_Pressure]
Unit_Stress = "psi"
# [component: outputs Operating_Temperature]
Unit_Temp = "oF"
# [area: Code_Load]
P_oper := str2num(Operating_Pressure)
P_oper = 500
Unit_Stress = "psi"
T_oper := str2num(Operating_Temperature)
T_oper = 250
Unit_Stress = "psi"
# [area: Calculation_Level2]
# -----------------------------------------------------------------------------------------------------------------------------------------------------------------------------------
# STSTEP 1 – Determine the assement parameter.
D = 60
Unit_Length = "in"
FCA = 0.05
Unit_Length = "in"
LOSS = 0.03
Unit_Length = "in"
t_nom = 1.125
Unit_Length = "in"
# STEP 2 – Determine the wall thickness to be used in the assessment.
t_c := t_nom - FCA - LOSS
t_c = 1.045
Unit_Length = "in"
# STEP 3 – Determine the pit-couple sample for the assessment.
# [component: outputs pitdata]
# setparameter
i := 0, 1 .. (rows(pitdata) - 1)
j := 0, 1 .. (cols(pitdata) - 1)
# number of pit-couple, k
k[i] := pitdata[i, 0]
# distance between pit centers in pit-couple k
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Unit_Length = "in"
P_k[i] := pitdata[i, 1]
# angle between σ_2 direction and the line joining pit 1 and 2 of pit couple k
θ_k[i] := pitdata[i, 2]  # Unit: degree
# diameter of pit i in pit-couple k
d_ik[i] := pitdata[i, 3]
Unit_Length = "in"
# depth of the pit i in pit-couple k
w_ik[i] := pitdata[i, 4]
Unit_Length = "in"
# diameter of pit j in pit-couple k
d_jk[i] := pitdata[i, 5]
Unit_Length = "in"
# depth of the pit j in pit-couple k
w_jk[i] := pitdata[i, 6]
Unit_Length = "in"
# STEP 4 – Determine the depth of each pit.
pitdata = [
    1, 3.5, 10, 0.7, 0.27, 0.6, 0.5;
    2, 2.8, 0, 0.9, 0.6, 1.1, 0.65;
    3, 2.7, 22, 0.9, 0.5, 0.9, 0.75;
    4, 2.1, 30, 1, 0.7, 1.2, 0.6;
    5, 3.1, 5, 0.7, 0.6, 1.2, 0.5;
    6, 4.1, 25, 1.1, 0.55, 2.2, 0.45;
    7, 2.9, 20, 0.8, 0.65, 0.8, 0.6;
    8, 3.1, 45, 1.2, 0.4, 1.5, 0.75;
    9, 2.6, 60, 1.3, 0.5, 0.8, 0.2;
    10, 2.2, 0, 0.4, 0.55, 0.3, 0.75;
    11, 1.8, 10, 1.5, 0.5, 0.8, 0.5;
    12, 2.5, 20, 0.6, 0.75, 0.5, 0.7;
    13, 3.8, 35, 2.4, 0.5, 1.6, 0.7;
    14, 1.9, 25, 0.7, 0.35, 0.8, 0.5;
    15, 1.8, 0, 1, 0.7, 0.8, 0.5
]
w_avgk[i] := (w_ik[i] + w_jk[i])/2
Unit_Length = "in"
w_avgk[0] = 0.385
# STEP 5 – Calculate the components of the membrane stress field.
# Cylindrical Shells
# Circumferential direction
σ_1 := P_design/E*(R/t_c + 0.6)
σ_1 = 17285.1
Unit_Stress = "psi"
# Longitudinal direction
σ_2 := P_design/(2*E)*(R/t_c - 0.4)
Unit_Stress = "psi"
σ_2 = 8348.44
# STEP 6 – Determine the MAWP for the component
# Cylindrical Shells
# Circumferential direction
MAWP_C := S_allow*E*t_c/(R + 0.6*t_c)
MAWP_C = 506.216
Unit_Stress = "psi"
# Longitudinal direction
MAWP_L := 2*S_allow*E*t_c/(R - 0.4*t_c)
MAWP_L = 1048.1
Unit_Stress = "psi"
MAWP := min(MAWP_L, MAWP_C)
MAWP = 506.216
Unit_Stress = "psi"
# STEP 7 – Calculate the Remaining Strength Factor.
d_avgk[i] := (d_ik[i] + d_jk[i])/2
Unit_Length = "in"
d_avgk[0] = 0.65
μ_avgk[i] := (P_k[i] - d_avgk[i])/P_k[i]
Unit_Length = "in"
μ_avgk[0] = 0.814286
P_k[0] = 3.5
ρ_1k[i] := σ_1/μ_avgk[i]
Unit_Stress = "psi"
ρ_1k[0] = 21227.3
ρ_2k[i] := σ_2/μ_avgk[i]
Unit_Stress = "psi"
ρ_2k[0] = 10252.5
Ψ_k[i] := (cos(θ_k[i]*π/180)^4 + sin(2*(θ_k[i]*π/180))^2)*ρ_1k[i]^2 - 3*sin(2*(θ_k[i]*π/180))^2*ρ_1k[i]*ρ_2k[i]/2 + (sin(θ_k[i]*π/180)^4 + sin(2*(θ_k[i]*π/180))^2)*ρ_2k[i]^2
Ψ_k[0] = 450749097
Φ_k[i] := μ_avgk[i]*max(|ρ_1k[i]|, |ρ_2k[i]|, |ρ_1k[i] - ρ_2k[i]|)
Unit_Stress = "psi"
Φ_k[0] = 17285.1
E_avgk[i] := min(Φ_k/sqrt(Ψ_k[i]), 1)
E_avgk[0] = 0.814151
RSF_k[i] := 1 - w_avgk[i]/t_c*(1 - E_avgk[i])
RSF_k[0] = 0.931529
# [component: outputs RSF_table]
RSF_table[0, 1] := "w,avg,k"
RSF_table[0, 0] := "Pit-Couple k"
RSF_table[i + 1, 0] := k[i]
RSF_table[i + 1, 1] := w_avgk[i]
RSF_table[0, 3] := "ρ,1,k"
RSF_table[0, 2] := "μ,avg,k"
RSF_table[i + 1, 2] := μ_avgk[i]
RSF_table[i + 1, 3] := ρ_1k[i]
RSF_table[0, 5] := "Ψ,k"
RSF_table[0, 4] := "ρ,2,k"
RSF_table[i + 1, 5] := Ψ_k[i]
RSF_table[i + 1, 4] := ρ_2k[i]
RSF_table[0, 6] := "Φ,k"
RSF_table[0, 7] := "E,avg,k"
RSF_table[i + 1, 6] := Φ_k[i]
RSF_table[i + 1, 7] := E_avgk[i]
RSF_table[0, 8] := "RSF,k"
RSF_table[i + 1, 8] := RSF_k[i]
RSF_table = [
    "Pit-Couple k", "w,avg,k", "μ,avg,k", "ρ,1,k", "ρ,2,k", "Ψ,k", "Φ,k", "E,avg,k", "RSF,k";
    1, 0.385, 0.814286, 21227.3, 10252.5, 450749097, 17285.1, 0.814151, 0.931529;
    2, 0.625, 0.642857, 26888, 12986.5, 722961894, 17285.1, 0.642857, 0.786398;
    3, 0.625, 0.666667, 25927.7, 12522.7, 664947629, 17285.1, 0.670314, 0.80282;
    4, 0.65, 0.47619, 36298.7, 17531.7, 1.26315e9, 17285.1, 0.486345, 0.680502;
    5, 0.55, 0.693548, 24922.7, 12037.3, 621279187, 17285.1, 0.693472, 0.838669;
    6, 0.5, 0.597561, 28926.1, 13970.9, 820574017, 17285.1, 0.603411, 0.810245;
    7, 0.625, 0.724138, 23869.9, 11528.8, 565866005, 17285.1, 0.726633, 0.836503;
    8, 0.575, 0.564516, 30619.3, 14788.7, 766082021, 17285.1, 0.624503, 0.793387;
    9, 0.35, 0.596154, 28994.4, 14003.8, 483652047, 17285.1, 0.785969, 0.928315;
    10, 0.65, 0.840909, 20555.3, 9927.87, 422519015, 17285.1, 0.840909, 0.901044;
    11, 0.5, 0.361111, 47866.5, 23118.8, 2.29196e9, 17285.1, 0.361051, 0.694283;
    12, 0.725, 0.78, 22160.4, 10703.1, 487715988, 17285.1, 0.782688, 0.849233;
    13, 0.6, 0.473684, 36490.8, 17624.5, 1.23142e9, 17285.1, 0.492571, 0.708653;
    14, 0.425, 0.605263, 28558, 13793.1, 799822722, 17285.1, 0.611189, 0.841871;
    15, 0.6, 0.5, 34570.2, 16696.9, 1.1951e9, 17285.1, 0.5, 0.712919
]
RSF_pit := min(RSF_k)
RSF_pit = 0.680502
# STEP 8 – Determine the RSF.
n := rows(pitdata) - 1
RSF_pit := 1/(n + 1)*sum(RSF_k[i], i = 0 .. n)
RSF_pit = 0.807758
# STEP 9 – Evaluate damage.
RSF_a = 0.9
MAWP_r := MAWP*RSF_pit/RSF_a
MAWP_r = 454.333
Unit_Stress = "psi"
# STEP 10 – Check the recommended limitations on the individual pit dimensions
# 1)
d ≤ Q*sqrt(D*t_c)
Check_Dia[i]
# 2)
R_t ≥ 0.20
R_t(w) := (t_c + FCA - w)/t_c
Q(R_t) :=
    1.123*(((1 - R_t)/(1 - R_t/RSF_a))^2 - 1)^0.5 if R_t < RSF_a
    50 otherwise
R_ti[i] := R_t(w_ik[i])
R_tj[i] := R_t(w_jk[i])
Q_i[i] := Q(R_ti[i])
Q_j[i] := Q(R_tj[i])
Check_d_i[i] :=
    "Pass" if d_ik[i] ≤ Q_i[i]*sqrt(2*R*t_c)
    "Not Pass" otherwise
Check_d_j[i] :=
    "Pass" if d_jk[i] ≤ Q_j[i]*sqrt(2*R*t_c)
    "Not Pass" otherwise
Check_R_ti[i] :=
    "Pass" if 0.2 ≤ R_ti[i]
    "Not Pass" otherwise
Check_R_tj[i] :=
    "Pass" if 0.2 ≤ R_tj[i]
    "Not Pass" otherwise
# [component: outputs Check_table]
Check_table[0, 0] := "Pit-Couple k"
Check_table[0, 1] := "R,t,i >= 0.2"
Check_table[0, 2] := "R,t,j >= 0.2"
Check_table[i + 1, 0] := k[i]
Check_table[i + 1, 1] := Check_R_ti[i]
Check_table[i + 1, 2] := Check_R_tj[i]
Check_table[0, 3] := "d,i,k <= Qsqr(Dt,c)"
Check_table[0, 4] := "d,j,k <= Qsqr(Dt,c)"
Check_table[i + 1, 3] := Check_d_i[i]
Check_table[i + 1, 4] := Check_d_i[i]
Check_table = [
    "Pit-Couple k", "R,t,i >= 0.2", "R,t,j >= 0.2", "d,i,k <= Qsqr(Dt,c)", "d,j,k <= Qsqr(Dt,c)";
    1, "Pass", "Pass", "Pass", "Pass";
    2, "Pass", "Pass", "Pass", "Pass";
    3, "Pass", "Pass", "Pass", "Pass";
    4, "Pass", "Pass", "Pass", "Pass";
    5, "Pass", "Pass", "Pass", "Pass";
    6, "Pass", "Pass", "Pass", "Pass";
    7, "Pass", "Pass", "Pass", "Pass";
    8, "Pass", "Pass", "Pass", "Pass";
    9, "Pass", "Pass", "Pass", "Pass";
    10, "Pass", "Pass", "Pass", "Pass";
    11, "Pass", "Pass", "Pass", "Pass";
    12, "Pass", "Pass", "Pass", "Pass";
    13, "Pass", "Pass", "Pass", "Pass";
    14, "Pass", "Pass", "Pass", "Pass";
    15, "Pass", "Pass", "Pass", "Pass"
]
Check :=
    result ← "Pass"
    for i ∈ 1, 2 .. rows(Check_table) - 1
        result ← "Not Pass" if Check_table[i, 1] ≠ "Pass" or Check_table[i, 2] ≠ "Pass" or Check_table[i, 3] ≠ "Pass" or Check_table[i, 4] ≠ "Pass"
    result
Result_Level2 :=
    "The Level 2 assessment criteria are not satisfied." if RSF_pit < RSF_a and Check ≠ "Pass"
    "The Level 2 assessment criteria are satisfied." otherwise
Result_Level2 = "The Level 2 assessment criteria are satisfied."
# -----------------------------------------------------------------------------------------------------------------------------------------------------------------------------------
# [area: Page7_Short Report_Level2]
# -----------------------------------------------------------------------------------------------------------------------------------------------------------------------------------
# File | Edit | Tool | View | Help
# -----------------------------------------------------------------------------------------------------------------------------------------------------------------------------------
# Equipment | Design | Material | Dimention | Load | Result | Save | Report | Close
Result := Result_Level2
Result = "The Level 2 assessment criteria are satisfied."
# [component: outputs Next]
# -----------------------------------------------------------------------------------------------------------------------------------------------------------------------------------
# [area: Page8_Long Report_Level2]
# ----------------------------------------------For Level 2---------------------------------------------------------------
EquipmentType = "Pipe Component"
Component_Type = 1
DesignCode = "ASME Section VIII Div.1"
Failure_Mode = "Pitting Corrosion"
Methodology = "API 579-1/ASME FFS-1 2007 Fitness-For-Service"
# o ------------------------------------------------------------- o
# -
# -
# -
# -
# -
# -
# -
# -
# -
# -
# -
# -
# -
# -
# -
# -
# -
# -
# -
# -
# -
# -
# -
# -
# -
# -
# Picture
# Picture
# Picture
# o ------------------------------------------------------------- o
AssessmentLevel = "Level 2"
AnalysisBy = "TEST"
AnalysisDate = "1/1/14"
AttachPicture = "TEST PICTURE"
AnalysisDetail =  # error: This variable is undefined.
# -----------------------------------------------------------------------------------------------------------------------------------------------------------------------------------
# STSTEP 1 – Determine the assement parameter.
D = 60
Unit_Length = "in"
FCA = 0.05
Unit_Length = "in"
LOSS = 0.03
Unit_Length = "in"
t_nom = 1.125
Unit_Length = "in"
# STEP 2 – Determine the wall thickness to be used in the assessment.
# -----------------------------------------------------------------------------------------------------------------------------------------------------------------------------------
t_c = 1.045
Unit_Length = "in"
# STEP 3 – Determine the pit-couple sample for the assessment.
pitdata = [
    1, 3.5, 10, 0.7, 0.27, 0.6, 0.5;
    2, 2.8, 0, 0.9, 0.6, 1.1, 0.65;
    3, 2.7, 22, 0.9, 0.5, 0.9, 0.75;
    4, 2.1, 30, 1, 0.7, 1.2, 0.6;
    5, 3.1, 5, 0.7, 0.6, 1.2, 0.5;
    6, 4.1, 25, 1.1, 0.55, 2.2, 0.45;
    7, 2.9, 20, 0.8, 0.65, 0.8, 0.6;
    8, 3.1, 45, 1.2, 0.4, 1.5, 0.75;
    9, 2.6, 60, 1.3, 0.5, 0.8, 0.2;
    10, 2.2, 0, 0.4, 0.55, 0.3, 0.75;
    11, 1.8, 10, 1.5, 0.5, 0.8, 0.5;
    12, 2.5, 20, 0.6, 0.75, 0.5, 0.7;
    13, 3.8, 35, 2.4, 0.5, 1.6, 0.7;
    14, 1.9, 25, 0.7, 0.35, 0.8, 0.5;
    15, 1.8, 0, 1, 0.7, 0.8, 0.5
]
# STEP 4 – Determine the depth of each pit (see table in step 7).
# STEP 5 – Calculate the components of the membrane stress field.
# Cylindrical Shells
# Circumferential direction
σ_1 = 17285.1
Unit_Stress = "psi"
# Longitudinal direction
σ_2 = 8348.44
Unit_Stress = "psi"
# STEP 6 – Determine the MAWP for the component
# Cylindrical Shells
# Circumferential direction
MAWP_C = 506.216
Unit_Stress = "psi"
# Longitudinal direction
MAWP_L = 1048.1
Unit_Stress = "psi"
MAWP = 506.216
Unit_Stress = "psi"
# STEP 7 – Calculate the Remaining Strength Factor.
# Single Layer Analysis
RSF_table = [
    "Pit-Couple k", "w,avg,k", "μ,avg,k", "ρ,1,k", "ρ,2,k", "Ψ,k", "Φ,k", "E,avg,k", "RSF,k";
    1, 0.385, 0.814286, 21227.3, 10252.5, 450749097, 17285.1, 0.814151, 0.931529;
    2, 0.625, 0.642857, 26888, 12986.5, 722961894, 17285.1, 0.642857, 0.786398;
    3, 0.625, 0.666667, 25927.7, 12522.7, 664947629, 17285.1, 0.670314, 0.80282;
    4, 0.65, 0.47619, 36298.7, 17531.7, 1.26315e9, 17285.1, 0.486345, 0.680502;
    5, 0.55, 0.693548, 24922.7, 12037.3, 621279187, 17285.1, 0.693472, 0.838669;
    6, 0.5, 0.597561, 28926.1, 13970.9, 820574017, 17285.1, 0.603411, 0.810245;
    7, 0.625, 0.724138, 23869.9, 11528.8, 565866005, 17285.1, 0.726633, 0.836503;
    8, 0.575, 0.564516, 30619.3, 14788.7, 766082021, 17285.1, 0.624503, 0.793387;
    9, 0.35, 0.596154, 28994.4, 14003.8, 483652047, 17285.1, 0.785969, 0.928315;
    10, 0.65, 0.840909, 20555.3, 9927.87, 422519015, 17285.1, 0.840909, 0.901044;
    11, 0.5, 0.361111, 47866.5, 23118.8, 2.29196e9, 17285.1, 0.361051, 0.694283;
    12, 0.725, 0.78, 22160.4, 10703.1, 487715988, 17285.1, 0.782688, 0.849233;
    13, 0.6, 0.473684, 36490.8, 17624.5, 1.23142e9, 17285.1, 0.492571, 0.708653;
    14, 0.425, 0.605263, 28558, 13793.1, 799822722, 17285.1, 0.611189, 0.841871;
    15, 0.6, 0.5, 34570.2, 16696.9, 1.1951e9, 17285.1, 0.5, 0.712919
]
# STEP 8 – Determine the RSF.
RSF_pit = 0.807758
# STEP 9 – Evaluate damage.
MAWP_r = 454.333
Unit_Stress = "psi"
# STEP 10 – Check the recommended limitations on the individual pit dimensions
Check_table = [
    "Pit-Couple k", "R,t,i >= 0.2", "R,t,j >= 0.2", "d,i,k <= Qsqr(Dt,c)", "d,j,k <= Qsqr(Dt,c)";
    1, "Pass", "Pass", "Pass", "Pass";
    2, "Pass", "Pass", "Pass", "Pass";
    3, "Pass", "Pass", "Pass", "Pass";
    4, "Pass", "Pass", "Pass", "Pass";
    5, "Pass", "Pass", "Pass", "Pass";
    6, "Pass", "Pass", "Pass", "Pass";
    7, "Pass", "Pass", "Pass", "Pass";
    8, "Pass", "Pass", "Pass", "Pass";
    9, "Pass", "Pass", "Pass", "Pass";
    10, "Pass", "Pass", "Pass", "Pass";
    11, "Pass", "Pass", "Pass", "Pass";
    12, "Pass", "Pass", "Pass", "Pass";
    13, "Pass", "Pass", "Pass", "Pass";
    14, "Pass", "Pass", "Pass", "Pass";
    15, "Pass", "Pass", "Pass", "Pass"
]
Result_Level2 = "The Level 2 assessment criteria are satisfied."
# -----------------------------------------------------------------------------------------------------------------------------------------------------------------------------------
