# [area: Page1_Home]
# -----------------------------------------------------------------------------------------------------------------------------------------------------------------------------------
# File | Edit | Tool | View | Help
# -----------------------------------------------------------------------------------------------------------------------------------------------------------------------------------
# Failure Mode
# Which assessment do you choose ?
# Brittle Fracture | General Metal Loss | Local Metal Loss
# Pitting Corrosion | Crack-like Flaw | Creep Rupture
# [component: outputs Next]
# [area: Code 1]
Failure_Mode := "Misalignment"
# [area: Page2_Equipment]
# -----------------------------------------------------------------------------------------------------------------------------------------------------------------------------------
# File | Edit | Tool | View | Help
# -----------------------------------------------------------------------------------------------------------------------------------------------------------------------------------
# Equipment | Design | Material | Dimention | Load | Result | Save | Report | Close
# Equipment Data
# [component: outputs Equipment_Type]
# [component: outputs Faillure_Mode]
# [component: outputs Methodology]
# [component: outputs Unit]
# [component: outputs Assessment_Level]
# [component: outputs Analysis_By]
# [component: outputs Analysis_Date]
# [component: outputs Attach_Picture]
# [component: outputs Analysis_Detail]
# [component: outputs Next]
# [area: Code 2]
# {Unit}
Unit_Length :=
    "mm" if Unit == 1
    "in" if Unit == 2
Unit_Stress :=
    "MPa" if Unit == 1
    "psi" if Unit == 2
Unit_Temp :=
    "oC" if Unit == 1
    "oF" if Unit == 2
# {Equipment Type}
EquipmentType :=
    "Pipe Component" if Equipment_Type == 1
    "Pressure Vessel" if Equipment_Type == 2
    "Atmospheric Storage Tank" otherwise
# {Failure Mode}
FaillureMode :=
    "Brittle Fracture" if Faillure_Mode == 1
    "General Metal Loss " if Faillure_Mode == 2
    "Local Metal Loss" if Faillure_Mode == 3
    "Pitting Corrosion " if Faillure_Mode == 4
    "Crack-like Flaw" if Faillure_Mode == 5
    "Creep Rupture" otherwise
# {Methodology}
Methodology :=
    "API 579-1/ASME FFS-1 2007 Fitness-For-Service" if Methodology == 1
    "Other" otherwise
# {Assessment Level }
AssessmentLevel :=
    "Level 1" if Assessment_Level == 1
    "Level 2" if Assessment_Level == 2
    "Level 3" otherwise
# {Analysis By}
AnalysisBy := Analysis_By
# {Analysis Date}
AnalysisDate := Analysis_Date
# {Attach Picture }
AttachPicture := Attach_Picture
# {Analysis Detail}
AnalysisDetail := Analysis_Detail
# [area: Page3_Design]
# -----------------------------------------------------------------------------------------------------------------------------------------------------------------------------------
# File | Edit | Tool | View | Help
# -----------------------------------------------------------------------------------------------------------------------------------------------------------------------------------
# Equipment | Design | Material | Dimention | Load | Result | Save | Report | Close
# Design Data
# [component: outputs Component_Type]
# [component: outputs Design_Code]
# Operating Design
# [component: outputs Pressure_Design]
# [component: outputs Temperature_Design]
# Geometry Design
# [component: outputs Inside_Diameter]
# [component: outputs Nominal_Thickness]
# [component: outputs Uniform_Metal_Loss]
# [component: outputs Future_Corrosion_Allowance]
# General Design
# [component: outputs Weld_Efficiency]
# [component: outputs Next]
# [area: Code 3]
ComponentShape :=
    "Cylindical" if Component_Type == 1 or Component_Type == 4
    "Sphericall" otherwise
DesignCode :=
    "ASME Section VIII Div.1" if Design_Code == 1
    "ASME Section VIII Div.2" if Design_Code == 2
    "ASME B31.3" if Design_Code == 3
    "API 620" if Design_Code == 3
    "Other" otherwise
P_design := str2num(Pressure_Design)
T_design := str2num(Temperature_Design)
D := str2num(Inside_Diameter)
R := D/2
t_nom := str2num(Nominal_Thickness)
FCA := str2num(Future_Corrosion_Allowance)
LOSS := str2num(Uniform_Metal_Loss)
E := str2num(Weld_Efficiency)
# [area: Page4_Material]
# -----------------------------------------------------------------------------------------------------------------------------------------------------------------------------------
# File | Edit | Tool | View | Help
# -----------------------------------------------------------------------------------------------------------------------------------------------------------------------------------
# Equipment | Design | Material | Dimention | Load | Result | Save | Report | Close
# Material Data
# Material Specification
# [component: outputs Name]
# [component: outputs Material_Name]
# {active when Material_Specification = Other}
# Physical Property
# [component: outputs Allowable_Stress]
# [component: outputs Ultimated_Tensile_Strength]
# {active when tick "Automatically_Calculation_Allowable_Stress"}
# [component: outputs Yield_Stresngth]
# {active when tick "Automatically_Calculation_Allowable_Stress"}
# [component: outputs Automatically_Calculation_Allowable_Stress]
# [component: outputs Young_Modulus]
# {active when Level 2"}
# [component: outputs Poisson_Ratio]
# {active when Level 2"}
# [component: outputs Next]
# [area: Code 4]
S_utm := str2num(Ultimated_Tensile_Strength)
S_y := str2num(Yield_Stresngth)
E_y := str2num(Young_Modulus)
ν := str2num(Poisson_Ratio)
S_allow :=
    str2num(Allowable_Stress) if Automatically_Calculation_Allowable_Stress == 0
    min(0.85/3.5*S_utm, 2/3*0.85*S_y) otherwise
# [area: Page5_Flaw]
# -----------------------------------------------------------------------------------------------------------------------------------------------------------------------------------
# File | Edit | Tool | View | Help
# -----------------------------------------------------------------------------------------------------------------------------------------------------------------------------------
# Equipment | Design | Material | Dimention | Load | Result | Save | Report | Close
# Flaw Data
# {Level 1}
# [component: outputs Select_Damage]
# {Select Damage }
# ----------------------------------------Picture----------------------------------------
# ---------------------------------------------------For HIC Damage------------------------------------------------------
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# Flaw Dimension
# [component: outputs Number of Flaw]
# [component: outputs HIC Depth]
Unit_Length = "in"
# Direction
# [component: outputs Circumferential]
Unit_Length = "in"  # Subsurface HIC Damage
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# [component: outputs Longituidinal]
Unit_Length = "in"
# Minimum Measured Thickness
# (to)
# [component: outputs Internal Surface]
Unit_Length = "in"
# (to)
# [component: outputs External Surface]
Unit_Length = "in"
# [component: outputs Total of Both Sides]
Unit_Length = "in"
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# Flaw to Facility
# [component: outputs Spacing to Nearest HIC or Brister]
Unit_Length = "in"
# HIC Damage in Proximity to a Weld or Other HIC Damage
# [component: outputs Weld Joint]
Unit_Length = "in"
# [component: outputs Major Structural Discontinuity]
Unit_Length = "in"
# Remaining Strength Factor, RSF | {requred when select level 2}
# [component: outputs Allowable_RSF]
# [component: outputs Automaticcally_Allowable_RSF]
# {In Case Number of Flaw > 1: Input in table as below}
# [component: outputs Input]
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# [component: outputs Next]
# [area: Code 5]
N_F := str2num(Number of Flaw)
N_F = 1
w_H := str2num(HIC Depth)
w_H = 1
Unit_Length = "in"
c := str2num(Circumferential)
c = 1
Unit_Length = "in"
s := str2num(Longituidinal)
s = 1
Unit_Length = "in"
t_mm_ID := str2num(Internal Surface)
t_mm_ID = 1
Unit_Length = "in"
t_mm_OD := str2num(External Surface)
t_mm_OD = 1
Unit_Length = "in"
t_mm := str2num(Total of Both Sides)
t_mm = 1
Unit_Length = "in"
L_H := str2num(Spacing to Nearest HIC or Brister)
L_H = 1
Unit_Length = "in"
L_w := str2num(Weld Joint)
L_w = 1
Unit_Length = "in"
L_msd := str2num(Major Structural Discontinuity)
L_msd = 1
Unit_Length = "in"
RSF_a :=
    0.9 if Automaticcally_Allowable_RSF == 1
    str2num(Allowable_RSF) otherwise
RSF_a = 0.9
# [area: Page6_Load]
# -----------------------------------------------------------------------------------------------------------------------------------------------------------------------------------
# File | Edit | Tool | View | Help
# -----------------------------------------------------------------------------------------------------------------------------------------------------------------------------------
# Equipment | Design | Material | Dimention | Load | Result | Save | Report | Close
# Load Data
# Operating
# [component: outputs Pressure]
# [component: outputs Temperature]
# [component: outputs Next]
# [area: Code 6]
P_oper := str2num(Pressure)
T_oper := str2num(Temperature)
# [area: Calculation Level 1]
# -----------------------------------------------------------------------------------------------------------------------------------------------------------------------------------
# HIC Assessment Procedure
# -----------------------------------------------------------------------------------------------------------------------------------------------------------------------------------
# {for Number of Flaw >1}
# STEP 1 – Determine the assement parameter.
D = 96
Unit_Length = "in"
FCA = 0.125
Unit_Length = "in"
LOSS = 0
Unit_Length = "in"
t_nom = 1.25
Unit_Length = "in"
N_F := cols(Input)
N_F = 5
i := 0, 1 .. N_F - 1
w_H[i] := Input[0, i]
t_mm_ID[i] := Input[3, i]
L_H[i] := Input[6, i]
c[i] := Input[1, i]
L_w[i] == Input[8, i]
t_mm_OD[i] := Input[4, i]
L_w[i] := Input[7, i]
s[i] := Input[2, i]
L_msd[i] == Input[9, i]
t_mm[i] := Input[5, i]
L_msd[i] := Input[8, i]
# STEP 2 – Determine the wall thickness to be used in the assessment.
t_c := t_nom - FCA - LOSS
t_c = 1.125
Unit_Length = "in"
# STEP 3 – Evaluation the dimension of HIC or Blisters.
# Check the planar dimensions of the HIC damage.
Check_Planar :=
    check ← "Fail"
    for i ∈ 0, 1 .. (N_F - 1)
        check ← "Pass" if s[i] ≤ 0.6*sqrt(D*t_c) and c[i] ≤ 0.6*sqrt(D*t_c)
        check ← "Fail" if s[i] > 0.6*sqrt(D*t_c) and c[i] > 0.6*sqrt(D*t_c)
        if check == "Fail"
            {
                break
            }
    check
Check_Planar = "Pass"
Planar[i] :=
    "Pass" if s[i] ≤ 0.6*sqrt(D*t_c) and c[i] ≤ 0.6*sqrt(D*t_c)
    "Fail" otherwise
Planar = ["Pass"; "Pass"; "Pass"; "Pass"; "Fail"]
# Check the through-thickness extent of the damage.
Check_Flaw :=
    check ← "Fail"
    for i ∈ 0, 1 .. (N_F - 1)
        check ←
            "Pass" if w_H[i] ≤ min(t_c/3, 13) and Unit_Length == "mm"
            "Pass" if w_H[i] ≤ min(t_c/3, 0.5) and Unit_Length == "in"
            "Fail" otherwise
        if check == "Fail"
            {
                break
            }
    check
Check_Flaw = "Fail"
Flaw[i] :=
    "Pass" if w_H[i] ≤ min(t_c/3, 13) and Unit_Length == "mm"
    "Pass" if w_H[i] ≤ min(t_c/3, 0.5) and Unit_Length == "in"
    "Fail" otherwise
Flaw = ["Fail"; "Fail"; "Pass"; "Pass"; "Pass"]
# {if Planar = "Fail" or Flaw = "Fail" , then stop the process below and the result is "not stastify" }
# Clasify the HIC damage
HIC_Type[i] :=
    "Subsurface HIC" if (t_mm_ID[i] ≥ 0.20*t_c) and (t_mm_OD[i] ≥ 0.20*t_c)
    "Surface Breaking HIC" otherwise
HIC_Type = ["Surface Breaking HIC"; "Surface Breaking HIC"; "Subsurface HIC"; "Surface Breaking HIC"; "Subsurface HIC"]
Check_HIC_Type :=
    check ← "Fail"
    for i ∈ 0, 1 .. (N_F - 1)
        check ←
            "Pass" if HIC_Type[i] == "Subsurface HIC"
            "Fail" otherwise
        if check == "Fail"
            {
                break
            }
    check
Check_HIC_Type = "Fail"
# Check the distance between the edge of the HIC damage and the nearest weld seam.
Facility[i] :=
    "Pass" if (L_w[i] > max(2*t_c, 25)) and (L_msd[i] ≥ 1.8*sqrt(D*t_c)) and Unit_Length == "mm"
    "Pass" if (L_w[i] > max(2*t_c, 1.0)) and (L_msd[i] ≥ 1.8*sqrt(D*t_c)) and Unit_Length == "in"
    "Fail" otherwise
Facility = ["Pass"; "Fail"; "Pass"; "Fail"; "Pass"]
Check_Facility :=
    check ← "Fail"
    for i ∈ 0, 1 .. (N_F - 1)
        check ←
            "Pass" if (L_w[i] > max(2*t_c, 25)) and (L_msd[i] ≥ 1.8*sqrt(D*t_c)) and Unit_Length == "mm"
            "Pass" if (L_w[i] > max(2*t_c, 1.0)) and (L_msd[i] ≥ 1.8*sqrt(D*t_c)) and Unit_Length == "in"
            "Fail" otherwise
        if check == "Fail"
            {
                break
            }
    check
# STEP 4 – Evaluate damage.
Result_Level1 :=
    check ← "The Level 1 assessment criteria are not satisfied."
    for i ∈ 0, 1 .. (N_F - 1)
        check ←
            "The Level 1 assessment criteria are not satisfied." if Check_Flaw == "Fail" or Check_Facility == "Fail" or Check_Flaw == "Fail" or HIC_Type == "Surface Breaking HIC"
            "The Level 1 assessment criteria are not satisfied." otherwise
        if check == "The Level 1 assessment criteria are not satisfied."
            {
                break
            }
    check
Result_Level1 = "The Level 1 assessment criteria are not satisfied."
# -----------------------------------------------------------------------------------------------------------------------------------------------------------------------------------
# End HIC Assessment Procedure
# -----------------------------------------------------------------------------------------------------------------------------------------------------------------------------------
# [area: Short Report Calculation Level1]
# -----------------------------------------------------------------------------------------------------------------------------------------------------------------------------------
# HIC Assessment Procedure
# -----------------------------------------------------------------------------------------------------------------------------------------------------------------------------------
Result_Level1 = "The Level 1 assessment criteria are not satisfied."
# -----------------------------------------------------------------------------------------------------------------------------------------------------------------------------------
# End HIC Assessment Procedure
# -----------------------------------------------------------------------------------------------------------------------------------------------------------------------------------
# [area: Long Report Calculation Level1]
# -----------------------------------------------------------------------------------------------------------------------------------------------------------------------------------
# HIC Assessment Procedure
# -----------------------------------------------------------------------------------------------------------------------------------------------------------------------------------
# {for Number of Flaw >1}
# STSTEP 1 – Determine the assement parameter.
D = 96
Unit_Length = "in"
FCA = 0.125
Unit_Length = "in"
LOSS = 0
Unit_Length = "in"
t_nom = 1.25
Unit_Length = "in"
# Number of HIC Damage
N_F = 5
Input = [
    0.475, 0.65, 0.2, 0.275, 0.3;
    5, 2, 1, 5.5, 4.5;
    3, 2, 1, 3, 7;
    0.1, 0, 0.45, 0.2, 0.25;
    0.55, 0.48, 0.48, 0.65, 0.58;
    0.65, 0.48, 0.93, 0.85, 0.83;
    20, 2, 2, 28.5, 32;
    10, 1.5, 6, 9, 28;
    50, 50, 50, 12, 50
]
# STEP 2 – Determine the wall thickness to be used in the assessment.
t_c = 1.125
Unit_Length = "in"
# STEP 3 – Evaluation the dimension of HIC or Blisters.
# Check the planar dimensions of the HIC damage.
Planar = ["Pass"; "Pass"; "Pass"; "Pass"; "Fail"]
Check_Planar = "Pass"
# Check the through-thickness extent of the damage.
Flaw = ["Fail"; "Fail"; "Pass"; "Pass"; "Pass"]
Check_Flaw = "Fail"
# {if Planar = "Fail" or Flaw = "Fail" , then stop the process below and the result is "not stastify" }
# Clasify the HIC damage
HIC_Type = ["Surface Breaking HIC"; "Surface Breaking HIC"; "Subsurface HIC"; "Surface Breaking HIC"; "Subsurface HIC"]
Check_HIC_Type = "Fail"
# Check the distance between the edge of the HIC damage and the nearest weld seam.
Facility = ["Pass"; "Fail"; "Pass"; "Fail"; "Pass"]
Check_Facility = "Fail"
# STEP 4 – Evaluate damage.
Result_Level1 = "The Level 1 assessment criteria are not satisfied."
# -----------------------------------------------------------------------------------------------------------------------------------------------------------------------------------
# End HIC Assessment Procedure
# -----------------------------------------------------------------------------------------------------------------------------------------------------------------------------------
# [area: Calculation Level 2]
# -----------------------------------------------------------------------------------------------------------------------------------------------------------------------------------
# HIC Assessment Procedure
# -----------------------------------------------------------------------------------------------------------------------------------------------------------------------------------
# {for Number of Flaw >1}
# STEP 1 – Determine the assement parameter.
D = 96
Unit_Length = "in"
FCA = 0.125
Unit_Length = "in"
LOSS = 0
Unit_Length = "in"
t_nom = 1.25
Unit_Length = "in"
N_F := cols(Input)
N_F = 5
i := 0, 1 .. N_F - 1
w_H[i] := Input[0, i]
t_mm_ID[i] := Input[3, i]
L_H[i] := Input[6, i]
c[i] := Input[1, i]
t_mm_OD[i] := Input[4, i]
L_w[i] := Input[7, i]
L_w[i] == Input[8, i]
s[i] := Input[2, i]
t_mm[i] := Input[5, i]
L_msd[i] := Input[8, i]
L_msd[i] == Input[9, i]
# STEP 2 – Determine the wall thickness to be used in the assessment.
t_c := t_nom - FCA - LOSS
t_c = 1.125
Unit_Length = "in"
# STEP 3 – Evaluation the dimension of HIC or Blisters.
# Check the distance between the edge of the HIC damage and the nearest weld seam.
Facility[i] :=
    "Pass" if (L_w[i] > max(2*t_c, 25)) and (L_msd[i] ≥ 1.8*sqrt(D*t_c)) and Unit_Length == "mm"
    "Pass" if (L_w[i] > max(2*t_c, 1.0)) and (L_msd[i] ≥ 1.8*sqrt(D*t_c)) and Unit_Length == "in"
    "Fail" otherwise
Facility = ["Pass"; "Fail"; "Pass"; "Fail"; "Pass"]
Check_Facility :=
    check ← "Fail"
    for i ∈ 0, 1 .. (N_F - 1)
        check ←
            "Pass" if (L_w[i] > max(2*t_c, 25)) and (L_msd[i] ≥ 1.8*sqrt(D*t_c)) and Unit_Length == "mm"
            "Pass" if (L_w[i] > max(2*t_c, 1.0)) and (L_msd[i] ≥ 1.8*sqrt(D*t_c)) and Unit_Length == "in"
            "Fail" otherwise
        if check == "Fail"
            {
                break
            }
    check
Check_Facility = "Fail"
# Check the through-thickness extent of the damage.
Check_Flaw :=
    check ← "Fail"
    for i ∈ 0, 1 .. (N_F - 1)
        check ←
            "Pass" if w_H[i] ≤ min(t_c/3, 13) and Unit_Length == "mm"
            "Pass" if w_H[i] ≤ min(t_c/3, 0.5) and Unit_Length == "in"
            "Fail" otherwise
        if check == "Fail"
            {
                break
            }
    check
Check_Flaw = "Fail"
Flaw[i] :=
    "Pass" if w_H[i] ≤ min(t_c/3, 13) and Unit_Length == "mm"
    "Pass" if w_H[i] ≤ min(t_c/3, 0.5) and Unit_Length == "in"
    "Fail" otherwise
Flaw = ["Fail"; "Fail"; "Pass"; "Pass"; "Pass"]
# {if Planar = "Fail" or Flaw = "Fail" , then stop the process below and the result is "not stastify" }
# Clasify the HIC damage
HIC_Type[i] :=
    "Subsurface HIC" if (t_mm_ID[i] ≥ 0.20*t_c) and (t_mm_OD[i] ≥ 0.20*t_c)
    "Surface Breaking HIC" otherwise
HIC_Type = ["Surface Breaking HIC"; "Surface Breaking HIC"; "Subsurface HIC"; "Surface Breaking HIC"; "Subsurface HIC"]
Check_HIC_Type :=
    check ← "Fail"
    for i ∈ 0, 1 .. (N_F - 1)
        check ←
            "Pass" if HIC_Type[i] == "Subsurface HIC"
            "Fail" otherwise
        if check == "Fail"
            {
                break
            }
    check
Check_HIC_Type = "Fail"
# STEP 4 – Determine the MAWP for the component.
MAWP := S_allow*E*t_c/(R + 0.6*t_c)
MAWP = 343.798
Unit_Stress = "psi"
# STEP 5 – Calculate the RSF based on surface breaking HIC damage.
# {The damage parameter for HIC damage shall be set equal to 80%}
D_H := 0.8
D_H = 0.8
λ[i] := 1.285*s[i]/sqrt(D*t_c)
λ = [0.370948; 0.247298; 0.123649; 0.370948; 0.865544]
M_t[i] :=
    (1.0010 - 0.014195*λ[i] + 0.29090*λ[i]^2 - 0.096420*λ[i]^3 + 0.020890*λ[i]^4 - 0.0030540*λ[i]^5 + 2.9570*10^-4*λ[i]^6 - 1.8462*10^-5*λ[i]^7 + 7.1553*10^-7*λ[i]^8 - 1.5631*10^-8*λ[i]^9 + 1.4656*10^-10*λ[i]^10) if ComponentShape == "Cylindical"
    (1.0005 + 0.49001*λ[i] + 0.32409*λ[i]^2)/(1.0 + 0.50144*λ[i] - 0.011067*λ[i]^2) if ComponentShape == "Sphericall"
M_t[i] :=
    20 if M_t[i] ≥ 20
    M_t[i] otherwise
M_t = [1.03122; 1.0139; 1.00351; 1.03122; 1.15448]
L_R[i] := min(|L_H[i]|/2, 8*t_c)
L_R[i] == min(|L_H[i]*cos(θ[i])|/2, 8*t_c)
L_R[i] = [9; 1; 1; 9; 9]
RSF[i] :=
    min((1 - (w_H[i]*D_H/t_c))/(1 - 1/M_t[i]*(w_H[i]*D_H/t_c)), 1) if HIC_Type == "Subsurface HIC"
    min((2*L_R[i] + s[i]*(1 - (w_H[i]*D_H/t_c)))/(2*L_R[i] + s[i]), 1) otherwise
RSF = [0.951746; 0.768889; 0.952593; 0.972063; 0.940267]
Check_RSF :=
    check ← "Fail"
    for i ∈ 0, 1 .. (N_F - 1)
        check ←
            "Pass" if RSF[i] < RSF_a
            "Fail" otherwise
        if check == "Fail"
            {
                break
            }
    check
Check_RSF = "Fail"
# STEP 6 – Evaluation Result.
Result_Level2 :=
    check ← "The Level 2 assessment criteria are not satisfied."
    for i ∈ 0, 1 .. (N_F - 1)
        check ←
            "The Level 2 assessment criteria are not satisfied." if Check_Flaw == "Fail" or Check_Facility == "Fail" or Check_RSF == "Fail "
            "The Level 2 assessment criteria are not satisfied." otherwise
        if check == "The Level 2 assessment criteria are not satisfied."
            {
                break
            }
    check
Result_Level2 = "The Level 2 assessment criteria are not satisfied."
# -----------------------------------------------------------------------------------------------------------------------------------------------------------------------------------
# End HIC Assessment Procedure
# -----------------------------------------------------------------------------------------------------------------------------------------------------------------------------------
# [area: Short Report Calculation Level 2]
# -----------------------------------------------------------------------------------------------------------------------------------------------------------------------------------
# HIC Assessment Procedure
# -----------------------------------------------------------------------------------------------------------------------------------------------------------------------------------
Result_Level2 = "The Level 2 assessment criteria are not satisfied."
# -----------------------------------------------------------------------------------------------------------------------------------------------------------------------------------
# End HIC Assessment Procedure
# -----------------------------------------------------------------------------------------------------------------------------------------------------------------------------------
# [area: Long Report Calculation Level 2]
# -----------------------------------------------------------------------------------------------------------------------------------------------------------------------------------
# HIC Assessment Procedure
# -----------------------------------------------------------------------------------------------------------------------------------------------------------------------------------
# {for Number of Flaw >1}
# STEP 1 – Determine the assement parameter.
D = 96
Unit_Length = "in"
FCA = 0.125
Unit_Length = "in"
LOSS = 0
Unit_Length = "in"
t_nom = 1.25
Unit_Length = "in"
# STEP 2 – Determine the wall thickness to be used in the assessment.
t_c = 1.125
Unit_Length = "in"
# STEP 3 – Evaluation the dimension of HIC or Blisters.
# Check the distance between the edge of the HIC damage and the nearest weld seam.
Check_Facility = "Fail"
# Check the through-thickness extent of the damage.
Check_Flaw = "Fail"
# {if Planar = "Fail" or Flaw = "Fail" , then stop the process below and the result is "not stastify" }
# Clasify the HIC damage
HIC_Type = ["Surface Breaking HIC"; "Surface Breaking HIC"; "Subsurface HIC"; "Surface Breaking HIC"; "Subsurface HIC"]
Check_HIC_Type = "Fail"
# STEP 4 – Determine the MAWP for the component.
MAWP = 343.798
Unit_Stress = "psi"
# STEP 5 – Calculate the RSF based on surface breaking HIC damage.
# {The damage parameter for HIC damage shall be set equal to 80%}
RSF = [0.951746; 0.768889; 0.952593; 0.972063; 0.940267]
Check_RSF = "Fail"
# STEP 6 – Evaluation Result.
Result_Level2 = "The Level 2 assessment criteria are not satisfied."
# -----------------------------------------------------------------------------------------------------------------------------------------------------------------------------------
# End HIC Assessment Procedure
# -----------------------------------------------------------------------------------------------------------------------------------------------------------------------------------
