# Worksheet setting: ORIGIN = 1
# [area: Page1_Home]
# -----------------------------------------------------------------------------------------------------------------------------------------------------------------------------------
# File | Edit | Tool | View | Help
# -----------------------------------------------------------------------------------------------------------------------------------------------------------------------------------
# Failure Mode
# Which assessment do you choose ?
# Brittle Fracture | General Metal Loss | Local Metal Loss
# Pitting Corrosion | Crack-like Flaw | Creep Rupture
# [component: outputs Next]
# [area: Code 1]
Failure_Mode := "Misalignment"
# [area: Page2_Equipment]
# -----------------------------------------------------------------------------------------------------------------------------------------------------------------------------------
# File | Edit | Tool | View | Help
# -----------------------------------------------------------------------------------------------------------------------------------------------------------------------------------
# Equipment | Design | Material | Dimention | Load | Result | Save | Report | Close
# Equipment Data
# [component: outputs Equipment_Type]
# [component: outputs Faillure_Mode]
# [component: outputs Methodology]
# [component: outputs Unit]
# [component: outputs Assessment_Level]
# [component: outputs Analysis_By]
# [component: outputs Analysis_Date]
# [component: outputs Attach_Picture]
# [component: outputs Analysis_Detail]
# [component: outputs Next]
# [area: Code 2]
# {Unit}
Unit_Length :=
    "mm" if Unit == 1
    "in" if Unit == 2
Unit_Stress :=
    "MPa" if Unit == 1
    "psi" if Unit == 2
Unit_Temp :=
    "oC" if Unit == 1
    "oF" if Unit == 2
# {Equipment Type}
EquipmentType :=
    "Pipe Component" if Equipment_Type == 1
    "Pressure Vessel" if Equipment_Type == 2
    "Atmospheric Storage Tank" otherwise
# {Failure Mode}
FaillureMode :=
    "Brittle Fracture" if Faillure_Mode == 1
    "General Metal Loss " if Faillure_Mode == 2
    "Local Metal Loss" if Faillure_Mode == 3
    "Pitting Corrosion " if Faillure_Mode == 4
    "Crack-like Flaw" if Faillure_Mode == 5
    "Creep Rupture" otherwise
# {Methodology}
Methodology :=
    "API 579-1/ASME FFS-1 2007 Fitness-For-Service" if Methodology == 1
    "Other" otherwise
# {Assessment Level }
AssessmentLevel :=
    "Level 1" if Assessment_Level == 1
    "Level 2" if Assessment_Level == 2
    "Level 3" otherwise
# {Analysis By}
AnalysisBy := Analysis_By
# {Analysis Date}
AnalysisDate := Analysis_Date
# {Attach Picture }
AttachPicture := Attach_Picture
# {Analysis Detail}
AnalysisDetail := Analysis_Detail
# [area: Page3_Design]
# -----------------------------------------------------------------------------------------------------------------------------------------------------------------------------------
# File | Edit | Tool | View | Help
# -----------------------------------------------------------------------------------------------------------------------------------------------------------------------------------
# Equipment | Design | Material | Dimention | Load | Result | Save | Report | Close
# Design Data
# [component: outputs Component_Type]
# [component: outputs Design_Code]
# Operating Design
# [component: outputs Pressure_Design]
# [component: outputs Temperature_Design]
# Geometry Design
# [component: outputs Inside_Diameter]
# [component: outputs Nominal_Thickness]
# [component: outputs Uniform_Metal_Loss]
# [component: outputs Future_Corrosion_Allowance]
# General Design
# [component: outputs Weld_Efficiency]
# [component: outputs Next]
# [area: Code 3]
ComponentShape :=
    "Cylindical" if Component_Type == 1 or Component_Type == 4
    "Sphericall" otherwise
DesignCode :=
    "ASME Section VIII Div.1" if Design_Code == 1
    "ASME Section VIII Div.2" if Design_Code == 2
    "ASME B31.3" if Design_Code == 3
    "API 620" if Design_Code == 3
    "Other" otherwise
P_design := str2num(Pressure_Design)
T_design := str2num(Temperature_Design)
D := str2num(Inside_Diameter)
R := D/2
t_nom := str2num(Nominal_Thickness)
FCA := str2num(Future_Corrosion_Allowance)
LOSS := str2num(Uniform_Metal_Loss)
E := str2num(Weld_Efficiency)
# [area: Page4_Material]
# -----------------------------------------------------------------------------------------------------------------------------------------------------------------------------------
# File | Edit | Tool | View | Help
# -----------------------------------------------------------------------------------------------------------------------------------------------------------------------------------
# Equipment | Design | Material | Dimention | Load | Result | Save | Report | Close
# Material Data
# Material Specification
# [component: outputs Name]
# [component: outputs Material_Name]
# {active when Material_Specification = Other}
# Physical Property
# [component: outputs Allowable_Stress]
# [component: outputs Ultimated_Tensile_Strength]
# {active when tick "Automatically_Calculation_Allowable_Stress" and Level 2}
# [component: outputs Yield_Stresngth]
# {active when tick "Automatically_Calculation_Allowable_Stress"}
# [component: outputs Automatically_Calculation_Allowable_Stress]
# [component: outputs Young_Modulus]
# {active when Level 2"}
# [component: outputs Poisson_Ratio]
# {active when Level 2"}
# [component: outputs Next]
# [area: Code 4]
S_utm := str2num(Ultimated_Tensile_Strength)
S_y := str2num(Yield_Stresngth)
E_y := str2num(Young_Modulus)
ν := str2num(Poisson_Ratio)
S_allow :=
    str2num(Allowable_Stress) if Automatically_Calculation_Allowable_Stress == 0
    min(0.85/3.5*S_utm, 2/3*0.85*S_y) otherwise
# [area: Page5_Assessment]
# -----------------------------------------------------------------------------------------------------------------------------------------------------------------------------------
# File | Edit | Tool | View | Help
# -----------------------------------------------------------------------------------------------------------------------------------------------------------------------------------
# Equipment | Design | Material | Dimention | Load | Result | Save | Report | Close
# Dimension Data
# {Level 1}
# {ASME B&PV Code, Section VIII, Division 1 and Division 2}
# Out-Of-Roundness In Cylindrical Shells Under Internal Pressure
# Centerline Offset Weld Misalignment – Longitudinal Joints
# Centerline Offset Weld Misalignment - Circumferential Joints}
# { API 620
# Out-Of-Plumbness For Tank Shells
# Out-Of-Roundness For Tank Shells
# Centerline Offset Weld Radial Misalignment – All Butt Joints}
# Flaw Dimension
# [component: outputs Fabrication Tolerance]
# {ASME B31.2
# Out-Of-Roundness In Piping Under Internal Pressure
# Angular Weld Misalignment}
# ---------------------------------------------Select Out-Of-Roundness-------------------------------------------------
# ----------------------------------------Picture----------------------------------------
# [component: outputs Max Internal Diameter]
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Unit_Length = "in"
# [component: outputs Min Internal Diameter]
Unit_Length = "in"
# [component: outputs Angle to Define to Stress]
# {requred when select level 2}
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# Remaining Strength Factor, RSF | {requred when select level 2}
# [component: outputs Allowable_RSF]
# [component: outputs Automaticcally_Allowable_RSF]
# [component: outputs Next]
# [area: Code 5]
D_max := str2num(Max Internal Diameter)
D_max = 36
D_min := str2num(Min Internal Diameter)
D_min = 36.31
θ := str2num(Angle to Define to Stress)
θ = 2
FT :=
    "Out-Of-Roundness" if Fabrication Tolerance == 1
    "Centerline Offset Weld" otherwise
FT = "Out-Of-Roundness"
RSF_a :=
    str2num(Allowable_RSF) if Automaticcally_Allowable_RSF == 0
    0.9 otherwise
# [area: Page6_Load]
# -----------------------------------------------------------------------------------------------------------------------------------------------------------------------------------
# File | Edit | Tool | View | Help
# -----------------------------------------------------------------------------------------------------------------------------------------------------------------------------------
# Equipment | Design | Material | Dimention | Load | Result | Save | Report | Close
# Load Data
# Operating
# [component: outputs Pressure]
# [component: outputs Temperature]
# Norminal Membrance Stress | {active when ticked Level 2}
# [component: outputs Automaticcally_Primary_Stress]
# [component: outputs Supplemental_Load]
# [component: outputs Primary_Stress]
# [component: outputs Supplemental_Stress]
# {active when ticked supplemental loads}
# [component: outputs Next]
# [area: Code 6]
P_oper := str2num(Pressure)
T_oper := str2num(Temperature)
S_primary :=
    str2num(Primary_Stress) if Automaticcally_Primary_Stress == 0
    0 otherwise
S_suplemental :=
    str2num(Supplemental_Stress) if Supplemental_Load == 1
    0 otherwise
# [area: Calculation Level1]
# STEP 1 – Determine the assessment parameters.
# --------------------------------Select Out-Of-Roundnes-------------------------------------------------
# Out-Of-Roundness data
Unit_Length = "in"
D = 36
D_max = 36
Unit_Length = "in"
D_min = 36.31
Unit_Length = "in"
# STEP 2 –  Evaluation the dimension of flaw.
# --------------------------------Select Out-Of-Roundnes-------------------------------------------------
Check_D :=
    "Pass" if (D_max - D_min) ≤ 0.01*D
    "Fail" otherwise
# ----------------------------------------------------------------------------------------------------------------------
# STEP 6 – Evaluate damage.
# --------------------------------Select Out-Of-Roundnes-------------------------------------------------
Result_Level1 :=
    "The Level 1 assessment criteria are not satisfied." if Check_D == "Fail"
    "The Level 1 assessment criteria are satisfied." otherwise
# --------------------------------------------------------------------------------------------------------------------
Result_Level1 = "The Level 1 assessment criteria are satisfied."
# [area: Short Report Level1]
Result_Level1 = "The Level 1 assessment criteria are satisfied."
# [area: Long Report Level1]
EquipmentType = "Pipe Component"
Component_Type = 1
DesignCode = "ASME Section VIII Div.1"
Failure_Mode = "Misalignment"
Methodology = "API 579-1/ASME FFS-1 2007 Fitness-For-Service"
# o ------------------------------------------------------------- o
# -
# -
# -
# -
# -
# -
# -
# -
# -
# -
# -
# -
# -
# -
# -
# -
# -
# -
# -
# -
# -
# -
# -
# -
# -
# -
# Picture
# Picture
# Picture
# o ------------------------------------------------------------- o
AssessmentLevel = "Level 1"
AnalysisBy = "TEST NAME"
AnalysisDate = "1/1/14"
AttachPicture = "TEST PICTURE"
AnalysisDetail = "FAILURE"
# STEP 1 – Determine the assessment parameters.
# Out-Of-Roundness data
Unit_Length = "in"
D = 36
D_max = 36
Unit_Length = "in"
D_min = 36.31
Unit_Length = "in"
# --------------------------------------------------------------------------------------------------------------------------------
# STEP 2 –  Evaluation the dimension of flaw.
# --------------------------------Select Out-Of-Roundnes-------------------------------------------------
Check_D = "Pass"
# --------------------------------------------------------------------------------------------------------------------------------
# STEP 6 – Evaluate damage.
# --------------------------------Select Out-Of-Roundnes-------------------------------------------------
Result_Level1 = "The Level 1 assessment criteria are satisfied."
# --------------------------------------------------------------------------------------------------------------------
# [area: Calculation Level2]
# STEP 1 – Determine the assessment parameters.
Unit_Length = "in"
D = 36
Unit_Length = "in"
FCA = 0.05
t_nom = 0.5
Unit_Length = "in"
LOSS = 0
Unit_Length = "in"
# STEP 2 – Determine the wall thickness to be used in the assessment.
t_c := t_nom - FCA - LOSS
t_c = 0.45
Unit_Length = "in"
# STEP 3 – Determine the membrane stress from pressure.
# Cylindrical components
P := P_design
σ_c := P/E*(R/t_c + 0.6)
σ_c = 12789
Unit_Stress = "psi"
σ_l := P/(2*E)*(R/t_c - 0.4)
σ_l = 6237
Unit_Stress = "psi"
σ_m :=
    S_primary if Automaticcally_Primary_Stress == 0
    max(σ_c, σ_l) otherwise
σ_m = 12474
Unit_Stress = "psi"
σ_ms == F/A + M_ns/Z  # {comment}
σ_ms :=
    S_suplemental if Supplemental_Load == 1
    0 otherwise
σ_ms = 0
Unit_Stress = "psi"
# STEP 4 – Calculate the ratio of the induced bending stress to the applied membrane stress.
# Global Out-Of-Roundness of a Cylindrical components
ν = 0.3
C_s := 0.1  # {Cs: 0.5 for purely oval shape, 0.1 for significantly deviate form oval shape}
D_m := (D_max + D_min)/2
D_m = 36.155
R_b_or := 1.5*(D_max - D_min)*cos(2*θ)/(t_c*(1 + (C_s*P*(1 + ν^2)/E_y)*(D_m/t_c)^3))
R_b_or = 0.395765
# STEP 5 – Determine the remaining strength factor.
R_b := |R_b_or|
R_bs := -1.0
H_f := 1.5  # {H_f: 1.5 for primary stress, 3.0 for sencondary stress}
S_a := S_allow  # {allowable stress besed on original design code}
σ_ms = 0  # {membrane stress from supplemental loads}
RSF := min(H_f*S_a/(σ_m*(1 + R_b) + σ_ms*(1 + R_bs)), 1)
RSF_a = 0.9
RSF = 1
# STEP 6 – Evaluate the result.
Result_Level2 :=
    "The Level 2 assessment criteria are not satisfied." if RSF < RSF_a
    "The Level 2 assessment criteria are satisfied." otherwise
Result_Level2 = "The Level 2 assessment criteria are satisfied."
# [area: Short Report Level 2]
Result_Level2 = "The Level 2 assessment criteria are satisfied."
# [area: Long Report Level 2]
EquipmentType = "Pipe Component"
Component_Type = 1
DesignCode = "ASME Section VIII Div.1"
Failure_Mode = "Misalignment"
Methodology = "API 579-1/ASME FFS-1 2007 Fitness-For-Service"
# o ------------------------------------------------------------- o
# -
# -
# -
# -
# -
# -
# -
# -
# -
# -
# -
# -
# -
# -
# -
# -
# -
# -
# -
# -
# -
# -
# -
# -
# -
# -
# Picture
# Picture
# Picture
# o ------------------------------------------------------------- o
AssessmentLevel = "Level 1"
AnalysisBy = "TEST NAME"
AnalysisDate = "1/1/14"
AttachPicture = "TEST PICTURE"
AnalysisDetail = "FAILURE"
# STEP 1 – Determine the assessment parameters.
Unit_Length = "in"
D = 36
Unit_Length = "in"
FCA = 0.05
t_nom = 0.5
Unit_Length = "in"
LOSS = 0
Unit_Length = "in"
# STEP 2 – Determine the wall thickness to be used in the assessment.
t_c = 0.45
Unit_Length = "in"
# STEP 3 – Determine the membrane stress from pressure.
# Cylindrical components
σ_m = 12474
Unit_Stress = "psi"
σ_ms = 0
Unit_Stress = "psi"
# STEP 4 – Calculate the ratio of the induced bending stress to the applied membrane stress.
# Global Out-Of-Roundness of a Cylindrical components
R_b_or = 0.395765
R_bs = -1
# STEP 5 – Determine the remaining strength factor.
RSF = 1
RSF_a = 0.9
# STEP 6 – Evaluate the result.
Result_Level2 = "The Level 2 assessment criteria are satisfied."
# Done
# Step 9 : Evaluate the circumferential extent of the flaw
# Step 9.1 : Determine the circumferential flaw length parameter
# Done
c = 299792458000 mm/s
λ_C =  # error: This variable is undefined.
# Step 9.2
Check_λC =  # error
Check_ThinWall =  # error
Check_EL =  # error
Check_EC =  # error
Check_RSF :=
    "Pass" if 0.7 ≤ RSF ≤ 1.0
    "Fail" otherwise
Check_RSF = "Pass"
ContinueToStep9_3 :=
    "Yes" if Check_λC == "Pass" and Check_ThinWall == "Pass" and Check_RSF == "Pass" and Check_EL == "Pass" and Check_EC == "Pass"
    "No, higher assessment level is necessary" otherwise
ContinueToStep9_3 =  # error
# Step 9.3 : Determine tensile stress factor
TSF :=
    (E_C/(2*RSF)*(1 + sqrt(4 - 3*E_L^2)/E_L)) if ContinueToStep9_3 == "Yes"
    "Not available" otherwise
TSF =  # error
# [area: Determine the minimum of Rt on screening curve Fig 5.8]
Table5_4 := [
    0.7, 0.75, 0.8, 0.9, 1, 1.2, 1.4, 1.8, 2.3;
    0.21, 0.48, 0.67, 0.98, 1.23, 1.66, 2.03, 2.66, 3.35;
    0.99221, 0.96801, 0.94413, 0.89962, 0.85947, 0.78654, 0.72335, 0.60737, 0.49304;
    -0.11959, -0.2378, -0.31256, -0.3886, -0.40012, -0.25322, 0.011528, 0.93796, 2.1692;
    -0.057333, -0.32678, -0.69968, -1.6485, -2.7979, -5.7982, -9.3536, -19.239, -32.459;
    0.016948, 0.20684, 0.6502, 2.3445, 5.0729, 13.858, 26.031, 64.267, 122.45;
    -0.0017976, -0.046537, -0.22102, -1.2534, -3.5217, -13.118, -29.372, -91.307, -202.43;
    6.9114e-5, 0.0039436, 0.028799, 0.25331, 0.91877, 4.6436, 12.387, 48.962, 127.27
]
UpperIndex :=
    UpperIndex ← 1
    for i ∈ 1 .. 9
        UpperIndex ← UpperIndex + 1 if TSF ≥ Table5_4[1, i]
        UpperIndex ← UpperIndex otherwise
    UpperIndex
UpperIndex =  # error
LowerIndex := UpperIndex - 1
LowerIndex =  # error
i := 1 .. 6
C_up[i] := Table5_4[i + 2, UpperIndex]
transpose(C_up) =  # error
C_lo[i] := Table5_4[i + 2, LowerIndex]
transpose(C_lo) =  # error
R_t_up :=
    0.2 if λ_C ≤ Table5_4[2, UpperIndex]
    sum(C_up[i]/λ_C^(i - 1), i = 1 .. 6) otherwise
R_t_up =  # error
R_t_lo :=
    0.2 if λ_C ≤ Table5_4[2, LowerIndex]
    sum(C_lo[i]/λ_C^(i - 1), i = 1 .. 6) otherwise
R_t_lo =  # error
# Interpolate to determine minimum value of Rt
TSF_lo := Table5_4[1, LowerIndex]
TSF_up := Table5_4[1, UpperIndex]
R_t_min := R_t_lo + (TSF - TSF_lo)/(TSF_up - TSF_lo)*(R_t_up - R_t_lo)
R_t_min =  # error
Level2_Assessment :=
    "Circumferential flaw is acceptable" if R_t ≥ R_t_min
    "Circumferential flaw is unacceptable" otherwise
Level2_Assessment =  # error
