# [area: Page1_Home]
# -----------------------------------------------------------------------------------------------------------------------------------------------------------------------------------
# File | Edit | Tool | View | Help
# -----------------------------------------------------------------------------------------------------------------------------------------------------------------------------------
# Failure Mode
# Which assessment do you choose?
# Brittle Fracture | General Metal Loss | Local Metal Loss
# Pitting Corrosion | Crack-like Flaw | Creep Rupture
# [component: outputs Next]
# -----------------------------------------------------------------------------------------------------------------------------------------------------------------------------------
# Code
Failure_Mode := "General Metal Loss "
# [area: Page2_Equipment]
# -----------------------------------------------------------------------------------------------------------------------------------------------------------------------------------
# File | Edit | Tool | View | Help
# -----------------------------------------------------------------------------------------------------------------------------------------------------------------------------------
# Equipment | Design | Material | Dimention | Load | Result | Save | Report | Close
# Equipment Data
# [component: outputs Equipment_Type]
# {select Pressure Vessel}
# [component: outputs Faillure_Mode]
# {select Crack-like flaw}
# [component: outputs Methodology]
# {select API 579-1/ASME FFS-1 2007 Fitness-For-Service}
# [component: outputs Unit]
# {select in-psi-oF}
# [component: outputs Assessment_Level]
# //Level 3 not active now
# [component: outputs Analysis_By]
# [component: outputs Analysis_Date]
# [component: outputs Attach_Picture]
# [component: outputs Analysis_Detail]
# [component: outputs Next]
# -----------------------------------------------------------------------------------------------------------------------------------------------------------------------------------
# Code
# //Unit
Unit_Length :=
    "mm" if Unit == 1
    "in" if Unit == 2
Unit_Length = "in"
Unit_Stress :=
    "MPa" if Unit == 1
    "psi" if Unit == 2
Unit_Stress = "psi"
Unit_Temp :=
    "oC" if Unit == 1
    "oF" if Unit == 2
Unit_Temp = "oF"
Unit_Time := "Hrs"
Unit_Time = "Hrs"
# //Equipment Type
EquipmentType :=
    "Pipe Component" if Equipment_Type == 1
    "Pressure Vessel" if Equipment_Type == 2
    "Atmospheric Storage Tank" otherwise
EquipmentType = "Pressure Vessel"
# // Failure Mode
FaillureMode :=
    "Brittle Fracture" if Faillure_Mode == 1
    "General Metal Loss " if Faillure_Mode == 2
    "Local Metal Loss" if Faillure_Mode == 3
    "Pitting Corrosion " if Faillure_Mode == 4
    "Crack-like Flaw" if Faillure_Mode == 5
    "Creep Rupture" otherwise
FaillureMode = "Crack-like Flaw"
# //Methodology
Methodology :=
    "API 579-1/ASME FFS-1 2007 Fitness-For-Service" if Methodology == 1
    "Other" otherwise
Methodology = "API 579-1/ASME FFS-1 2007 Fitness-For-Service"
# //Assessment Level
AssessmentLevel :=
    "Level 1" if Assessment_Level == 1
    "Level 2" if Assessment_Level == 2
    "Level 3" otherwise
AssessmentLevel = "Level 1"
# //Analysis By
AnalysisBy := Analysis_By
AnalysisBy = "TEST NAME"
# //Analysis Date
AnalysisDate := Analysis_Date
AnalysisDate = "1/1/14"
# //Attach Picture
AttachPicture := Attach_Picture
AttachPicture = "TEST PICTURE"
# //Analysis Detail
AnalysisDetail := Analysis_Detail
AnalysisDetail = "FAILURE"
# [area: Page3_Design]
# -----------------------------------------------------------------------------------------------------------------------------------------------------------------------------------
# File | Edit | Tool | View | Help
# -----------------------------------------------------------------------------------------------------------------------------------------------------------------------------------
# Equipment | Design | Material | Dimention | Load | Result | Save | Report | Close
# Design Data
# [component: outputs Component_Type]
# {selected Cylindical Shell}
# // if Equipment_Type = Pipe Component
# Component_Type = - Straight Pipe
# //if Equipment_Type = Pressure Vessel
# Component_Type = - Cylindical Shell
# - Spherical Shell
# - Hemispherical Head
# //if Equipment_Type = Atmospheric Storage Tank
# Component_Type = - Storage Tank
# [component: outputs Component_Shape]
# {selected Cylindrical}
# [component: outputs Design_Code]
# {selected ASME Section VIII Div.1}
# // if Equipment_Type = Pipe Component
# Design_Code =
# - ASME B31.3
# -Other
# //if Equipment_Type = Pressure Vessel
# Design_Code =
# - ASME Section VIII Div.1
# - ASME Section VIII Div.2
# -Other
# //if Equipment_Type = Atmospheric Storage Tank
# Design_Code =
# - API 620
# -Other
# [component: outputs Pressure_Design]
Unit_Stress = "psi"
# [component: outputs Temperature_Design]
Unit_Temp = "oF"
# [component: outputs Inside_Diameter]
Unit_Length = "in"
# [component: outputs Nominal_Thickness]
Unit_Length = "in"
# [component: outputs Future_Corrosion_Allowance]
Unit_Length = "in"
# [component: outputs Uniform_Metal_Loss]
Unit_Length = "in"
# [component: outputs Weld_Efficiency]
# [component: outputs Next]
# ----------------------------------------------------------------------------------------------------------------------------------------------------------------------------
# Code
ComponentShape :=
    "Flat plate" if Component_Shape == 1
    "Cylindical" if Component_Shape == 2
    "Sphericall" otherwise
ComponentShape = "Flat plate"
DesignCode :=
    "ASME Section VIII Div.1" if Design_Code == 1
    "ASME Section VIII Div.2" if Design_Code == 2
    "ASME B31.3" if Design_Code == 3
    "API 620" if Design_Code == 3
    "Other" otherwise
DesignCode = "ASME Section VIII Div.1"
P_design := str2num(Pressure_Design)
P_design = 300
T_design := str2num(Temperature_Design)
T_design = 100
D := str2num(Inside_Diameter)
D = 96
R := D/2
R = 48
t_nom := str2num(Nominal_Thickness)
t_nom = 1.25
FCA := str2num(Future_Corrosion_Allowance)
FCA = 0.125
LOSS := str2num(Uniform_Metal_Loss)
LOSS = 0.1
E := str2num(Weld_Efficiency)
E = 1
# [area: Page4_Material]
# -----------------------------------------------------------------------------------------------------------------------------------------------------------------------------------
# File | Edit | Tool | View | Help
# -----------------------------------------------------------------------------------------------------------------------------------------------------------------------------------
# Equipment | Design | Material | Dimention | Load | Result | Save | Report | Close
# Material Data
# [component: outputs Material_Specification]
# [component: outputs Material_Name]
# {active when MaterialSpecification Other }
# [component: outputs Material_Type]
# [component: outputs Material_Name]
# {active when MaterialSpecification Other }
# [component: outputs ASME_Exemption_Curves]
# {select B }
# [component: outputs Yield_Stresngth]
Unit_Stress = "psi"
# [component: outputs Automatic_calculation_reference_temperature]
# {ticked }
# [component: outputs Reference_temperature]
Unit_Temp = "oF"  # // active when don't tick Automatic_calculation_reference_temperature
# [component: outputs Next]
# -----------------------------------------------------------------------------------------------------------------------------------------------------------------------------------
# Code
Material :=
    Material_Name if Material_Specification == 3
    "test material" otherwise
ExCurve :=
    "A" if ASME_Exemption_Curves == 1
    "B" if ASME_Exemption_Curves == 2
    "C" if ASME_Exemption_Curves == 3
    "D" otherwise
ExCurve = "B"
S_y := str2num(Yield_Stresngth)
S_y = 38000
T_ref :=
    str2num(Reference_temperature) if Automatic_calculation_reference_temperature == 0
    0 otherwise
T_ref = 0
Unit_Temp = "oF"
MaterialType :=
    "Carbon Steels" if Material_Type == 1
    "Low Alloy Steels" if Material_Type == 2
    "Other" otherwise
Material_Type
MaterialType = "Carbon Steels"
# [area: Page5_Dimension]
# -----------------------------------------------------------------------------------------------------------------------------------------------------------------------------------
# File | Edit | Tool | View | Help
# -----------------------------------------------------------------------------------------------------------------------------------------------------------------------------------
# Equipment | Design | Material | Dimention | Load | Result | Save | Report | Close
# Dimension Data
# [component: outputs Crack_Type]
# {select Cylinder-longitudinal joint-crack parallel to joint}
# [component: outputs Crack_Location]
# {select Weld metal with PWHT}
# [component: outputs Crack_Length]
Unit_Length = "in"
# [component: outputs Crack_Depth]
Unit_Length = "in"
# [component: outputs Next]
# -----------------------------------------------------------------------------------------------------------------------------------------------------------------------------------
# Code
a_meas := str2num(Crack_Depth)
a_meas = 0.25
c_meas := str2num(Crack_Length)
c_meas = 1.1
CrackType :=
    "Flat plate-crack parallel to joint" if Crack_Type == 1
    "Cylinder-longitudinal joint-crack parallel to joint" if Crack_Type == 2
    "Cylinder-longitudinal joint-crack perpendicular to joint" if Crack_Type == 3
    "Cylinder-circumferential joint-crack parallel to joint" if Crack_Type == 4
    "Cylinder-circumferential joint-crack perpendicular to joint" if Crack_Type == 5
    "Sphere-circumferential joint-crack parallel to joint" if Crack_Type == 6
    "Sphere-circumferential joint-crack perpendicular to joint" otherwise
CrackType = "Cylinder-longitudinal joint-crack parallel to joint"
CrackLocation :=
    "Base metal" if Crack_Location == 1
    "Weld metal without PWHT" if Crack_Location == 2
    "Weld metal with PWHT" otherwise
CrackLocation = "Weld metal with PWHT"
# [area: Page6_Load]
# -----------------------------------------------------------------------------------------------------------------------------------------------------------------------------------
# File | Edit | Tool | View | Help
# -----------------------------------------------------------------------------------------------------------------------------------------------------------------------------------
# Equipment | Design | Material | Dimention | Load | Result | Save | Report | Close
# Load Data
# [component: outputs Operating_Pressure]
Unit_Stress = "psi"
# [component: outputs Ecxternal_Pressure]
# //not active now
# [component: outputs Operating_Temperature:]
Unit_Temp = "oF"
# [component: outputs Next]
# -----------------------------------------------------------------------------------------------------------------------------------------------------------------------------------
# Code
P_oper := str2num(Operating_Pressure)
P_oper = 300
Unit_Stress = "psi"
T_oper := str2num(Operating_Temperature:)
T_oper = 100
Unit_Temp = "oF"
# [area: Calculation_Level1]
# -----------------------------------------------------------------------------------------------------------------------------------------------------------------------------------
# STEP 1 – Determine the load cases and temperatures to be used in the assessment based on operating
# and design conditions.
P_design = 300
Unit_Stress = "psi"
T_design = 100
Unit_Temp = "oF"
# STEP 2 – Determine the length, 2c, and depth, a, of the crack-like flaw from inspection data.
a_meas = 0.25
Unit_Length = "in"
c_meas = 1.1
Unit_Length = "in"
# STEP 3 – Determine the Figure from the list below to be used in the assessment based on the
# component geometry and crack-like flaw orientation with respect to the weld joint.
CrackType = "Cylinder-longitudinal joint-crack parallel to joint"
Figture :=
    "Figure 9.12" if Crack_Type == 1
    "Figure 9.13" if Crack_Type == 2
    "Figure 9.14" if Crack_Type == 3
    "Figure 9.15" if Crack_Type == 4
    "Figure 9.16" if Crack_Type == 5
    "Figure 9.17" if Crack_Type == 6
    "Figure 9.18" otherwise
Figture = "Figure 9.13"
# STEP 4 – Determine the screening curve from the Figure selected in STEP 3. The following should be
# noted when selecting a screening curve.
t :=
    t_nom if Unit_Length == "in"
    t_nom*25.4 otherwise
t_nom = 1.25
Unit_Length = "in"
a :=
    a_meas if Unit_Length == "in"
    a_meas*25.4 otherwise
a_meas = 0.25
Unit_Length = "in"
ScreeningCurve :=
    "1/4-t screening curves" if t ≤ 1 and a ≤ t/4
    "1-t screening curves" if t ≤ 1 and a > t/4
    "1/4-t screening curves" if 1 < t ≤ 1.5 and a ≤ 0.25
    "1-t screening curves" otherwise
ScreeningCurve = "1/4-t screening curves"
Curve :=
    "Curve A" if Crack_Location == 1
    "Curve B" if Crack_Location == 3
    "Curve D" otherwise
Curve = "Curve B"
# STEP 5 – Determine the reference temperature. Based on the material specification determine the
# Material Temperature Exemption Curve
S :=
    S_y if Unit_Stress == "MPa"
    S_y*(6.895*10^-3) otherwise
S = 262.01
# Carbon Steels – 20 Joule or 15 ft-lb Transition Temperature for Each ASME Exemption Curve
T_ref_carbon_A := 0.0000000274*S^4 - 0.0000352806*S^3 + 0.0172517399*S^2 - 3.9034811451*S + 370.945624258
T_ref_carbon_B := 0.0000000274*S^4 - 0.0000352806*S^3 + 0.0172517399*S^2 - 3.9034811451*S + 349.945624257
T_ref_carbon_C := 0.0000000376*S^4 - 0.0000462569*S^3 + 0.0216395619*S^2 - 4.6764852337*S + 379.395200911
T_ref_carbon_D := 0.0000000169*S^4 - 0.000022789*S^3 + 0.011769552*S^2 - 2.8480982259*S + 239.234301171
# Low Alloy Steels – 27 Joule or 20 ft-lb Transition Temperature for Each ASME Exemption Curve
T_ref_lowalloy_A := 0.0000000072*S^4 - 0.0000121844*S^3 + 0.0077764924*S^2 - 2.287355806*S + 286.34877341
T_ref_lowalloy_B := 0.0000000064*S^4 - 0.0000110433*S^3 + 0.0071290946*S^2 - 2.1287127862*S + 251.113592651
T_ref_lowalloy_C := 0.0000000064*S^4 - 0.0000110433*S^3 + 0.0071290946*S^2 - 2.1287127862*S + 230.113592651
T_ref_lowalloy_D := 0.000000007*S^4 - 0.0000118467*S^3 + 0.0075837321*S^2 - 2.238138275*S + 224.903556275
ExCurve = "B"
MaterialType = "Carbon Steels"
T_ref :=
    T_ref if Automatic_calculation_reference_temperature == 0
    T_ref_carbon_A if MaterialType == "Carbon Steels" and ExCurve == "A"
    T_ref_carbon_B if MaterialType == "Carbon Steels" and ExCurve == "B"
    T_ref_carbon_C if MaterialType == "Carbon Steels" and ExCurve == "C"
    T_ref_carbon_D if MaterialType == "Carbon Steels" and ExCurve == "D"
    T_ref_lowalloy_A if MaterialType == "Low Alloy Steels" and ExCurve == "A"
    T_ref_lowalloy_B if MaterialType == "Low Alloy Steels" and ExCurve == "B"
    T_ref_lowalloy_C if MaterialType == "Low Alloy Steels" and ExCurve == "C"
    T_ref_lowalloy_D if MaterialType == "Low Alloy Steels" and ExCurve == "D"
T_ref = 6.05719
T_ref :=
    T_ref if Automatic_calculation_reference_temperature == 0
    T_ref*1.8 + 32 if Unit_Temp == "oF"
    T_ref otherwise
T_ref = 42.9029
Unit_Temp = "oF"
# STEP 6 – Determine the maximum permissible crack-like flaw length.
T_r :=
    (T_ref - 32)/1.8 if Unit_Temp == "oF"
    T_ref otherwise
T_ass := T_design - T_r + 56
c_fig12_A14_t := 0.00011*T_ass^4 - 0.00767*T_ass^3 + 0.19656*T_ass^2 + 0.06265*T_ass + 77.91796
c_fig12_A1_t := 0.00001*T_ass^4 - 0.00075*T_ass^3 + 0.03192*T_ass^2 - 0.198*T_ass + 29.0778
c_fig12_B14_t := 0.0000016424*T_ass^5 - 0.0001996675*T_ass^4 + 0.0088933851*T_ass^3 - 0.1610603999*T_ass^2 + 1.2409282132*T_ass + 18.5857305929
c_fig12_B1_t := 0.0000000159*T_ass^6 - 0.0000038258*T_ass^5 + 0.0003468438*T_ass^4 - 0.0144618029*T_ass^3 + 0.2724474338*T_ass^2 - 1.8626888618*T_ass + 5.3654906192
c_fig12_C14_t := 0.0000000299*T_ass^5 - 0.0000037628*T_ass^4 + 0.0002289994*T_ass^3 - 0.0045503903*T_ass^2 + 0.1327631791*T_ass + 9.7495200263
c_fig12_C1_t := 0.0000004728*T_ass^4 - 0.0000364504*T_ass^3 + 0.0019795995*T_ass^2 - 0.0165719866*T_ass + 3.4001097341
c_fig13_A14_t := 0.00016317*T_ass^4 - 0.010623*T_ass^3 + 0.23342*T_ass^2 - 1.2145*T_ass + 53.211
c_fig13_A1_t := -0.000000040847*T_ass^4 + 0.000031883*T_ass^3 + 0.0015831*T_ass^2 + 0.065435*T_ass + 20.5
c_fig13_B14_t := 0.00011867*T_ass^4 - 0.011311*T_ass^3 + 0.36363*T_ass^2 - 3.6499*T_ass + 35.805
c_fig13_B1_t := 0.0000000067419*T_ass^4 + 0.000037148*T_ass^3 + 0.000051317*T_ass^2 + 0.061112*T_ass + 11.102
c_fig13_C14_t := 0.0000049223*T_ass^4 - 0.00056219*T_ass^3 + 0.021878*T_ass^2 - 0.27512*T_ass + 3.2618
c_fig13_C1_t := 0.00000071523*T_ass^4 - 0.000076763*T_ass^3 + 0.0033845*T_ass^2 - 0.031282*T_ass + 2.5689
c_fig14_A14_t := 0.0001031*T_ass^4 - 0.0068043*T_ass^3 + 0.21325*T_ass^2 - 0.82692*T_ass + 76.567
c_fig14_A1_t := 0.0000017259*T_ass^4 - 0.00017387*T_ass^3 + 0.0092481*T_ass^2 - 0.046802*T_ass + 16.974
c_fig14_B14_t := 0.0000052044*T_ass^5 - 0.00066501*T_ass^4 + 0.030554*T_ass^3 - 0.57515*T_ass^2 + 4.0792*T_ass + 17.171
c_fig14_B1_t := 0.00000111064*T_ass^4 - 0.000134411*T_ass^3 + 0.00733624*T_ass^2 - 0.0668569*T_ass + 7.64377
c_fig14_C14_t := 0.00000037783*T_ass^5 - 0.000071038*T_ass^4 + 0.0048334*T_ass^3 - 0.13726*T_ass^2 + 1.4352*T_ass + 0.45424
c_fig14_C1_t := 0.0000000085502*T_ass^5 - 0.0000012977*T_ass^4 + 0.000059213*T_ass^3 + 0.0010242*T_ass^2 - 0.051631*T_ass + 3.1588
c_fig15_A14_t := 0.00010425*T_ass^4 - 0.006999*T_ass^3 + 0.22286*T_ass^2 - 0.94082*T_ass + 77.392
c_fig15_A1_t := 0.000000024413*T_ass^5 - 0.0000037971*T_ass^4 + 0.00027586*T_ass^3 - 0.0064064*T_ass^2 + 0.16223*T_ass + 15.926
c_fig15_B14_t := 0.000092754*T_ass^4 - 0.0034894*T_ass^3 + 0.067554*T_ass^2 + 0.15394*T_ass + 35.969
c_fig15_B1_t := 0.0000011254*T_ass^4 - 0.00013075*T_ass^3 + 0.0075659*T_ass^2 - 0.081869*T_ass + 9.6899
c_fig15_C14_t := 0.000000045293*T_ass^6 - 0.000010637*T_ass^5 + 0.0009373*T_ass^4 - 0.037918*T_ass^3 + 0.68932*T_ass^2 - 4.5514*T_ass + 8.2275
c_fig15_C1_t := 0.000000014938*T_ass^5 - 0.0000020715*T_ass^4 + 0.000078229*T_ass^3 + 0.00080483*T_ass^2 - 0.036864*T_ass - 2.5944
c_fig16_A14_t := 0.00016052*T_ass^4 - 0.010311*T_ass^3 + 0.22143*T_ass^2 - 1.0572*T_ass + 53.074
c_fig16_A1_t := 0.000000054098*T_ass^4 + 0.000011611*T_ass^3 + 0.0029769*T_ass^2 + 0.039904*T_ass + 20.465
c_fig16_B14_t := 0.0000017373*T_ass^5 - 0.0002328*T_ass^4 + 0.011202*T_ass^3 - 0.21744*T_ass^2 + 1.6817*T_ass + 17.414
c_fig16_B1_t := 0.00000025269*T_ass^4 - 0.0000035024*T_ass^3 + 0.0018832*T_ass^2 + 0.01142*T_ass + 9.0899
c_fig16_C14_t := 0.0000049205*T_ass^4 - 0.00055869*T_ass^3 + 0.021323*T_ass^2 - 0.24341*T_ass + 3.3779
c_fig16_C1_t := 0.00000072168*T_ass^4 - 0.000091599*T_ass^3 + 0.0049989*T_ass^2 - 0.060339*T_ass + 2.92
c_fig17_A14_t := 0.000015789*T_ass^4 - 0.00057943*T_ass^3 + 0.019449*T_ass^2 + 0.25032*T_ass + 50.544
c_fig17_A1_t := -0.00000063317*T_ass^4 + 0.00013412*T_ass^3 - 0.002329*T_ass^2 + 0.16058*T_ass + 24.595
c_fig17_B14_t := 0.00012199*T_ass^4 - 0.011229*T_ass^3 + 0.3443*T_ass^2 - 3.2323*T_ass + 33.126
c_fig17_B1_t := -0.000000095236*T_ass^4 + 0.000078688*T_ass^3 - 0.0022988*T_ass^2 + 0.13456*T_ass + 12.846
c_fig17_C14_t := 0.0000001178*T_ass^5 - 0.000019989*T_ass^4 + 0.0012753*T_ass^3 - 0.034522*T_ass^2 + 0.37116*T_ass + 2.7984
c_fig17_C1_t := 0.00000052651*T_ass^4 - 0.000026086*T_ass^3 - 0.00049691*T_ass^2 + 0.087024*T_ass + 2.8226
c_fig18_A14_t := 0.00001222*T_ass^4 - 0.00023569*T_ass^3 + 0.0086968*T_ass^2 + 0.39075*T_ass + 49.876
c_fig18_A1_t := -0.00000039115*T_ass^4 + 0.000091665*T_ass^3 - 0.00017498*T_ass^2 + 0.13162*T_ass + 24.178
c_fig18_B14_t := 0.0000015393*T_ass^5 - 0.00018716*T_ass^4 + 0.0079335*T_ass^3 - 0.12707*T_ass^2 + 0.80799*T_ass + 17.213
c_fig18_B1_t := -0.0000000093767*T_ass^5 + 0.0000020276*T_ass^4 - 0.000087483*T_ass^3 + 0.0024417*T_ass^2 + 0.064873*T_ass + 9.6147
c_fig18_C14_t := 0.000000095616*T_ass^5 - 0.000015483*T_ass^4 + 0.00095585*T_ass^3 - 0.0225212*T_ass^2 + 0.28128*T_ass + 2.3461
c_fig18_C1_t := 0.00000084411*T_ass^4 - 0.000092161*T_ass^3 + 0.0042428*T_ass^2 - 0.044108*T_ass + 3.2306
c_permiss :=
    c_fig12_A14_t if Figture == "Figure 9.12" and Curve == "Curve A" and ScreeningCurve == "1/4-t screening curves"
    c_fig12_A1_t if Figture == "Figure 9.12" and Curve == "Curve A" and ScreeningCurve == "1-t screening curves"
    c_fig12_B14_t if Figture == "Figure 9.12" and Curve == "Curve B" and ScreeningCurve == "1/4-t screening curves"
    c_fig12_B1_t if Figture == "Figure 9.12" and Curve == "Curve B" and ScreeningCurve == "1-t screening curves"
    c_fig12_C14_t if Figture == "Figure 9.12" and Curve == "Curve C" and ScreeningCurve == "1/4-t screening curves"
    c_fig12_C1_t if Figture == "Figure 9.12" and Curve == "Curve C" and ScreeningCurve == "1-t screening curves"
    c_fig13_A14_t if Figture == "Figure 9.13" and Curve == "Curve A" and ScreeningCurve == "1/4-t screening curves"
    c_fig13_A1_t if Figture == "Figure 9.13" and Curve == "Curve A" and ScreeningCurve == "1-t screening curves"
    c_fig13_B14_t if Figture == "Figure 9.13" and Curve == "Curve B" and ScreeningCurve == "1/4-t screening curves"
    c_fig13_B1_t if Figture == "Figure 9.13" and Curve == "Curve B" and ScreeningCurve == "1-t screening curves"
    c_fig13_C14_t if Figture == "Figure 9.13" and Curve == "Curve C" and ScreeningCurve == "1/4-t screening curves"
    c_fig13_C1_t if Figture == "Figure 9.13" and Curve == "Curve C" and ScreeningCurve == "1-t screening curves"
    c_fig14_A14_t if Figture == "Figure 9.14" and Curve == "Curve A" and ScreeningCurve == "1/4-t screening curves"
    c_fig14_A1_t if Figture == "Figure 9.14" and Curve == "Curve A" and ScreeningCurve == "1-t screening curves"
    c_fig14_B14_t if Figture == "Figure 9.14" and Curve == "Curve B" and ScreeningCurve == "1/4-t screening curves"
    c_fig14_B1_t if Figture == "Figure 9.14" and Curve == "Curve B" and ScreeningCurve == "1-t screening curves"
    c_fig14_C14_t if Figture == "Figure 9.14" and Curve == "Curve C" and ScreeningCurve == "1/4-t screening curves"
    c_fig14_C1_t if Figture == "Figure 9.14" and Curve == "Curve C" and ScreeningCurve == "1-t screening curves"
    c_fig15_A14_t if Figture == "Figure 9.15" and Curve == "Curve A" and ScreeningCurve == "1/4-t screening curves"
    c_fig15_A1_t if Figture == "Figure 9.15" and Curve == "Curve A" and ScreeningCurve == "1-t screening curves"
    c_fig15_B14_t if Figture == "Figure 9.15" and Curve == "Curve B" and ScreeningCurve == "1/4-t screening curves"
    c_fig15_B1_t if Figture == "Figure 9.15" and Curve == "Curve B" and ScreeningCurve == "1-t screening curves"
    c_fig15_C14_t if Figture == "Figure 9.15" and Curve == "Curve C" and ScreeningCurve == "1/4-t screening curves"
    c_fig15_C1_t if Figture == "Figure 9.15" and Curve == "Curve C" and ScreeningCurve == "1-t screening curves"
    c_fig16_A14_t if Figture == "Figure 9.16" and Curve == "Curve A" and ScreeningCurve == "1/4-t screening curves"
    c_fig16_A1_t if Figture == "Figure 9.16" and Curve == "Curve A" and ScreeningCurve == "1-t screening curves"
    c_fig16_B14_t if Figture == "Figure 9.16" and Curve == "Curve B" and ScreeningCurve == "1/4-t screening curves"
    c_fig16_B1_t if Figture == "Figure 9.16" and Curve == "Curve B" and ScreeningCurve == "1-t screening curves"
    c_fig16_C14_t if Figture == "Figure 9.16" and Curve == "Curve C" and ScreeningCurve == "1/4-t screening curves"
    c_fig16_C1_t if Figture == "Figure 9.16" and Curve == "Curve C" and ScreeningCurve == "1-t screening curves"
    c_fig17_A14_t if Figture == "Figure 9.17" and Curve == "Curve A" and ScreeningCurve == "1/4-t screening curves"
    c_fig17_A1_t if Figture == "Figure 9.17" and Curve == "Curve A" and ScreeningCurve == "1-t screening curves"
    c_fig17_B14_t if Figture == "Figure 9.17" and Curve == "Curve B" and ScreeningCurve == "1/4-t screening curves"
    c_fig17_B1_t if Figture == "Figure 9.17" and Curve == "Curve B" and ScreeningCurve == "1-t screening curves"
    c_fig17_C14_t if Figture == "Figure 9.17" and Curve == "Curve C" and ScreeningCurve == "1/4-t screening curves"
    c_fig17_C1_t if Figture == "Figure 9.17" and Curve == "Curve C" and ScreeningCurve == "1-t screening curves"
    c_fig18_A14_t if Figture == "Figure 9.18" and Curve == "Curve A" and ScreeningCurve == "1/4-t screening curves"
    c_fig18_A1_t if Figture == "Figure 9.18" and Curve == "Curve A" and ScreeningCurve == "1-t screening curves"
    c_fig18_B14_t if Figture == "Figure 9.18" and Curve == "Curve B" and ScreeningCurve == "1/4-t screening curves"
    c_fig18_B1_t if Figture == "Figure 9.18" and Curve == "Curve B" and ScreeningCurve == "1-t screening curves"
    c_fig18_C14_t if Figture == "Figure 9.18" and Curve == "Curve C" and ScreeningCurve == "1/4-t screening curves"
    c_fig18_C1_t if Figture == "Figure 9.18" and Curve == "Curve C" and ScreeningCurve == "1-t screening curves"
    200 if T_ass ≥ 120
    0 otherwise
c_permiss = 200
c_permiss :=
    8 if c_permiss ≥ 200 and Unit_Length == "in"
    200 if c_permiss ≥ 200 and Unit_Length == "mm"
    c_permiss*0.03937008 if c_permiss < 200 and Unit_Length == "in"
    c_permiss otherwise
c_permiss = 8
Unit_Length = "in"
# STEP 7 – Evaluate Results.
Result_Level1 :=
    "The Level 1 assessment criteria are satisfied." if c_permiss ≥ c_meas
    "The Level 1 assessment criteria are not satisfied." otherwise
Result_Level1 = "The Level 1 assessment criteria are satisfied."
# -----------------------------------------------------------------------------------------------------------------------------------------------------------------------------------
# [area: Page7_Short Report_Level1]
# -----------------------------------------------------------------------------------------------------------------------------------------------------------------------------------
# File | Edit | Tool | View | Help
# -----------------------------------------------------------------------------------------------------------------------------------------------------------------------------------
# Equipment | Design | Material | Dimention | Load | Result | Save | Report | Close
Result := Result_Level1
Result = "The Level 1 assessment criteria are satisfied."
# [component: outputs Next]
# -----------------------------------------------------------------------------------------------------------------------------------------------------------------------------------
# [area: Page8_Long Report_Level1]
# ----------------------------------------------For Level 1---------------------------------------------------------------
EquipmentType = "Pressure Vessel"
Component_Type = 1
DesignCode = "ASME Section VIII Div.1"
Failure_Mode = "General Metal Loss "
Methodology = "API 579-1/ASME FFS-1 2007 Fitness-For-Service"
# o ------------------------------------------------------------- o
# -
# -
# -
# -
# -
# -
# -
# -
# -
# -
# -
# -
# -
# -
# -
# -
# -
# -
# -
# -
# -
# -
# -
# -
# -
# -
# Picture
# Picture
# Picture
# o ------------------------------------------------------------- o
AssessmentLevel = "Level 1"
AnalysisBy = "TEST NAME"
AnalysisDate = "1/1/14"
AttachPicture = "TEST PICTURE"
AnalysisDetail = "FAILURE"
# -----------------------------------------------------------------------------------------------------------------------------------------------------------------------------------
# STEP 1 – Determine the load cases and temperatures to be used in the assessment based on operating
# and design conditions.
P_design = 300
Unit_Stress = "psi"
T_design = 100
Unit_Temp = "oF"
# STEP 2 – Determine the length, 2c, and depth, a, of the crack-like flaw from inspection data.
a_meas = 0.25
Unit_Length = "in"
c_meas = 1.1
Unit_Length = "in"
# STEP 3 – Determine the Figure from the list below to be used in the assessment based on the
# component geometry and crack-like flaw orientation with respect to the weld joint.
CrackType = "Cylinder-longitudinal joint-crack parallel to joint"
Figture = "Figure 9.13"
# STEP 4 – Determine the screening curve from the Figure selected in STEP 3. The following should be
# noted when selecting a screening curve.
ScreeningCurve = "1/4-t screening curves"
Curve = "Curve B"
# STEP 5 – Determine the reference temperature. Based on the material specification determine the
# Material Temperature Exemption Curve
MaterialType = "Carbon Steels"
ExCurve = "B"
T_ref = 42.9029
Unit_Temp = "oF"
# STEP 6 – Determine the maximum permissible crack-like flaw length.
c_permiss = 8
Unit_Length = "in"
# STEP 7 – Evaluate Results.
Result_Level1 = "The Level 1 assessment criteria are satisfied."
# [area: Calculation_Level2]
# ---------------------------------------------------------------------------------------------------------------------------------------------------------------------------------
R_i := R
R_o := R + t_nom
t := t_nom
P := P_design
T := T_design
a := a_meas
c := c_meas/2
# STEP 1 – Evaluate operating conditions.
P_design = 300
Unit_Stress = "psi"
T_design = 100
Unit_Temp = "oF"
# STEP 2 – Determine the stress distribution.
# Primary Stress
# Membrane stress
P_m := P*R_i/t
# Bending Stress
P_b := P*R_o^2/(R_o^2 - R_i^2)*(t/R_i - 3/2*(t/R_i)^2 + 9/5*(t/R_i)^3)
P_b :=
    0 if P_b/P_m ≤ 0.01
    P_b otherwise
# Secondary Stress
# Residual Stress
# STEP 3 – Determine the material properties.
T_ref = 42.9029
σ_y := S_y
K_IC :=
    (36.5 + 3.084*exp(0.036*(T - T_ref + 56)))*31.623 if Unit_Length == "mm"
    (33.2 + 2.806*exp(0.02*(T - T_ref + 100)))*1000 otherwise
K_IC = 98155.4
# Unit
MPa*sqrt(mm)
# or
psi*sqrt(in)
# STEP 4 – Determine the crack-like flaw dimensions from inspection data.
a_meas = 0.25
Unit_Length = "in"
c_meas = 1.1
Unit_Length = "in"
# STEP 5 – Modify the data using the Partial Safety Factors (PSF)
[PSF_s; PSF_k; PSF_a] := [1; 1; 1]
# Modify the primary stress
# Primary Membrane
P_m := P_m*PSF_s
# Bending Stress
P_b := P_b*PSF_s
# Modify the material fracture toughness.
K_mat := K_IC/PSF_k
# Modify the flaw size.
a := a*PSF_a
# STEP 6 – Compute the reference stress for primary stresses.
α := a/t/(1 + t/c)
α = 0.0611111
g := 1 - 20*(a/(2*c))^0.75*α^3
g = 0.998498
λ := 1.818*c/sqrt(R_i*a)
λ = 0.288646
M_t := sqrt((1.02 + 0.4411*λ^2 + 0.006124*λ^4)/(1.0 + 0.02642*λ^2 + 1.533*10^-6*λ^4))
M_t = 1.02688
M_s := 1/(1 - a/t + a/t*1/M_t)
M_s = 1.00526
σ_ref := (g*P_b + sqrt((g*P_b)^2 + 9*(M_s*P_m*(1 - α)^2)^2))/(3*(1 - α)^2)
σ_ref = 11637.4
# STEP 7 – Compute the Load Ratio.
L_r.p := σ_ref/σ_y
L_r.p = 0.306247
# STEP 8 – Compute the stress intensity attributed to the primary loads.
# [component: outputs TableC12]
t_R := t/R_i
a_c := a/c
a_t := a/t
t_R = 0.0260417
a_c = 0.454545
a_t = 0.2
Q :=
    1 + 1.464*(a/c)^1.65 if a/c ≤ 1
    1 + 1.464*(c/a)^1.65 otherwise
CheckRange :=
    "Beyond t/R Limit" if t_R < 0 or t_R > 1
    "Beyond a/c Limit" if a_c < 0.03125 or a_c > 2
    "Beyond a/t Limit" if a_t < 0 or a_t > 0.8
    "OK" otherwise
CheckRange = "OK"
t_R :=
    0 if CheckRange == "Beyond t/R Limit" and t_R < 0
    1 if CheckRange == "Beyond t/R Limit" and t_R > 1
    t_R otherwise
t_R = 0.0260417
a_c :=
    0.03125 if CheckRange == "Beyond a/c Limit" and a_c < 0.03125
    2 if CheckRange == "Beyond a/c Limit" and a_c > 2
    a_c otherwise
a_c = 0.454545
a_t :=
    0 if CheckRange == "Beyond a/t Limit" and a_t < 0
    0.8 if CheckRange == "Beyond a/t Limit" and a_t > 0.8
    a_t otherwise
a_t = 0.2
i_tR_min :=
    for i ∈ 0, 70 .. 559
        break if t_R ≥ TableC12[i, 0] and t_R < TableC12[i + 70, 0]
    i
i_tR_min = 140
i_tR_max :=
    for i ∈ 0, 70 .. 559
        break if t_R ≥ TableC12[i, 0] and t_R < TableC12[i + 70, 0]
    i + 70
i_tR_max = 210
i_tR_min_ac_min :=
    for i ∈ i_tR_min, i_tR_min + 10 .. 559
        break if a_c ≥ TableC12[i, 1] and a_c < TableC12[i + 10, 1]
    i
i_tR_min_ac_min = 170
i_tR_min_ac_max :=
    for i ∈ i_tR_min, i_tR_min + 10 .. 559
        break if a_c ≥ TableC12[i, 1] and a_c < TableC12[i + 10, 1]
    i + 10
i_tR_min_ac_max = 180
i_tR_min_ac_min_at_min :=
    for i ∈ i_tR_min_ac_min, i_tR_min_ac_min + 2 .. 559
        break if (a_t > TableC12[i, 2]) and (a_t ≤ TableC12[i + 2, 2])
    i
i_tR_min_ac_min_at_min = 170
i_tR_min_ac_min_at_max :=
    for i ∈ i_tR_min_ac_min, i_tR_min_ac_min + 2 .. 559
        break if (a_t > TableC12[i, 2]) and (a_t ≤ TableC12[i + 2, 2])
    i + 2
i_tR_min_ac_min_at_max = 172
i_tR_min_ac_max_at_min :=
    for i ∈ i_tR_min_ac_max, i_tR_min_ac_max + 2 .. 559
        break if (a_t > TableC12[i, 2]) and (a_t ≤ TableC12[i + 2, 2])
    i
i_tR_min_ac_max_at_min = 180
i_tR_min_ac_max_at_max :=
    for i ∈ i_tR_min_ac_max, i_tR_min_ac_max + 2 .. 559
        break if (a_t > TableC12[i, 2]) and (a_t ≤ TableC12[i + 2, 2])
    i + 2
i_tR_min_ac_max_at_max = 182
i_tR_max_ac_min :=
    for i ∈ i_tR_max, i_tR_max + 10 .. 559
        break if a_c ≥ TableC12[i, 1] and a_c < TableC12[i + 10, 1]
    i
i_tR_max_ac_min = 240
i_tR_max_ac_max :=
    for i ∈ i_tR_max, i_tR_max + 10 .. 559
        break if a_c ≥ TableC12[i, 1] and a_c < TableC12[i + 10, 1]
    i + 10
i_tR_max_ac_max = 250
i_tR_max_ac_min_at_min :=
    for i ∈ i_tR_max_ac_min, i_tR_max_ac_min + 2 .. 559
        break if (a_t > TableC12[i, 2]) and (a_t ≤ TableC12[i + 2, 2])
    i
i_tR_max_ac_min_at_min = 240
i_tR_max_ac_min_at_max :=
    for i ∈ i_tR_max_ac_min, i_tR_max_ac_min + 2 .. 559
        break if (a_t > TableC12[i, 2]) and (a_t ≤ TableC12[i + 2, 2])
    i + 2
i_tR_max_ac_min_at_max = 242
i_tR_max_ac_max_at_min :=
    for i ∈ i_tR_max_ac_max, i_tR_max_ac_max + 2 .. 559
        break if (a_t > TableC12[i, 2]) and (a_t ≤ TableC12[i + 2, 2])
    i
i_tR_max_ac_max_at_min = 250
i_tR_max_ac_max_at_max :=
    for i ∈ i_tR_max_ac_max, i_tR_max_ac_max + 2 .. 559
        break if (a_t > TableC12[i, 2]) and (a_t ≤ TableC12[i + 2, 2])
    i + 2
i_tR_max_ac_max_at_max = 252
i := 0 .. 6
j := 0
A[i, 0] := TableC12[j, i + 3]
A[i, 1] := TableC12[j + 1, i + 3]
G_0(ϕ) := sum(A[k, 0]*(2*ϕ/π)^k, k = 0 .. 6)
G_1(ϕ) := sum(A[k, 1]*(2*ϕ/π)^k, k = 0 .. 6)
transpose(A) = [
    0.196505, 2.93735, -5.25828, 7.48892, -6.92827, 3.36733, -0.667797;
    0.005178, 0.175028, 2.77187, -4.64572, 4.67805, -3.27681, 0.984099
]
G_0i_tR_min_ac_min_at_min(ϕ) := sum(TableC12[i_tR_min_ac_min_at_min, k + 3]*(2*ϕ/π)^k, k = 0 .. 6)
G_0i_tR_min_ac_min_at_max(ϕ) := sum(TableC12[i_tR_min_ac_min_at_max, k + 3]*(2*ϕ/π)^k, k = 0 .. 6)
G_0i_tR_min_ac_max_at_min(ϕ) := sum(TableC12[i_tR_min_ac_max_at_min, k + 3]*(2*ϕ/π)^k, k = 0 .. 6)
G_0i_tR_min_ac_max_at_max(ϕ) := sum(TableC12[i_tR_min_ac_max_at_max, k + 3]*(2*ϕ/π)^k, k = 0 .. 6)
G_1i_tR_min_ac_min_at_min(ϕ) := sum(TableC12[i_tR_min_ac_min_at_min + 1, k + 3]*(2*ϕ/π)^k, k = 0 .. 6)
G_1i_tR_min_ac_min_at_max(ϕ) := sum(TableC12[i_tR_min_ac_min_at_max + 1, k + 3]*(2*ϕ/π)^k, k = 0 .. 6)
G_1i_tR_min_ac_max_at_min(ϕ) := sum(TableC12[i_tR_min_ac_max_at_min + 1, k + 3]*(2*ϕ/π)^k, k = 0 .. 6)
G_1i_tR_min_ac_max_at_max(ϕ) := sum(TableC12[i_tR_min_ac_max_at_max + 1, k + 3]*(2*ϕ/π)^k, k = 0 .. 6)
G_0i_tR_max_ac_min_at_min(ϕ) := sum(TableC12[i_tR_max_ac_min_at_min, k + 3]*(2*ϕ/π)^k, k = 0 .. 6)
G_0i_tR_max_ac_min_at_max(ϕ) := sum(TableC12[i_tR_max_ac_min_at_max, k + 3]*(2*ϕ/π)^k, k = 0 .. 6)
G_0i_tR_max_ac_max_at_min(ϕ) := sum(TableC12[i_tR_max_ac_max_at_min, k + 3]*(2*ϕ/π)^k, k = 0 .. 6)
G_0i_tR_max_ac_max_at_max(ϕ) := sum(TableC12[i_tR_max_ac_max_at_max, k + 3]*(2*ϕ/π)^k, k = 0 .. 6)
G_1i_tR_max_ac_min_at_min(ϕ) := sum(TableC12[i_tR_max_ac_min_at_min + 1, k + 3]*(2*ϕ/π)^k, k = 0 .. 6)
G_1i_tR_max_ac_min_at_max(ϕ) := sum(TableC12[i_tR_max_ac_min_at_max + 1, k + 3]*(2*ϕ/π)^k, k = 0 .. 6)
G_1i_tR_max_ac_max_at_min(ϕ) := sum(TableC12[i_tR_max_ac_max_at_min + 1, k + 3]*(2*ϕ/π)^k, k = 0 .. 6)
G_1i_tR_max_ac_max_at_max(ϕ) := sum(TableC12[i_tR_max_ac_max_at_max + 1, k + 3]*(2*ϕ/π)^k, k = 0 .. 6)
G_0i_tR_min_ac_min_at(ϕ) := G_0i_tR_min_ac_min_at_min(ϕ) + (G_0i_tR_min_ac_min_at_max(ϕ) - G_0i_tR_min_ac_min_at_min(ϕ))*(a_t - TableC12[i_tR_min_ac_max_at_min, 2])/(TableC12[i_tR_min_ac_min_at_max, 2] - TableC12[i_tR_min_ac_min_at_min, 2])
G_0i_tR_min_ac_max_at(ϕ) := G_0i_tR_min_ac_max_at_min(ϕ) + (G_0i_tR_min_ac_max_at_max(ϕ) - G_0i_tR_min_ac_max_at_min(ϕ))*(a_t - TableC12[i_tR_min_ac_max_at_min, 2])/(TableC12[i_tR_min_ac_max_at_max, 2] - TableC12[i_tR_min_ac_max_at_min, 2])
G_0i_tR_max_ac_min_at(ϕ) := G_0i_tR_max_ac_min_at_min(ϕ) + (G_0i_tR_max_ac_min_at_max(ϕ) - G_0i_tR_max_ac_min_at_min(ϕ))*(a_t - TableC12[i_tR_max_ac_min_at_min, 2])/(TableC12[i_tR_max_ac_min_at_max, 2] - TableC12[i_tR_max_ac_min_at_min, 2])
G_0i_tR_max_ac_max_at(ϕ) := G_0i_tR_max_ac_max_at_min(ϕ) + (G_0i_tR_max_ac_max_at_max(ϕ) - G_0i_tR_max_ac_max_at_min(ϕ))*(a_t - TableC12[i_tR_max_ac_max_at_min, 2])/(TableC12[i_tR_max_ac_max_at_max, 2] - TableC12[i_tR_max_ac_max_at_min, 2])
G_0i_tR_min_ac(ϕ) := G_0i_tR_min_ac_min_at(ϕ) + (G_0i_tR_min_ac_max_at(ϕ) - G_0i_tR_min_ac_min_at(ϕ))*(a_c - TableC12[i_tR_min_ac_min, 1])/(TableC12[i_tR_min_ac_max, 1] - TableC12[i_tR_min_ac_min, 1])
G_0i_tR_max_ac(ϕ) := G_0i_tR_max_ac_min_at(ϕ) + (G_0i_tR_max_ac_max_at(ϕ) - G_0i_tR_max_ac_min_at(ϕ))*(a_c - TableC12[i_tR_max_ac_min, 1])/(TableC12[i_tR_max_ac_max, 1] - TableC12[i_tR_max_ac_min, 1])
G_0i_tR(ϕ) := G_0i_tR_min_ac(ϕ) + (G_0i_tR_max_ac(ϕ) - G_0i_tR_min_ac(ϕ))*(t_R - TableC12[i_tR_min, 0])/(TableC12[i_tR_max, 0] - TableC12[i_tR_min, 0])
# ........................................................
G_1i_tR_min_ac_min_at(ϕ) := G_1i_tR_min_ac_min_at_min(ϕ) + (G_1i_tR_min_ac_min_at_max(ϕ) - G_1i_tR_min_ac_min_at_min(ϕ))*(a_t - TableC12[i_tR_min_ac_max_at_min, 2])/(TableC12[i_tR_min_ac_min_at_max, 2] - TableC12[i_tR_min_ac_min_at_min, 2])
G_1i_tR_min_ac_max_at(ϕ) := G_1i_tR_min_ac_max_at_min(ϕ) + (G_1i_tR_min_ac_max_at_max(ϕ) - G_1i_tR_min_ac_max_at_min(ϕ))*(a_t - TableC12[i_tR_min_ac_max_at_min, 2])/(TableC12[i_tR_min_ac_max_at_max, 2] - TableC12[i_tR_min_ac_max_at_min, 2])
G_1i_tR_max_ac_min_at(ϕ) := G_1i_tR_max_ac_min_at_min(ϕ) + (G_1i_tR_max_ac_min_at_max(ϕ) - G_1i_tR_max_ac_min_at_min(ϕ))*(a_t - TableC12[i_tR_max_ac_min_at_min, 2])/(TableC12[i_tR_max_ac_min_at_max, 2] - TableC12[i_tR_max_ac_min_at_min, 2])
G_1i_tR_max_ac_max_at(ϕ) := G_1i_tR_max_ac_max_at_min(ϕ) + (G_1i_tR_max_ac_max_at_max(ϕ) - G_1i_tR_max_ac_max_at_min(ϕ))*(a_t - TableC12[i_tR_max_ac_max_at_min, 2])/(TableC12[i_tR_max_ac_max_at_max, 2] - TableC12[i_tR_max_ac_max_at_min, 2])
G_1i_tR_min_ac(ϕ) := G_1i_tR_min_ac_min_at(ϕ) + (G_1i_tR_min_ac_max_at(ϕ) - G_1i_tR_min_ac_min_at(ϕ))*(a_c - TableC12[i_tR_min_ac_min, 1])/(TableC12[i_tR_min_ac_max, 1] - TableC12[i_tR_min_ac_min, 1])
G_1i_tR_max_ac(ϕ) := G_1i_tR_max_ac_min_at(ϕ) + (G_1i_tR_max_ac_max_at(ϕ) - G_1i_tR_max_ac_min_at(ϕ))*(a_c - TableC12[i_tR_max_ac_min, 1])/(TableC12[i_tR_max_ac_max, 1] - TableC12[i_tR_max_ac_min, 1])
G_1i_tR(ϕ) := G_1i_tR_min_ac(ϕ) + (G_1i_tR_max_ac(ϕ) - G_1i_tR_min_ac(ϕ))*(t_R - TableC12[i_tR_min, 0])/(TableC12[i_tR_max, 0] - TableC12[i_tR_min, 0])
G_1(ϕ) := G_1i_tR(ϕ)
G_0(ϕ) := G_0i_tR(ϕ)
M_1(ϕ) := 2*π/sqrt(2*Q)*(3*G_1(ϕ) - G_0(ϕ)) - 24/5
N_1(ϕ) := 3*π/sqrt(Q)*(2*G_0(ϕ) - 5*G_1(ϕ)) - 8
M_2 := 3
N_2(ϕ) := 15*π/sqrt(Q)*(3*G_1(ϕ) - G_0(ϕ)) + 15
M_3(ϕ) := 6*π/sqrt(2*Q)*(G_0(ϕ) - 2*G_1(ϕ)) + 8/5
N_3(ϕ) := 3*π/sqrt(Q)*(3*G_0(ϕ) - 10*G_1(ϕ)) - 8
G_2(ϕ) :=
    sqrt(2*Q)/π*(16/15 + 1/3*M_1(ϕ) + 16/105*M_2 + 1/12*M_3(ϕ)) if ϕ == π/2
    sqrt(Q)/π*(4/5 + 2/3*N_1(ϕ) + 4/7*N_2(ϕ) + 1/12*N_3(ϕ)) if ϕ == 0
G_3(ϕ) :=
    sqrt(2*Q)/π*(32/35 + 1/4*M_1(ϕ) + 32/315*M_2 + 1/20*M_3(ϕ)) if ϕ == π/2
    sqrt(Q)/π*(4/7 + 1/2*N_1(ϕ) + 4/9*N_2(ϕ) + 2/5*N_3(ϕ)) if ϕ == 0
G_4(ϕ) :=
    sqrt(2*Q)/π*(256/315 + 1/5*M_1(ϕ) + 256/3465*M_2 + 1/30*M_3(ϕ)) if ϕ == π/2
    sqrt(Q)/π*(4/9 + 2/5*N_1(ϕ) + 4/11*N_2(ϕ) + 1/3*N_3(ϕ)) if ϕ == 0
# Inside Surface
K_I.IS := P*R_o^2/(R_o^2 - R_i^2)*(2*G_0(π/2) - 2*G_1(π/2)*(a/R_i) + 3*G_2(π/2)*(a/R_i)^2 - 4*G_3(π/2)*(a/R_i)^3 + 5*G_4(π/2)*(a/R_i)^4)*sqrt(π*a)/sqrt(Q)
# unit: MPa*sqrt(mm)
# or: psi*sqrt(in)
# Outside Surface
K_I.OS := P*R_o^2/(R_o^2 - R_i^2)*(2*G_0(0) + 2*G_1(0)*(a/R_i) + 3*G_2(0)*(a/R_i)^2 + 4*G_3(0)*(a/R_i)^3 + 5*G_4(0)*(a/R_i)^4)*sqrt(π*a)/sqrt(Q)
K_I.IS = 9743.33
K_I.OS = 7624.72  # unit: MPa*sqrt(mm)  # or: psi*sqrt(in)
# STEP 9 – Compute the reference stress for secondary and residual stresses.
# STEP 10 – Compute the stress intensity attributed to the secondary and residual stresses.
K_I_SR := 0
# STEP 11 – Compute the plasticity interaction factor.
# STEP 11.1 If K.SR = 0 then, Φ = 1.
Φ := 1
# STEP 11.2 Determine ψ and ϕ.
# STEP 11.3 – Compute the plasticity interaction factor.
# STEP 12 – Determine toughness ratio.
K_r.IS := (K_I.IS + Φ*K_I_SR)/K_mat
K_r.OS := (K_I.OS + Φ*K_I_SR)/K_mat
# STEP 13 – Evaluate results.
# STEP 13.1 – Determine the cut-off.
L_cut.off := 1
# STEP 13.2 – Plot the assessment point and failure assessment curve.
K_r_FAD(L_r) :=
    (1 - 0.14*L_r^2)*(0.3 + 0.7*exp(-0.65*L_r^6)) if L_r ≤ L_cut.off
    0 otherwise
L_r := 0, 0.01 .. 2.0
K_r := (1 - 0.14*L_r.p^2)*(0.3 + 0.7*exp(-0.65*L_r.p^6))
K_r = 0.986499
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Result_Level2 :=
    "The Level 2 assessment criteria are satisfied." if (K_r ≥ K_r.IS) and (K_r ≥ K_r.OS) and (L_cut.off ≥ L_r.p)
    "The Level 2 assessment criteria are not satisfied." otherwise
Result_Level2 = "The Level 2 assessment criteria are satisfied."
# -----------------------------------------------------------------------------------------------------------------------------------------------------------------------------------
# [area: Page7_Short Report_Level2]
# -----------------------------------------------------------------------------------------------------------------------------------------------------------------------------------
# File | Edit | Tool | View | Help
# -----------------------------------------------------------------------------------------------------------------------------------------------------------------------------------
# Equipment | Design | Material | Dimention | Load | Result | Save | Report | Close
Result := Result_Level2
Result = "The Level 2 assessment criteria are satisfied."
# [component: outputs Next]
# -----------------------------------------------------------------------------------------------------------------------------------------------------------------------------------
# [area: Page8_Long Report_Level2]
# ----------------------------------------------For Level 2---------------------------------------------------------------
EquipmentType = "Pressure Vessel"
Component_Type = 1
DesignCode = "ASME Section VIII Div.1"
Failure_Mode = "General Metal Loss "
Methodology = "API 579-1/ASME FFS-1 2007 Fitness-For-Service"
# o ------------------------------------------------------------- o
# -
# -
# -
# -
# -
# -
# -
# -
# -
# -
# -
# -
# -
# -
# -
# -
# -
# -
# -
# -
# -
# -
# -
# -
# -
# -
# Picture
# Picture
# Picture
# o ------------------------------------------------------------- o
AssessmentLevel = "Level 1"
AnalysisBy = "TEST NAME"
AnalysisDate = "1/1/14"
AttachPicture = "TEST PICTURE"
AnalysisDetail = "FAILURE"
# -----------------------------------------------------------------------------------------------------------------------------------------------------------------------------------
# STEP 1 – Evaluate operating conditions.
P_design = 300
Unit_Stress = "psi"
T_design = 100
Unit_Temp = "oF"
# STEP 2 – Determine the stress distribution.
# Primary Stress
# Membrane stress
P_m = 11520
Unit_Stress = "psi"
# Bending Stress
P_b = 149.986
Unit_Stress = "psi"
# Secondary Stress
# Residual Stress
# STEP 3 – Determine the material properties.
T_ref = 42.9029
# Unit: MPa*sqrt(m) | or Unit: psi*sqrt(in)
K_IC = 98155.4
σ_y = 38000
Unit_Stress = "psi"
# STEP 4 – Determine the crack-like flaw dimensions from inspection data.
a_meas = 0.25
c_meas = 1.1
# STEP 5 – Modify the data using the Partial Safety Factors (PSF)
[PSF_s; PSF_k; PSF_a] := [1; 1; 1]
# Modify the primary stress
# Membrane stress
P_m = 11520
Unit_Stress = "psi"
# Bending Stress
P_b = 149.986
Unit_Stress = "psi"
# Modify the material fracture toughness.
K_mat = 98155.4
# Modify the flaw size.
Unit_Length = "in"
a = 0.25
# STEP 6 – Compute the reference stress for primary stresses.
σ_ref = 11637.4
Unit_Stress = "psi"
# STEP 7 – Compute the Load Ratio.
L_r.p = 0.306247
# STEP 8 – Compute the stress intensity attributed to the primary loads.
# Inside Surface
K_I.IS = 9743.33
# Outside Surface
K_I.OS = 7624.72
# STEP 9 – Compute the reference stress for secondary and residual stresses.
# STEP 10 – Compute the stress intensity attributed to the secondary and residual stresses.
K_I_SR := 0
# STEP 11 – Compute the plasticity interaction factor.
Φ := 1
# STEP 12 – Determine toughness ratio.
# Inside Surface
K_r.IS = 0.0992643
# Outside Surface
K_r.OS = 0.0776801
# STEP 13 – Evaluate results.
# STEP 13.1 – Determine the cut-off.
L_cut.off = 1
# STEP 13.2 – Plot the assessment point and failure assessment curve.
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Result_Level2 = "The Level 2 assessment criteria are satisfied."
# -----------------------------------------------------------------------------------------------------------------------------------------------------------------------------------
